# OpenSim document version 40000
Model LASEM_TRAIL_ReferenceModel_InverseDynamics:
  gravity: 0 -9.80665 0
  length_units: meters
  force_units: N
  credits:
    Modified from Lai et al. model by Prasanna Sritharan. Rajagopal Model w/ torso, arms, updated knee, modified for movements involving high hip and knee flexion
  publications:
    Lai,A.K.M., Arnold, A.S., Wakeling, J.M. (2017) Why are antagonist muscles co-activated in my simulation? A musculoskeletal model for analysing human locomotor tasks. Annals of Biomedical Engineering
  Ground
  BodySet:
    Body pelvis: mass=11.38536 [kg] mass_center=(-0.07758194 0 0) inertia=(0.09938143 0.08420353 0.05597456 0 0 0)
        meshes=(r_pelvis.vtp l_pelvis.vtp sacrum.vtp)
    Body femur_r: mass=8.992086 mass_center=(0 -0.1672033 0) inertia=(0.1294472 0.03393277 0.1365045 0 0 0)
        meshes=r_femur.vtp
    Body tibia_r: mass=3.584209 mass_center=(0 -0.1985032 0) inertia=(0.04872397 0.004930402 0.04940069 0 0 0)
        meshes=(r_tibia.vtp r_fibula.vtp)
    Body patella_r: mass=0.08333346 mass_center=(0.001770388 0.02596569 0)
        inertia=(2.774559e-6 1.267403e-5 1.267403e-5 0 0 0) meshes=r_patella.vtp
    Body talus_r: mass=0.09667455 mass_center=(0 0 0) inertia=(0.0009667455 0.0009667455 0.0009667455 0 0 0)
        meshes=r_talus.vtp
    Body calcn_r: mass=1.208432 mass_center=(0.11336 0.034008 0) inertia=(0.001353444 0.003770307 0.003963656 0 0 0)
        meshes=r_foot.vtp
    Body toes_r: mass=0.2093971 mass_center=(0.03922256 0.0068016 -0.01712459)
        inertia=(9.667455e-5 0.0001933491 0.0009667455 0 0 0) meshes=r_bofoot.vtp
    Body femur_l: mass=8.992086 mass_center=(0 -0.1672033 0) inertia=(0.1294472 0.03393277 0.1365045 0 0 0)
        meshes=l_femur.vtp
    Body tibia_l: mass=3.584209 mass_center=(0 -0.1985032 0) inertia=(0.04872397 0.004930402 0.04940069 0 0 0)
        meshes=(l_tibia.vtp l_fibula.vtp)
    Body patella_l: mass=0.08333346 mass_center=(0.001770388 0.02596569 0)
        inertia=(2.774559e-6 1.267403e-5 1.267403e-5 0 0 0) meshes=l_pat.vtp
    Body talus_l: mass=0.09667455 mass_center=(0 0 0) inertia=(0.0009667455 0.0009667455 0.0009667455 0 0 0)
        meshes=l_talus.vtp
    Body calcn_l: mass=1.208432 mass_center=(0.11336 0.034008 0) inertia=(0.001353444 0.003770307 0.003963656 0 0 0)
        meshes=l_foot.vtp
    Body toes_l: mass=0.2093971 mass_center=(0.03922256 0.0068016 0.01712459)
        inertia=(9.667455e-5 0.0001933491 0.0009667455 0 0 0) meshes=l_bofoot.vtp
    Body torso: mass=25.93449 mass_center=(-0.0301449 0.327008 0) inertia=(1.425466 0.7303762 1.383799 0 0 0)
        meshes=(hat_spine.vtp hat_jaw.vtp hat_skull.vtp hat_ribs_scap.vtp)
    Body humerus_r: mass=1.96491 mass_center=(0 -0.164502 0) inertia=(0.01154874 0.003983958 0.01296309 0 0 0)
        meshes=humerus_rv.vtp
    Body ulna_r: mass=0.5872979 mass_center=(0 -0.120525 0) inertia=(0.0028635 0.0005974487 0.003106153 0 0 0)
        meshes=ulna_rv.vtp
    Body radius_r: mass=0.5872979 mass_center=(0 -0.120525 0) inertia=(0.0028635 0.0005974487 0.003106153 0 0 0)
        meshes=radius_rv.vtp
    Body hand_r: mass=0.442286 mass_center=(0 -0.068095 0) inertia=(0.000862337 0.0005288098 0.001295439 0 0 0)
        meshes=(pisiform_rvs.vtp lunate_rvs.vtp scaphoid_rvs.vtp triquetrum_rvs.vtp hamate_rvs.vtp capitate_rvs.vtp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)
    Body humerus_l: mass=1.96491 mass_center=(0 -0.164502 0) inertia=(0.01154874 0.003983958 0.01296309 0 0 0)
        meshes=humerus_lv.vtp
    Body ulna_l: mass=0.5872979 mass_center=(0 -0.120525 0) inertia=(0.0028635 0.0005974487 0.003106153 0 0 0)
        meshes=ulna_lv.vtp
    Body radius_l: mass=0.5872979 mass_center=(0 -0.120525 0) inertia=(0.0028635 0.0005974487 0.003106153 0 0 0)
        meshes=radius_lv.vtp
    Body hand_l: mass=0.442286 mass_center=(0 -0.068095 0) inertia=(0.000862337 0.0005288098 0.001295439 0 0 0)
        meshes=(pisiform_lvs.vtp lunate_lvs.vtp scaphoid_lvs.vtp triquetrum_lvs.vtp hamate_lvs.vtp capitate_lvs.vtp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)
  JointSet:
    CustomJoint ground_pelvis: socket_parent_frame=ground_offset socket_child_frame=pelvis_offset
      Coordinate pelvis_tilt: default_value=0 range=(-1.570796 1.570796) clamped=false
      Coordinate pelvis_list: default_value=0 range=(-1.570796 1.570796) clamped=false
      Coordinate pelvis_rotation: default_value=0 range=(-1.570796 1.570796) clamped=false
      Coordinate pelvis_tx: default_value=0 range=(-5 5) clamped=false
      Coordinate pelvis_ty: default_value=0.93 range=(-1 2) clamped=false
      Coordinate pelvis_tz: default_value=0 range=(-3 3) clamped=false
      PhysicalOffsetFrame ground_offset: socket_parent=/ground translation=(0 0 0) [meters]
      PhysicalOffsetFrame pelvis_offset: socket_parent=/bodyset/pelvis translation=(0 0 0)
      SpatialTransform:
        TransformAxis rotation1: coordinates=pelvis_tilt axis=(0 0 1) LinearFunction(coefficients=1 0)
        TransformAxis rotation2: coordinates=pelvis_list axis=(1 0 0) LinearFunction(coefficients=1 0)
        TransformAxis rotation3: coordinates=pelvis_rotation axis=(0 1 0) LinearFunction(coefficients=1 0)
        TransformAxis translation1: coordinates=pelvis_tx axis=(1 0 0) LinearFunction(coefficients=1 0)
        TransformAxis translation2: coordinates=pelvis_ty axis=(0 1 0) LinearFunction(coefficients=1 0)
        TransformAxis translation3: coordinates=pelvis_tz axis=(0 0 1) LinearFunction(coefficients=1 0)
    CustomJoint hip_r: socket_parent_frame=pelvis_offset socket_child_frame=femur_r_offset
      Coordinate hip_flexion_r: default_value=2.332052e-9 range=(-0.5235988 2.094395) clamped=false
      Coordinate hip_adduction_r: default_value=-1.199293e-9 range=(-0.8726646 0.5235988) clamped=false
      Coordinate hip_rotation_r: default_value=0 range=(-0.6981317 0.6981317) clamped=false
      PhysicalOffsetFrame pelvis_offset: socket_parent=/bodyset/pelvis translation=(-0.06175391 -0.08613022 0.076661)
      PhysicalOffsetFrame femur_r_offset: socket_parent=/bodyset/femur_r translation=(0 0 0)
      SpatialTransform: axes_held_at_zero=(translation1 translation2 translation3)
        TransformAxis rotation1: coordinates=hip_flexion_r axis=(0 0 1) LinearFunction(coefficients=1 0)
        TransformAxis rotation2: coordinates=hip_adduction_r axis=(1 0 0) LinearFunction(coefficients=1 0)
        TransformAxis rotation3: coordinates=hip_rotation_r axis=(0 1 0) LinearFunction(coefficients=1 0)
    CustomJoint walker_knee_r: socket_parent_frame=femur_r_offset socket_child_frame=tibia_r_offset
      Coordinate knee_angle_r: default_value=4.877666e-5 range=(0 2.443461) clamped=false
      Coordinate knee_adduction_r: default_value=0 range=(-0.1745329 0.1745329) clamped=false
      Coordinate knee_rotation_r: default_value=0 range=(-0.1745329 0.3490659) clamped=false
      PhysicalOffsetFrame femur_r_offset: socket_parent=/bodyset/femur_r
          translation=(-0.00442597 -0.4028617 -0.002043457) orientation=(-1.64157 1.44618 1.5708) [radians]
      PhysicalOffsetFrame tibia_r_offset: socket_parent=/bodyset/tibia_r
          translation=(-0.008600961 -0.00375827 -0.001353283) orientation=(-1.64157 1.44618 1.5708)
      SpatialTransform:
        TransformAxis rotation1: coordinates=knee_angle_r axis=(1 0 0) LinearFunction(coefficients=1 0)
        TransformAxis rotation2: coordinates=knee_adduction_r axis=(0 0 1) LinearFunction(coefficients=1 0)
        TransformAxis rotation3: coordinates=knee_rotation_r axis=(0 1 0) LinearFunction(coefficients=1 0)
        TransformAxis translation1: coordinates=knee_angle_r axis=(1 0 0)
          MultiplierFunction: scale=0.983549
            SimmSpline: x=(0 0.174533 0.349066 0.523599 0.698132 0.872665 1.0472 1.22173 1.39626 1.5708 1.74533 1.91986 2.0944)
                y=(0 5.3e-5 0.000188 0.000378 0.000597 0.000825 0.001045 0.001247 0.00142 0.001558 0.001661 0.001728 0.00176)
        TransformAxis translation2: coordinates=knee_angle_r axis=(0 1 0)
          MultiplierFunction: scale=0.983549
            SimmSpline: x=(0 0.174533 0.349066 0.523599 0.698132 0.872665 1.0472 1.22173 1.39626 1.5708 1.74533 1.91986 2.0944)
                y=(0 0.000301 0.000143 -0.000401 -0.001233 -0.002243 -0.003316 -0.004346 -0.005239 -0.005924 -0.006361 -0.006539 -0.00648)
        TransformAxis translation3: coordinates=knee_angle_r axis=(0 0 1)
          MultiplierFunction: scale=1.16769
            SimmSpline: x=(0 0.174533 0.349066 0.523599 0.698132 0.872665 1.0472 1.22173 1.39626 1.5708 1.74533 1.91986 2.0944)
                y=(0 0.001055 0.002061 0.00289 0.003447 0.003676 0.003559 0.00311 0.002373 0.001418 0.000329 -0.000805 -0.001898)
    CustomJoint patellofemoral_r: socket_parent_frame=femur_r_offset socket_child_frame=patella_r_offset
      Coordinate knee_angle_r_beta: default_value=4.877666e-5 range=(-99999.9 99999.9) clamped=false
      PhysicalOffsetFrame femur_r_offset: socket_parent=/bodyset/femur_r
          translation=(-0.007956911 -0.4012487 -0.003211147)
      PhysicalOffsetFrame patella_r_offset: socket_parent=/bodyset/patella_r translation=(0 0 0)
      SpatialTransform: axes_held_at_zero=(rotation2 rotation3)
        TransformAxis rotation1: coordinates=knee_angle_r_beta axis=(0 0 1)
          SimmSpline: x=(0 0.174533 0.349066 0.523599 0.698132 0.872665 1.0472 1.22173 1.39626 1.5708 1.74533 1.91986 2.0944)
              y=(0.00113686 -0.00629212 -0.105582 -0.253683 -0.414245 -0.579047 -0.747244 -0.91799 -1.09044 -1.26379 -1.43763 -1.61186 -1.78634)
        TransformAxis translation1: coordinates=knee_angle_r_beta axis=(1 0 0)
          MultiplierFunction: scale=0.983549
            SimmSpline: x=(0 0.174533 0.349066 0.523599 0.698132 0.872665 1.0472 1.22173 1.39626 1.5708 1.74533 1.91986 2.0944)
                y=(0.0524 0.0488 0.0437 0.0371 0.0296 0.0216 0.0136 0.0057 -0.0019 -0.0088 -0.0148 -0.0196 -0.0227)
        TransformAxis translation2: coordinates=knee_angle_r_beta axis=(0 1 0)
          MultiplierFunction: scale=0.983549
            SimmSpline: x=(0 0.174533 0.349066 0.523599 0.698132 0.872665 1.0472 1.22173 1.39626 1.5708 1.74533 1.91986 2.0944)
                y=(-0.0108 -0.019 -0.0263 -0.0322 -0.0367 -0.0395 -0.0408 -0.0404 -0.0384 -0.0349 -0.0301 -0.0245 -0.0187)
        TransformAxis translation3: axis=(0 0 1) MultiplierFunction(scale=1.16769, Constant(value=0.00275))
    CustomJoint ankle_r: socket_parent_frame=tibia_r_offset socket_child_frame=talus_r_offset
      Coordinate ankle_angle_r: default_value=-1.182866e-9 range=(-0.6981317 0.5235988) clamped=false
      Coordinate ankle_adduction_r: default_value=0 range=(-0.3490659 0.1745329) clamped=false
      Coordinate ankle_rotation_r: default_value=0 range=(-0.1745329 0.1745329) clamped=false
      PhysicalOffsetFrame tibia_r_offset: socket_parent=/bodyset/tibia_r translation=(-0.0106322 -0.425288 0)
          orientation=(0.175895 -0.105208 0.0186622)
      PhysicalOffsetFrame talus_r_offset: socket_parent=/bodyset/talus_r translation=(0 0 0)
          orientation=(0.175895 -0.105208 0.0186622)
      SpatialTransform: axes_held_at_zero=(translation1 translation2 translation3)
        TransformAxis rotation1: coordinates=ankle_angle_r axis=(0 0 1) LinearFunction(coefficients=1 0)
        TransformAxis rotation2: coordinates=ankle_adduction_r axis=(1 0 0) LinearFunction(coefficients=1 0)
        TransformAxis rotation3: coordinates=ankle_rotation_r axis=(0 1 0) LinearFunction(coefficients=1 0)
    WeldJoint subtalar_r: socket_parent_frame=talus_r_offset socket_child_frame=calcn_r_offset
      PhysicalOffsetFrame talus_r_offset: socket_parent=/bodyset/talus_r
          translation=(-0.05185324 -0.04460208 0.007218771) orientation=(-1.76819 0.906223 1.8196)
      PhysicalOffsetFrame calcn_r_offset: socket_parent=/bodyset/calcn_r translation=(0 0 0)
          orientation=(-1.76819 0.906223 1.8196)
    WeldJoint mtp_r: socket_parent_frame=calcn_r_offset socket_child_frame=toes_r_offset
      PhysicalOffsetFrame calcn_r_offset: socket_parent=/bodyset/calcn_r translation=(0.2026877 -0.0022672 0.001056832)
          orientation=(-3.14159 0.619901 0)
      PhysicalOffsetFrame toes_r_offset: socket_parent=/bodyset/toes_r translation=(0 0 0)
          orientation=(-3.14159 0.619901 0)
    CustomJoint hip_l: socket_parent_frame=pelvis_offset socket_child_frame=femur_l_offset
      Coordinate hip_flexion_l: default_value=2.332052e-9 range=(-0.5235988 2.094395) clamped=false
      Coordinate hip_adduction_l: default_value=-1.199293e-9 range=(-0.8726646 0.5235988) clamped=false
      Coordinate hip_rotation_l: default_value=0 range=(-0.6981317 0.6981317) clamped=false
      PhysicalOffsetFrame pelvis_offset: socket_parent=/bodyset/pelvis translation=(-0.06175391 -0.08613022 -0.076661)
      PhysicalOffsetFrame femur_l_offset: socket_parent=/bodyset/femur_l translation=(0 0 0)
      SpatialTransform: axes_held_at_zero=(translation1 translation2 translation3)
        TransformAxis rotation1: coordinates=hip_flexion_l axis=(0 0 1) LinearFunction(coefficients=1 0)
        TransformAxis rotation2: coordinates=hip_adduction_l axis=(1 0 0) LinearFunction(coefficients=-1 0)
        TransformAxis rotation3: coordinates=hip_rotation_l axis=(0 1 0) LinearFunction(coefficients=-1 0)
    CustomJoint walker_knee_l: socket_parent_frame=femur_l_offset socket_child_frame=tibia_l_offset
      Coordinate knee_angle_l: default_value=4.877992e-5 range=(0 2.443461) clamped=false
      Coordinate knee_adduction_l: default_value=0 range=(-0.1745329 0.1745329) clamped=false
      Coordinate knee_rotation_l: default_value=0 range=(-0.1745329 0.3490659) clamped=false
      PhysicalOffsetFrame femur_l_offset: socket_parent=/bodyset/femur_l
          translation=(-0.00442597 -0.4028617 0.002043457) orientation=(1.64157 -1.44618 1.5708)
      PhysicalOffsetFrame tibia_l_offset: socket_parent=/bodyset/tibia_l
          translation=(-0.008600961 -0.00375827 0.001353283) orientation=(1.64157 -1.44618 1.5708)
      SpatialTransform:
        TransformAxis rotation1: coordinates=knee_angle_l axis=(-1 0 0) LinearFunction(coefficients=1 0)
        TransformAxis rotation2: coordinates=knee_adduction_l axis=(0 0 1) LinearFunction(coefficients=1 0)
        TransformAxis rotation3: coordinates=knee_rotation_l axis=(0 1 0) LinearFunction(coefficients=-1 0)
        TransformAxis translation1: coordinates=knee_angle_l axis=(1 0 0)
          MultiplierFunction: scale=0.983549
            SimmSpline: x=(0 0.174533 0.349066 0.523599 0.698132 0.872665 1.0472 1.22173 1.39626 1.5708 1.74533 1.91986 2.0944)
                y=(0 5.3e-5 0.000188 0.000378 0.000597 0.000825 0.001045 0.001247 0.00142 0.001558 0.001661 0.001728 0.00176)
        TransformAxis translation2: coordinates=knee_angle_l axis=(0 1 0)
          MultiplierFunction: scale=0.983549
            SimmSpline: x=(0 0.174533 0.349066 0.523599 0.698132 0.872665 1.0472 1.22173 1.39626 1.5708 1.74533 1.91986 2.0944)
                y=(0 0.000301 0.000143 -0.000401 -0.001233 -0.002243 -0.003316 -0.004346 -0.005239 -0.005924 -0.006361 -0.006539 -0.00648)
        TransformAxis translation3: coordinates=knee_angle_l axis=(0 0 1)
          MultiplierFunction: scale=1.16769
            SimmSpline: x=(0 0.174533 0.349066 0.523599 0.698132 0.872665 1.0472 1.22173 1.39626 1.5708 1.74533 1.91986 2.0944)
                y=(0 -0.001055 -0.002061 -0.00289 -0.003447 -0.003676 -0.003559 -0.00311 -0.002373 -0.001418 -0.000329 0.000805 0.001898)
    CustomJoint patellofemoral_l: socket_parent_frame=femur_l_offset socket_child_frame=patella_l_offset
      Coordinate knee_angle_l_beta: default_value=4.877992e-5 range=(-99999.9 99999.9) clamped=false
      PhysicalOffsetFrame femur_l_offset: socket_parent=/bodyset/femur_l
          translation=(-0.007956911 -0.4012487 0.003211147)
      PhysicalOffsetFrame patella_l_offset: socket_parent=/bodyset/patella_l translation=(0 0 0)
      SpatialTransform: axes_held_at_zero=(rotation2 rotation3)
        TransformAxis rotation1: coordinates=knee_angle_l_beta axis=(0 0 1)
          SimmSpline: x=(0 0.174533 0.349066 0.523599 0.698132 0.872665 1.0472 1.22173 1.39626 1.5708 1.74533 1.91986 2.0944)
              y=(0.00113686 -0.00629212 -0.105582 -0.253683 -0.414245 -0.579047 -0.747244 -0.91799 -1.09044 -1.26379 -1.43763 -1.61186 -1.78634)
        TransformAxis translation1: coordinates=knee_angle_l_beta axis=(1 0 0)
          MultiplierFunction: scale=0.983549
            SimmSpline: x=(0 0.174533 0.349066 0.523599 0.698132 0.872665 1.0472 1.22173 1.39626 1.5708 1.74533 1.91986 2.0944)
                y=(0.0524 0.0488 0.0437 0.0371 0.0296 0.0216 0.0136 0.0057 -0.0019 -0.0088 -0.0148 -0.0196 -0.0227)
        TransformAxis translation2: coordinates=knee_angle_l_beta axis=(0 1 0)
          MultiplierFunction: scale=0.983549
            SimmSpline: x=(0 0.174533 0.349066 0.523599 0.698132 0.872665 1.0472 1.22173 1.39626 1.5708 1.74533 1.91986 2.0944)
                y=(-0.0108 -0.019 -0.0263 -0.0322 -0.0367 -0.0395 -0.0408 -0.0404 -0.0384 -0.0349 -0.0301 -0.0245 -0.0187)
        TransformAxis translation3: axis=(0 0 1) MultiplierFunction(scale=1.16769, Constant(value=-0.00275))
    CustomJoint ankle_l: socket_parent_frame=tibia_l_offset socket_child_frame=talus_l_offset
      Coordinate ankle_angle_l: default_value=8.352658e-11 range=(-0.6981317 0.5235988) clamped=false
      Coordinate ankle_adduction_l: default_value=0 range=(-0.3490659 0.1745329) clamped=false
      Coordinate ankle_rotation_l: default_value=0 range=(-0.1745329 0.1745329) clamped=false
      PhysicalOffsetFrame tibia_l_offset: socket_parent=/bodyset/tibia_l translation=(-0.0106322 -0.425288 0)
          orientation=(-0.175895 0.105208 0.0186622)
      PhysicalOffsetFrame talus_l_offset: socket_parent=/bodyset/talus_l translation=(0 0 0)
          orientation=(-0.175895 0.105208 0.0186622)
      SpatialTransform: axes_held_at_zero=(translation1 translation2 translation3)
        TransformAxis rotation1: coordinates=ankle_angle_l axis=(0 0 1) LinearFunction(coefficients=1 0)
        TransformAxis rotation2: coordinates=ankle_adduction_l axis=(1 0 0) LinearFunction(coefficients=-1 0)
        TransformAxis rotation3: coordinates=ankle_rotation_l axis=(0 1 0) LinearFunction(coefficients=-1 0)
    WeldJoint subtalar_l: socket_parent_frame=talus_l_offset socket_child_frame=calcn_l_offset
      PhysicalOffsetFrame talus_l_offset: socket_parent=/bodyset/talus_l
          translation=(-0.05185324 -0.04460208 -0.007218771) orientation=(1.76819 -0.906223 1.8196)
      PhysicalOffsetFrame calcn_l_offset: socket_parent=/bodyset/calcn_l translation=(0 0 0)
          orientation=(1.76819 -0.906223 1.8196)
    WeldJoint mtp_l: socket_parent_frame=calcn_l_offset socket_child_frame=toes_l_offset
      PhysicalOffsetFrame calcn_l_offset: socket_parent=/bodyset/calcn_l
          translation=(0.2026877 -0.0022672 -0.001056832) orientation=(-3.14159 -0.619901 0)
      PhysicalOffsetFrame toes_l_offset: socket_parent=/bodyset/toes_l translation=(0 0 0)
          orientation=(-3.14159 -0.619901 0)
    CustomJoint back: socket_parent_frame=pelvis_offset socket_child_frame=torso_offset
      Coordinate lumbar_extension: default_value=0 range=(-1.570796 1.570796) clamped=false
      Coordinate lumbar_bending: default_value=0 range=(-1.570796 1.570796) clamped=false
      Coordinate lumbar_rotation: default_value=0 range=(-1.570796 1.570796) clamped=false
      PhysicalOffsetFrame pelvis_offset: socket_parent=/bodyset/pelvis translation=(-0.1105021 0.08943321 0)
      PhysicalOffsetFrame torso_offset: socket_parent=/bodyset/torso translation=(0 0 0)
      SpatialTransform: axes_held_at_zero=(translation1 translation2 translation3)
        TransformAxis rotation1: coordinates=lumbar_extension axis=(0 0 1) LinearFunction(coefficients=1 0)
        TransformAxis rotation2: coordinates=lumbar_bending axis=(1 0 0) LinearFunction(coefficients=1 0)
        TransformAxis rotation3: coordinates=lumbar_rotation axis=(0 1 0) LinearFunction(coefficients=1 0)
    CustomJoint acromial_r: socket_parent_frame=torso_offset socket_child_frame=humerus_r_offset
      Coordinate arm_flex_r: default_value=0 range=(-1.570796 1.570796) clamped=false
      Coordinate arm_add_r: default_value=0 range=(-2.094395 1.570796) clamped=false
      Coordinate arm_rot_r: default_value=0 range=(-1.570796 1.570796) clamped=false
      PhysicalOffsetFrame torso_offset: socket_parent=/bodyset/torso translation=(0.003170239 0.3796358 0.1767269)
      PhysicalOffsetFrame humerus_r_offset: socket_parent=/bodyset/humerus_r translation=(0 0 0)
      SpatialTransform: axes_held_at_zero=(translation1 translation2 translation3)
        TransformAxis rotation1: coordinates=arm_flex_r axis=(0 0 1) LinearFunction(coefficients=1 0)
        TransformAxis rotation2: coordinates=arm_add_r axis=(1 0 0) LinearFunction(coefficients=1 0)
        TransformAxis rotation3: coordinates=arm_rot_r axis=(0 1 0) LinearFunction(coefficients=1 0)
    PinJoint elbow_r: socket_parent_frame=humerus_r_offset socket_child_frame=ulna_r_offset
      Coordinate elbow_flex_r: default_value=0 range=(0 2.618) clamped=false
      PhysicalOffsetFrame humerus_r_offset: socket_parent=/bodyset/humerus_r translation=(0.013144 -0.286273 -0.009595)
          orientation=(-0.0228627 0.228018 0.0051689)
      PhysicalOffsetFrame ulna_r_offset: socket_parent=/bodyset/ulna_r translation=(0 0 0)
          orientation=(-0.0228627 0.228018 0.0051689)
    PinJoint radioulnar_r: socket_parent_frame=ulna_r_offset socket_child_frame=radius_r_offset
      Coordinate pro_sup_r: default_value=0 range=(0 1.570796) clamped=false
      PhysicalOffsetFrame ulna_r_offset: socket_parent=/bodyset/ulna_r translation=(-0.006727 -0.013007 0.026083)
          orientation=(-1.56884 0.056428 1.53614)
      PhysicalOffsetFrame radius_r_offset: socket_parent=/bodyset/radius_r translation=(0 0 0)
          orientation=(-1.56884 0.056428 1.53614)
    UniversalJoint radius_hand_r: socket_parent_frame=radius_r_offset socket_child_frame=hand_r_offset
      Coordinate wrist_flex_r: default_value=0 range=(-1.22173 1.22173) clamped=false locked=true
      Coordinate wrist_dev_r: default_value=0 range=(-0.4363323 0.6108652) clamped=false locked=true
      PhysicalOffsetFrame radius_r_offset: socket_parent=/bodyset/radius_r translation=(-0.008797 -0.235841 0.01361)
          orientation=(-1.5708 0 -1.5708)
      PhysicalOffsetFrame hand_r_offset: socket_parent=/bodyset/hand_r translation=(0 0 0)
          orientation=(-1.5708 0 -1.5708)
    CustomJoint acromial_l: socket_parent_frame=torso_offset socket_child_frame=humerus_l_offset
      Coordinate arm_flex_l: default_value=0 range=(-1.570796 1.570796) clamped=false
      Coordinate arm_add_l: default_value=0 range=(-2.094395 1.570796) clamped=false
      Coordinate arm_rot_l: default_value=0 range=(-1.570796 1.570796) clamped=false
      PhysicalOffsetFrame torso_offset: socket_parent=/bodyset/torso translation=(0.003170239 0.3796358 -0.1767269)
      PhysicalOffsetFrame humerus_l_offset: socket_parent=/bodyset/humerus_l translation=(0 0 0)
      SpatialTransform: axes_held_at_zero=(translation1 translation2 translation3)
        TransformAxis rotation1: coordinates=arm_flex_l axis=(0 0 1) LinearFunction(coefficients=1 0)
        TransformAxis rotation2: coordinates=arm_add_l axis=(-1 0 0) LinearFunction(coefficients=1 0)
        TransformAxis rotation3: coordinates=arm_rot_l axis=(0 -1 0) LinearFunction(coefficients=1 0)
    PinJoint elbow_l: socket_parent_frame=humerus_l_offset socket_child_frame=ulna_l_offset
      Coordinate elbow_flex_l: default_value=0 range=(0 2.618) clamped=false
      PhysicalOffsetFrame humerus_l_offset: socket_parent=/bodyset/humerus_l translation=(0.013144 -0.286273 0.009595)
          orientation=(0.0228627 -0.228018 0.0051689)
      PhysicalOffsetFrame ulna_l_offset: socket_parent=/bodyset/ulna_l translation=(0 0 0)
          orientation=(0.0228627 -0.228018 0.0051689)
    PinJoint radioulnar_l: socket_parent_frame=ulna_l_offset socket_child_frame=radius_l_offset
      Coordinate pro_sup_l: default_value=0 range=(0 1.570796) clamped=false
      PhysicalOffsetFrame ulna_l_offset: socket_parent=/bodyset/ulna_l translation=(-0.006727 -0.013007 -0.026083)
          orientation=(1.56884 -0.056428 1.53614)
      PhysicalOffsetFrame radius_l_offset: socket_parent=/bodyset/radius_l translation=(0 0 0)
          orientation=(1.56884 -0.056428 1.53614)
    UniversalJoint radius_hand_l: socket_parent_frame=radius_l_offset socket_child_frame=hand_l_offset
      Coordinate wrist_flex_l: default_value=0 range=(-1.22173 1.22173) clamped=false locked=true
      Coordinate wrist_dev_l: default_value=0 range=(-0.4363323 0.6108652) clamped=false locked=true
      PhysicalOffsetFrame radius_l_offset: socket_parent=/bodyset/radius_l translation=(-0.008797 -0.235841 -0.01361)
          orientation=(1.5708 0 1.5708)
      PhysicalOffsetFrame hand_l_offset: socket_parent=/bodyset/hand_l translation=(0 0 0)
          orientation=(1.5708 0 1.5708)
  ConstraintSet:
    CoordinateCouplerConstraint patellofemoral_knee_angle_r_con: independent_coordinate_names=knee_angle_r
        dependent_coordinate_name=knee_angle_r_beta scale_factor=1
        coupled_coordinates_function=LinearFunction(coefficients=1 0)
    CoordinateCouplerConstraint patellofemoral_knee_angle_l_con: independent_coordinate_names=knee_angle_l
        dependent_coordinate_name=knee_angle_l_beta scale_factor=1
        coupled_coordinates_function=LinearFunction(coefficients=1 0)
  MarkerSet:
    Marker RSH: torso (-0.00813451 0.4414726 0.1348807)
    Marker LSH: torso (-0.02024352 0.4515754 -0.1349473)
    Marker C7: torso (-0.06666684 0.4372693 -0.0008641549)
    Marker RELB: humerus_r (0.01165751 -0.2472706 0.03912557)
    Marker LELB: humerus_l (0.01591729 -0.2506533 -0.03432888)
    Marker RASI: pelvis (0.0137986 0.02003367 0.1318193)
    Marker LASI: pelvis (0.0119132 0.02589727 -0.1360635)
    Marker P2: pelvis (-0.1650345 0.02810299 0.04815194)
    Marker P1: pelvis (-0.1717266 0.02595214 -0.03629701)
    Marker RLEPI: femur_r (-0.004025732 -0.3922763 0.0577066)
    Marker RMEPI: femur_r (-0.002851295 -0.4065299 -0.06130955)
    Marker RLMAL: tibia_r (-0.027732 -0.4081735 0.04207169)
    Marker RMMAL: tibia_r (-0.001176965 -0.3852873 -0.03380805)
    Marker RHEEL: calcn_r (-0.01456478 0.01122531 -0.01091032)
    Marker RP1MT: calcn_r (0.213325 0.03306593 -0.03083273)
    Marker RP5MT: calcn_r (0.2041686 0.01679623 0.07284285)
    Marker LLEPI: femur_l (-0.001468794 -0.3916486 -0.05479383)
    Marker LMEPI: femur_l (-0.006154041 -0.4116652 0.05699417)
    Marker LLMAL: tibia_l (-0.02133948 -0.4065346 -0.03984734)
    Marker LMMAL: tibia_l (0.002274422 -0.3997373 0.03996242)
    Marker LHEEL: calcn_l (-0.01366568 0.007082246 0.01185734)
    Marker LP1MT: calcn_l (0.2027373 0.03159492 0.02650815)
    Marker LP5MT: calcn_l (0.2069597 0.01569558 -0.07712982)
    Marker RWR: radius_r (-0.034 -0.225 0.014) fixed=true
    Marker LWR: radius_l (-0.0367766 -0.2205412 -0.01566886)
    Marker SACR: pelvis (-0.1665628 0.02479189 0.009861815)
    Marker LTHLP: femur_l (0.01112455 -0.1885823 -0.09250042)
    Marker LTHLD: femur_l (0.005077783 -0.2972959 -0.07067106)
    Marker LTHAP: femur_l (0.1076942 -0.1980262 -0.009457396)
    Marker LTHAD: femur_l (0.08115115 -0.2998068 -0.001436212)
    Marker LPAT: patella_l (0.01028575 0.009668259 -0.005697783)
    Marker LTIAP: tibia_l (0.02917436 -0.1567137 -0.00875803)
    Marker LTIAD: tibia_l (0.02471891 -0.2621325 -0.01090034)
    Marker LTILAT: tibia_l (-0.03005129 -0.2092669 -0.07062022)
    Marker LMFS: calcn_l (0.1525092 0.06425885 0.007267334)
    Marker LMFL: calcn_l (0.1426472 0.008479162 -0.07631105)
    Marker LTOE: toes_l (0.03782757 0.04564385 -0.001839674)
    Marker RTHLP: femur_r (0.0132674 -0.18242 0.09914155)
    Marker RTHLD: femur_r (0.005660661 -0.2766478 0.0789888)
    Marker RTHAP: femur_r (0.1141243 -0.1858125 0.02136686)
    Marker RTHAD: femur_r (0.09205885 -0.277418 0.008249666)
    Marker RPAT: patella_r (0.01444922 0.008167677 0.007646362)
    Marker RTIAP: tibia_r (0.03488014 -0.1436875 0.02075567)
    Marker RTIAD: tibia_r (0.02885231 -0.253436 0.0162678)
    Marker RTILAT: tibia_r (-0.02891922 -0.1894546 0.07549344)
    Marker RMFS: calcn_r (0.1548053 0.06600753 -0.007493377)
    Marker RMFL: calcn_r (0.1481956 0.008730931 0.07192023)
    Marker RTOE: toes_r (0.05439874 0.05088852 0.0009713181)
