# OpenSim document version 40000
InverseKinematicsTool:
  results_directory: ./
  constraint_weight: Inf
  accuracy: 1e-5
  marker_file: TRAIL_071_EP_01_markers.trc
  time_range: 0.095 1.245
  report_errors: true
  output_motion_file: ../../../../data/TRAIL Test Data/outputDatabase/TRAIL_071/Baseline/TRAIL_071_EP_01/ik/TRAIL_071_EP_01_ik.mot
  report_marker_locations: false
  IKTaskSet:
    IKMarkerTask RSH: apply=true weight=15
    IKMarkerTask LSH: apply=true weight=15
    IKMarkerTask C7: apply=true weight=1
    IKMarkerTask RELB: apply=true weight=5
    IKMarkerTask LELB: apply=true weight=5
    IKMarkerTask RASI: apply=true weight=15
    IKMarkerTask LASI: apply=true weight=15
    IKMarkerTask P2: apply=true weight=10
    IKMarkerTask P1: apply=true weight=10
    IKMarkerTask RLEPI: apply=true weight=15
    IKMarkerTask RMEPI: apply=false weight=15
    IKMarkerTask RLMAL: apply=true weight=15
    IKMarkerTask RMMAL: apply=false weight=15
    IKMarkerTask RHEEL: apply=true weight=10
    IKMarkerTask RP1MT: apply=true weight=1
    IKMarkerTask RP5MT: apply=true weight=1
    IKMarkerTask LLEPI: apply=true weight=15
    IKMarkerTask LMEPI: apply=false weight=15
    IKMarkerTask LLMAL: apply=true weight=15
    IKMarkerTask LMMAL: apply=false weight=15
    IKMarkerTask LHEEL: apply=true weight=10
    IKMarkerTask LP1MT: apply=true weight=1
    IKMarkerTask LP5MT: apply=true weight=1
    IKMarkerTask RWR: apply=true weight=5
    IKMarkerTask LWR: apply=true weight=5
    IKMarkerTask SACR: apply=true weight=10
    IKMarkerTask LTHLP: apply=true weight=5
    IKMarkerTask LTHLD: apply=true weight=5
    IKMarkerTask LTHAP: apply=true weight=5
    IKMarkerTask LTHAD: apply=true weight=5
    IKMarkerTask LPAT: apply=true weight=1
    IKMarkerTask LTIAP: apply=true weight=5
    IKMarkerTask LTIAD: apply=true weight=5
    IKMarkerTask LTILAT: apply=true weight=5
    IKMarkerTask LMFS: apply=true weight=1
    IKMarkerTask LMFL: apply=true weight=1
    IKMarkerTask LTOE: apply=true weight=1
    IKMarkerTask RTHLP: apply=true weight=5
    IKMarkerTask RTHLD: apply=true weight=5
    IKMarkerTask RTHAP: apply=true weight=5
    IKMarkerTask RTHAD: apply=true weight=5
    IKMarkerTask RPAT: apply=true weight=1
    IKMarkerTask RTIAP: apply=true weight=5
    IKMarkerTask RTIAD: apply=true weight=5
    IKMarkerTask RTILAT: apply=true weight=5
    IKMarkerTask RMFS: apply=true weight=1
    IKMarkerTask RMFL: apply=true weight=1
    IKMarkerTask RTOE: apply=true weight=1
