# OpenSim document version 40000
MarkerSet:
  Marker RSH: torso (-0.00813451 0.4414726 0.1348807)
  Marker LSH: torso (-0.02024352 0.4515754 -0.1349473)
  Marker C7: torso (-0.06666684 0.4372693 -0.0008641549)
  Marker RELB: humerus_r (0.01165751 -0.2472706 0.03912557)
  Marker LELB: humerus_l (0.01591729 -0.2506533 -0.03432888)
  Marker RASI: pelvis (0.0137986 0.02003367 0.1318193)
  Marker LASI: pelvis (0.0119132 0.02589727 -0.1360635)
  Marker P2: pelvis (-0.1650345 0.02810299 0.04815194)
  Marker P1: pelvis (-0.1717266 0.02595214 -0.03629701)
  Marker RLEPI: femur_r (-0.004025732 -0.3922763 0.0577066)
  Marker RMEPI: femur_r (-0.002851295 -0.4065299 -0.06130955)
  Marker RLMAL: tibia_r (-0.027732 -0.4081735 0.04207169)
  Marker RMMAL: tibia_r (-0.001176965 -0.3852873 -0.03380805)
  Marker RHEEL: calcn_r (-0.01456478 0.01122531 -0.01091032)
  Marker RP1MT: calcn_r (0.213325 0.03306593 -0.03083273)
  Marker RP5MT: calcn_r (0.2041686 0.01679623 0.07284285)
  Marker LLEPI: femur_l (-0.001468794 -0.3916486 -0.05479383)
  Marker LMEPI: femur_l (-0.006154041 -0.4116652 0.05699417)
  Marker LLMAL: tibia_l (-0.02133948 -0.4065346 -0.03984734)
  Marker LMMAL: tibia_l (0.002274422 -0.3997373 0.03996242)
  Marker LHEEL: calcn_l (-0.01366568 0.007082246 0.01185734)
  Marker LP1MT: calcn_l (0.2027373 0.03159492 0.02650815)
  Marker LP5MT: calcn_l (0.2069597 0.01569558 -0.07712982)
  Marker RWR: radius_r (-0.034 -0.225 0.014) fixed=true
  Marker LWR: radius_l (-0.0367766 -0.2205412 -0.01566886)
