# OpenSim document version 40000
MarkerSet:
  Marker RSH: torso (-0.003 0.425 0.13)
  Marker LSH: torso (-0.003 0.425 -0.13)
  Marker C7: torso (-0.085 0.435 0.00165426)
  Marker RSJC: humerus_r (0 0 0)
  Marker RELB: humerus_r (0.015 -0.28 0.04)
  Marker LSJC: humerus_l (0 0 0)
  Marker LELB: humerus_l (0.015 -0.28 -0.04)
  Marker RASI: pelvis (0.00953047 0.0180816 0.128464)
  Marker LASI: pelvis (0.00953047 0.0180816 -0.128464)
  Marker P2: pelvis (-0.155 0.035 0.045)
  Marker P1: pelvis (-0.155 0.035 -0.045)
  Marker LHJC: femur_l (0 0 0)
  Marker RHJC: femur_r (0 0 0)
  Marker RLEPI: femur_r (0 -0.404 0.05)
  Marker RMEPI: femur_r (0 -0.404 -0.05)
  Marker RKJC: tibia_r (0.001731 -0.002389 -0.008452)
  Marker RLMAL: tibia_r (-0.005 -0.3888 0.053)
  Marker RMMAL: tibia_r (0.006 -0.3888 -0.038)
  Marker RAJC: talus_r (0 0 0)
  Marker RHEEL: calcn_r (-0.025 0.02 -0.005)
  Marker RP1MT: calcn_r (0.205 0.0297308 -0.03)
  Marker RP5MT: calcn_r (0.145 0.02491 0.059)
  Marker LLEPI: femur_l (0 -0.404 -0.05)
  Marker LMEPI: femur_l (0 -0.404 0.05)
  Marker LKJC: tibia_l (0.001731 -0.002389 0.008452)
  Marker LLMAL: tibia_l (-0.005 -0.3888 -0.053)
  Marker LMMAL: tibia_l (0.006 -0.3888 0.038)
  Marker LAJC: talus_l (0 0 0)
  Marker LHEEL: calcn_l (-0.025 0.02 0.005)
  Marker LP1MT: calcn_l (0.205 0.02973 0.03)
  Marker LP5MT: calcn_l (0.145 0.024909 -0.059)
  Marker REJC: ulna_r (0 0 0)
  Marker LEJC: ulna_l (0 0 0)
  Marker RWR: radius_r (-0.034 -0.225 0.014) fixed=true
  Marker LWR: radius_l (-0.034 -0.225 -0.014)
