# OpenSim document version 30000
CMCTool AS:
  replace_force_set: false
  force_set_files: AS_CMC_Actuators.xml
  results_directory: CMC_PRResults
  output_precision: 20
  initial_time: 0.02
  final_time: 0.84
  maximum_number_of_integrator_steps: 30000
  maximum_integrator_step_size: 1
  minimum_integrator_step_size: 1e-8
  integrator_error_tolerance: 0.0001
  external_loads_file: AS_PR_Kinetics.xml
  desired_kinematics_file: AS_PR_IK.mot
  task_set_file: AS_CMC_Tasks.xml
  constraints_file: AS_CMC_ControlConstraints.xml
  lowpass_cutoff_frequency: 6
  cmc_time_window: 0.01
  use_fast_optimization_target: true
  optimizer_algorithm: ipopt
  optimizer_max_iterations: 2000
  optimizer_print_level: 0
  use_verbose_printing: false
  AnalysisSet Analyses:
    ProbeReporter: step_interval=10 in_degrees=true
    Kinematics: step_interval=10 in_degrees=true
    BodyKinematics: step_interval=10 in_degrees=true
    ForceReporter: step_interval=1 in_degrees=true include_constraint_forces=true
    Actuation: step_interval=10 in_degrees=true
