# OpenSim document version 40000
ScaleTool LASEM_TRAIL_ReferenceModel_MinimalMarkerSet:
  mass: 72.8317 [kg]
  height: -1
  age: -1
  GenericModelMaker:
    model_file: LaiArnold2017_MinimalMarkerSet.osim
  ModelScaler:
    apply: true
    scaling_order: manualScale
    marker_file: TRAIL_071_Static_01_markers.trc
    time_range: 0.5 0.75
    preserve_mass_distribution: true
    output_model_file: LASEM_TRAIL_ReferenceModel_Lai_MinimalMarkerSet.osim
    output_scale_file: TRAIL_071_Lai_scale_factors.xml
    ScaleSet:
      Scale: scales=(1 1 1) segment=ground apply=true
      Scale: scales=(1.09734 1.09734 0.992247) segment=pelvis apply=true
      Scale: scales=(0.983549 0.983549 1.16769) segment=femur_r apply=true
      Scale: scales=(1.06322 1.06322 0.911461) segment=tibia_r apply=true
      Scale: scales=(0.983549 0.983549 1.16769) segment=patella_r apply=true
      Scale: scales=(1.06322 1.06322 0.911461) segment=talus_r apply=true
      Scale: scales=(1.1336 1.1336 0.978548) segment=calcn_r apply=true
      Scale: scales=(1.1336 1.1336 0.978548) segment=toes_r apply=true
      Scale: scales=(0.983549 0.983549 1.16769) segment=femur_l apply=true
      Scale: scales=(1.06322 1.06322 0.911461) segment=tibia_l apply=true
      Scale: scales=(0.983549 0.983549 1.16769) segment=patella_l apply=true
      Scale: scales=(1.06322 1.06322 0.911461) segment=talus_l apply=true
      Scale: scales=(1.1336 1.1336 0.978548) segment=calcn_l apply=true
      Scale: scales=(1.1336 1.1336 0.978548) segment=toes_l apply=true
      Scale: scales=(1.00483 1.0219 1.03957) segment=torso apply=true
      Scale: scales=(1 1 1) segment=humerus_r apply=true
      Scale: scales=(1 1 1) segment=ulna_r apply=true
      Scale: scales=(1 1 1) segment=radius_r apply=true
      Scale: scales=(1 1 1) segment=hand_r apply=true
      Scale: scales=(1 1 1) segment=humerus_l apply=true
      Scale: scales=(1 1 1) segment=ulna_l apply=true
      Scale: scales=(1 1 1) segment=radius_l apply=true
      Scale: scales=(1 1 1) segment=hand_l apply=true
      Scale: scales=(1 1 1) segment=ground_offset apply=true
      Scale: scales=(1 1 1) segment=pelvis_offset apply=true
      Scale: scales=(1 1 1) segment=pelvis_offset apply=true
      Scale: scales=(1 1 1) segment=femur_r_offset apply=true
      Scale: scales=(1 1 1) segment=femur_r_offset apply=true
      Scale: scales=(1 1 1) segment=tibia_r_offset apply=true
      Scale: scales=(1 1 1) segment=femur_r_offset apply=true
      Scale: scales=(1 1 1) segment=patella_r_offset apply=true
      Scale: scales=(1 1 1) segment=tibia_r_offset apply=true
      Scale: scales=(1 1 1) segment=talus_r_offset apply=true
      Scale: scales=(1 1 1) segment=talus_r_offset apply=true
      Scale: scales=(1 1 1) segment=calcn_r_offset apply=true
      Scale: scales=(1 1 1) segment=calcn_r_offset apply=true
      Scale: scales=(1 1 1) segment=toes_r_offset apply=true
      Scale: scales=(1 1 1) segment=pelvis_offset apply=true
      Scale: scales=(1 1 1) segment=femur_l_offset apply=true
      Scale: scales=(1 1 1) segment=femur_l_offset apply=true
      Scale: scales=(1 1 1) segment=tibia_l_offset apply=true
      Scale: scales=(1 1 1) segment=femur_l_offset apply=true
      Scale: scales=(1 1 1) segment=patella_l_offset apply=true
      Scale: scales=(1 1 1) segment=tibia_l_offset apply=true
      Scale: scales=(1 1 1) segment=talus_l_offset apply=true
      Scale: scales=(1 1 1) segment=talus_l_offset apply=true
      Scale: scales=(1 1 1) segment=calcn_l_offset apply=true
      Scale: scales=(1 1 1) segment=calcn_l_offset apply=true
      Scale: scales=(1 1 1) segment=toes_l_offset apply=true
      Scale: scales=(1 1 1) segment=pelvis_offset apply=true
      Scale: scales=(1 1 1) segment=torso_offset apply=true
      Scale: scales=(1 1 1) segment=torso_offset apply=true
      Scale: scales=(1 1 1) segment=humerus_r_offset apply=true
      Scale: scales=(1 1 1) segment=humerus_r_offset apply=true
      Scale: scales=(1 1 1) segment=ulna_r_offset apply=true
      Scale: scales=(1 1 1) segment=ulna_r_offset apply=true
      Scale: scales=(1 1 1) segment=radius_r_offset apply=true
      Scale: scales=(1 1 1) segment=radius_r_offset apply=true
      Scale: scales=(1 1 1) segment=hand_r_offset apply=true
      Scale: scales=(1 1 1) segment=torso_offset apply=true
      Scale: scales=(1 1 1) segment=humerus_l_offset apply=true
      Scale: scales=(1 1 1) segment=humerus_l_offset apply=true
      Scale: scales=(1 1 1) segment=ulna_l_offset apply=true
      Scale: scales=(1 1 1) segment=ulna_l_offset apply=true
      Scale: scales=(1 1 1) segment=radius_l_offset apply=true
      Scale: scales=(1 1 1) segment=radius_l_offset apply=true
      Scale: scales=(1 1 1) segment=hand_l_offset apply=true
  MarkerPlacer:
    apply: true
    marker_file: TRAIL_071_Static_01_markers.trc
    time_range: 0.5 0.75
    output_motion_file: TRAIL_071_Static_01.mot
    output_model_file: LASEM_TRAIL_ReferenceModel_Lai_MinimalMarkerSet.osim
    output_marker_file: LASEM_TRAIL_ReferenceModel_Lai_MinimalMarkerSet_markers.xml
    max_marker_movement: -1
    IKTaskSet:
      IKMarkerTask RSH: apply=true weight=1
      IKMarkerTask LSH: apply=true weight=1
      IKMarkerTask C7: apply=true weight=1
      IKMarkerTask RSJC: apply=false weight=1
      IKMarkerTask RELB: apply=true weight=1
      IKMarkerTask LSJC: apply=false weight=1
      IKMarkerTask LELB: apply=true weight=1
      IKMarkerTask RASI: apply=true weight=1
      IKMarkerTask LASI: apply=true weight=1
      IKMarkerTask P2: apply=true weight=1
      IKMarkerTask P1: apply=true weight=1
      IKMarkerTask LHJC: apply=false weight=1
      IKMarkerTask RHJC: apply=false weight=1
      IKMarkerTask RLEPI: apply=true weight=1
      IKMarkerTask RMEPI: apply=true weight=1
      IKMarkerTask RKJC: apply=false weight=1
      IKMarkerTask RLMAL: apply=true weight=1
      IKMarkerTask RMMAL: apply=true weight=1
      IKMarkerTask RAJC: apply=false weight=1
      IKMarkerTask RHEEL: apply=true weight=1
      IKMarkerTask RP1MT: apply=true weight=1
      IKMarkerTask RP5MT: apply=true weight=1
      IKMarkerTask LLEPI: apply=true weight=1
      IKMarkerTask LMEPI: apply=true weight=1
      IKMarkerTask LKJC: apply=false weight=1
      IKMarkerTask LLMAL: apply=true weight=1
      IKMarkerTask LMMAL: apply=true weight=1
      IKMarkerTask LAJC: apply=false weight=1
      IKMarkerTask LHEEL: apply=true weight=1
      IKMarkerTask LP1MT: apply=true weight=1
      IKMarkerTask LP5MT: apply=true weight=1
      IKMarkerTask REJC: apply=false weight=1
      IKMarkerTask LEJC: apply=false weight=1
      IKMarkerTask RWR: apply=true weight=1
      IKMarkerTask LWR: apply=true weight=1
