# OpenSim document version 40000
ScaleTool LASEM_TRAIL_ReferenceModel_MinimalMarkerSet:
  mass: 72.8317 [kg]
  height: -1
  age: -1
  GenericModelMaker:
    model_file: Rajagopal2015_MinimalMarkerSet.osim
  ModelScaler:
    apply: true
    scaling_order: measurements
    marker_file: TRAIL_071_Static_01_markers.trc
    time_range: 0.5 0.75
    preserve_mass_distribution: true
    output_model_file: LASEM_TRAIL_ReferenceModel_MinimalMarkerSet.osim
    output_scale_file: TRAIL_071_scale_factors.xml
    MeasurementSet:
      Measurement PelvisXY: apply=true
        MarkerPair: markers=(RASI P2)
        MarkerPair: markers=(LASI P1)
        BodyScale pelvis: axes=(X Y)
      Measurement PelvisZ: apply=true
        MarkerPair: markers=(RASI LASI)
        MarkerPair: markers=(P2 P1)
        BodyScale pelvis: axes=Z
      Measurement ThighXY: apply=true
        MarkerPair: markers=(RASI RLEPI)
        MarkerPair: markers=(LASI LLEPI)
        BodyScale femur_r: axes=(X Y)
        BodyScale patella_r: axes=(X Y)
        BodyScale femur_l: axes=(X Y)
        BodyScale patella_l: axes=(X Y)
      Measurement ThighZ: apply=true
        MarkerPair: markers=(RMEPI RLEPI)
        MarkerPair: markers=(LMEPI LLEPI)
        BodyScale femur_r: axes=Z
        BodyScale patella_r: axes=Z
        BodyScale femur_l: axes=Z
        BodyScale patella_l: axes=Z
      Measurement ShankXY: apply=true
        MarkerPair: markers=(RLEPI RLMAL)
        MarkerPair: markers=(LLEPI LLMAL)
        BodyScale tibia_r: axes=(X Y)
        BodyScale talus_r: axes=(X Y)
        BodyScale tibia_l: axes=(X Y)
        BodyScale talus_l: axes=(X Y)
      Measurement ShankZ: apply=true
        MarkerPair: markers=(RMMAL RLMAL)
        MarkerPair: markers=(LMMAL LLMAL)
        BodyScale tibia_r: axes=Z
        BodyScale talus_r: axes=Z
        BodyScale tibia_l: axes=Z
        BodyScale talus_l: axes=Z
      Measurement FootXY: apply=true
        MarkerPair: markers=(RHEEL RP1MT)
        MarkerPair: markers=(RHEEL RP5MT)
        MarkerPair: markers=(LHEEL LP1MT)
        MarkerPair: markers=(LHEEL LP5MT)
        BodyScale calcn_r: axes=(X Y)
        BodyScale toes_r: axes=(X Y)
        BodyScale calcn_l: axes=(X Y)
        BodyScale toes_l: axes=(X Y)
      Measurement FootZ: apply=true
        MarkerPair: markers=(RP1MT RP5MT)
        MarkerPair: markers=(LP1MT LP5MT)
        BodyScale calcn_r: axes=Z
        BodyScale toes_r: axes=Z
        BodyScale calcn_l: axes=Z
        BodyScale toes_l: axes=Z
      Measurement TorsoX: apply=true
        MarkerPair: markers=(RASI C7)
        MarkerPair: markers=(LASI C7)
        BodyScale torso: axes=X
      Measurement TorsoY: apply=true
        MarkerPair: markers=(C7 RASI)
        MarkerPair: markers=(C7 LASI)
        MarkerPair: markers=(C7 P2)
        MarkerPair: markers=(C7 P2)
        BodyScale torso: axes=Y
      Measurement TorsoZ: apply=true
        MarkerPair: markers=(RSH LSH)
        BodyScale torso: axes=Z
  MarkerPlacer:
    apply: true
    marker_file: TRAIL_071_Static_01_markers.trc
    time_range: 0.5 0.75
    output_motion_file: TRAIL_071_Static_01.mot
    output_model_file: LASEM_TRAIL_ReferenceModel_MinimalMarkerSet.osim
    output_marker_file: LASEM_TRAIL_ReferenceModel_MinimalMarkerSet_markers.xml
    max_marker_movement: -1
    IKTaskSet:
      IKMarkerTask RSH: apply=true weight=1
      IKMarkerTask LSH: apply=true weight=1
      IKMarkerTask C7: apply=true weight=1
      IKMarkerTask RSJC: apply=false weight=1
      IKMarkerTask RELB: apply=true weight=1
      IKMarkerTask LSJC: apply=false weight=1
      IKMarkerTask LELB: apply=true weight=1
      IKMarkerTask RASI: apply=true weight=1
      IKMarkerTask LASI: apply=true weight=1
      IKMarkerTask P2: apply=true weight=1
      IKMarkerTask P1: apply=true weight=1
      IKMarkerTask LHJC: apply=false weight=1
      IKMarkerTask RHJC: apply=false weight=1
      IKMarkerTask RLEPI: apply=true weight=1
      IKMarkerTask RMEPI: apply=true weight=1
      IKMarkerTask RKJC: apply=false weight=1
      IKMarkerTask RLMAL: apply=true weight=1
      IKMarkerTask RMMAL: apply=true weight=1
      IKMarkerTask RAJC: apply=false weight=1
      IKMarkerTask RHEEL: apply=true weight=1
      IKMarkerTask RP1MT: apply=true weight=1
      IKMarkerTask RP5MT: apply=true weight=1
      IKMarkerTask LLEPI: apply=true weight=1
      IKMarkerTask LMEPI: apply=true weight=1
      IKMarkerTask LKJC: apply=false weight=1
      IKMarkerTask LLMAL: apply=true weight=1
      IKMarkerTask LMMAL: apply=true weight=1
      IKMarkerTask LAJC: apply=false weight=1
      IKMarkerTask LHEEL: apply=true weight=1
      IKMarkerTask LP1MT: apply=true weight=1
      IKMarkerTask LP5MT: apply=true weight=1
      IKMarkerTask REJC: apply=false weight=1
      IKMarkerTask LEJC: apply=false weight=1
      IKMarkerTask RWR: apply=true weight=1
      IKMarkerTask LWR: apply=true weight=1
