# OpenSim document version 40000
ScaleTool TRAIL_071:
  mass: 72.8317 [kg]
  height: -1
  age: -1
  GenericModelMaker:
    model_file: C:\Users\Owner\Documents\projects\lasem-trail-running\python-pipeline\opensim-reference-model\LASEM_TRAIL_ReferenceModel_Unclamped.osim
  ModelScaler:
    apply: true
    scaling_order: measurements
    marker_file: C:\Users\Owner\Documents\data\TRAIL Test Data\outputDatabase\TRAIL_071\Baseline\TRAIL_071_Static_01\TRAIL_071_Static_01_markers.trc
    time_range: 0.5 0.55
    preserve_mass_distribution: true
    output_model_file: C:\Users\Owner\Documents\data\TRAIL Test Data\outputDatabase\TRAIL_071\Baseline\TRAIL_071_Static_01\TRAIL_071.osim
    MeasurementSet:
      Measurement PelvisXY: apply=true
        MarkerPair: markers=(RASI P2)
        MarkerPair: markers=(LASI P1)
        BodyScale pelvis: axes=(X Y)
      Measurement PelvisZ: apply=true
        MarkerPair: markers=(RASI LASI)
        MarkerPair: markers=(P2 P1)
        BodyScale pelvis: axes=Z
      Measurement ThighXY: apply=true
        MarkerPair: markers=(RASI RLEPI)
        MarkerPair: markers=(LASI LLEPI)
        BodyScale femur_r: axes=(X Y)
        BodyScale patella_r: axes=(X Y)
        BodyScale femur_l: axes=(X Y)
        BodyScale patella_l: axes=(X Y)
      Measurement ThighZ: apply=true
        MarkerPair: markers=(RMEPI RLEPI)
        MarkerPair: markers=(LMEPI LLEPI)
        BodyScale femur_r: axes=Z
        BodyScale patella_r: axes=Z
        BodyScale femur_l: axes=Z
        BodyScale patella_l: axes=Z
      Measurement ShankXY: apply=true
        MarkerPair: markers=(RLEPI RLMAL)
        MarkerPair: markers=(LLEPI LLMAL)
        BodyScale tibia_r: axes=(X Y)
        BodyScale talus_r: axes=(X Y)
        BodyScale tibia_l: axes=(X Y)
        BodyScale talus_l: axes=(X Y)
      Measurement ShankZ: apply=true
        MarkerPair: markers=(RMMAL RLMAL)
        MarkerPair: markers=(LMMAL LLMAL)
        BodyScale tibia_r: axes=Z
        BodyScale talus_r: axes=Z
        BodyScale tibia_l: axes=Z
        BodyScale talus_l: axes=Z
      Measurement FootXY: apply=true
        MarkerPair: markers=(RHEEL RP1MT)
        MarkerPair: markers=(RHEEL RP5MT)
        MarkerPair: markers=(LHEEL LP1MT)
        MarkerPair: markers=(LHEEL LP5MT)
        BodyScale calcn_r: axes=(X Y)
        BodyScale toes_r: axes=(X Y)
        BodyScale calcn_l: axes=(X Y)
        BodyScale toes_l: axes=(X Y)
      Measurement FootZ: apply=true
        MarkerPair: markers=(RP1MT RP5MT)
        MarkerPair: markers=(LP1MT LP5MT)
        BodyScale calcn_r: axes=Z
        BodyScale toes_r: axes=Z
        BodyScale calcn_l: axes=Z
        BodyScale toes_l: axes=Z
      Measurement TorsoX: apply=true
        MarkerPair: markers=(RASI C7)
        MarkerPair: markers=(LASI C7)
        BodyScale torso: axes=X
      Measurement TorsoY: apply=true
        MarkerPair: markers=(C7 RASI)
        MarkerPair: markers=(C7 LASI)
        MarkerPair: markers=(C7 P2)
        MarkerPair: markers=(C7 P2)
        BodyScale torso: axes=Y
      Measurement TorsoZ: apply=true
        MarkerPair: markers=(RSH LSH)
        BodyScale torso: axes=Z
  MarkerPlacer:
    apply: true
    marker_file: C:\Users\Owner\Documents\data\TRAIL Test Data\outputDatabase\TRAIL_071\Baseline\TRAIL_071_Static_01\TRAIL_071_Static_01_markers.trc
    time_range: 0.5 0.55
    output_motion_file: C:\Users\Owner\Documents\data\TRAIL Test Data\outputDatabase\TRAIL_071\Baseline\TRAIL_071_Static_01\TRAIL_071_Static_01_static_ik.mot
    output_model_file: C:\Users\Owner\Documents\data\TRAIL Test Data\outputDatabase\TRAIL_071\Baseline\TRAIL_071_Static_01\TRAIL_071.osim
    output_marker_file: C:\Users\Owner\Documents\data\TRAIL Test Data\outputDatabase\TRAIL_071\Baseline\TRAIL_071_Static_01\TRAIL_071_Static_01_markers.xml
    max_marker_movement: -1
    IKTaskSet:
      IKMarkerTask RSH: apply=true weight=20
      IKMarkerTask LSH: apply=true weight=20
      IKMarkerTask C7: apply=true weight=1
      IKMarkerTask RELB: apply=true weight=5
      IKMarkerTask LELB: apply=true weight=5
      IKMarkerTask RASI: apply=true weight=20
      IKMarkerTask LASI: apply=true weight=20
      IKMarkerTask P2: apply=true weight=15
      IKMarkerTask P1: apply=true weight=15
      IKMarkerTask RLEPI: apply=true weight=20
      IKMarkerTask RMEPI: apply=true weight=20
      IKMarkerTask RLMAL: apply=true weight=20
      IKMarkerTask RMMAL: apply=true weight=20
      IKMarkerTask RHEEL: apply=true weight=15
      IKMarkerTask RP1MT: apply=true weight=1
      IKMarkerTask RP5MT: apply=true weight=1
      IKMarkerTask LLEPI: apply=true weight=20
      IKMarkerTask LMEPI: apply=true weight=20
      IKMarkerTask LLMAL: apply=true weight=20
      IKMarkerTask LMMAL: apply=true weight=20
      IKMarkerTask LHEEL: apply=true weight=15
      IKMarkerTask LP1MT: apply=true weight=1
      IKMarkerTask LP5MT: apply=true weight=1
      IKMarkerTask RWR: apply=true weight=5
      IKMarkerTask LWR: apply=true weight=5
      IKMarkerTask SACR: apply=true weight=15
      IKMarkerTask LTHLP: apply=true weight=1
      IKMarkerTask LTHLD: apply=true weight=1
      IKMarkerTask LTHAP: apply=true weight=1
      IKMarkerTask LTHAD: apply=true weight=1
      IKMarkerTask LPAT: apply=true weight=1
      IKMarkerTask LTIAP: apply=true weight=1
      IKMarkerTask LTIAD: apply=true weight=1
      IKMarkerTask LTILAT: apply=true weight=1
      IKMarkerTask LMFS: apply=true weight=1
      IKMarkerTask LMFL: apply=true weight=1
      IKMarkerTask LTOE: apply=true weight=1
      IKMarkerTask RTHLP: apply=true weight=1
      IKMarkerTask RTHLD: apply=true weight=1
      IKMarkerTask RTHAP: apply=true weight=1
      IKMarkerTask RTHAD: apply=true weight=1
      IKMarkerTask RPAT: apply=true weight=1
      IKMarkerTask RTIAP: apply=true weight=1
      IKMarkerTask RTIAD: apply=true weight=1
      IKMarkerTask RTILAT: apply=true weight=1
      IKMarkerTask RMFS: apply=true weight=1
      IKMarkerTask RMFL: apply=true weight=1
      IKMarkerTask RTOE: apply=true weight=1
