# OpenSim document version 40000
Model 3DGaitModelwithSimpleArms:
  gravity: 0 -9.80665 0
  length_units: meters
  force_units: N
  credits:
    Delp S.L., Loan J.P., Hoy M.G., Zajac F.E., Topp E.L., Rosen J.M., Thelen D.G., Anderson F.C., Seth A., Hamner S.R.
  publications:
    Notes: 3D, 23 DOF gait model created by D.G. Thelen, Univ. of Wisconsin-Madison, and Samuel Hamner, Ajay Seth, Frank C. Anderson, and Scott L. Delp, Stanford University. Lower extremity joint defintions based on Delp et al. (1990). Low back joint and anthropometry based on Anderson and Pandy (1999, 2001). Planar knee model of Yamaguchi and Zajac (1989). Seth removed the patella to avoid kinematic constraints; insertions of the quadrucepts are handled with moving points in the tibia frame. Hamner added arms adapted from Holzbaur et al., 2005. Hamner, S.R., Seth, A, Delp, S.L.: Muscle contributions to propulsion and support during running. Journal of Biomechanics, 2010. Delp, S.L., Loan, J.P., Hoy, M.G., Zajac, F.E., Topp E.L., Rosen, J.M.: An interactive graphics-based model of the lower extremity to study orthopaedic surgical procedures, IEEE Transactions on Biomedical Engineering, vol. 37, pp. 757-767, 1990. Yamaguchi G.T., Zajac F.E.: A planar model of the knee joint to characterize the knee extensor mechanism." J . Biomech. vol. 21. pp. 1-10. 1989. Anderson F.C., Pandy M.G.: A dynamic optimization solution for vertical jumping in three dimensions. Computer Methods in Biomechanics and Biomedical Engineering 2:201-231, 1999. Anderson F.C., Pandy M.G.: Dynamic optimization of human walking. Journal of Biomechanical Engineering 123:381-390, 2001. Holzbaur, KR, WM Murray and SL Delp, 2005. A model of the upper extremity for simulating musculoskeletal surgery and analyzing neuromuscular control. Ann Biomed Eng 33(6): 829-840.
  Ground
  BodySet:
    Body pelvis: mass=11.777 [kg] mass_center=(-0.0707 0 0) inertia=(0.1028 0.0871 0.0579 0 0 0)
        meshes=(sacrum.vtp pelvis.vtp l_pelvis.vtp)
    Body femur_r: mass=9.3014 mass_center=(0 -0.17 0) inertia=(0.1339 0.0351 0.1412 0 0 0) meshes=femur_r.vtp
    Body tibia_r: mass=3.7075 mass_center=(0 -0.1867 0) inertia=(0.0504 0.0051 0.0511 0 0 0)
        meshes=(tibia_r.vtp fibula_r.vtp)
    Body talus_r: mass=0.1 mass_center=(0 0 0) inertia=(0.001 0.001 0.001 0 0 0) meshes=talus_rv.vtp
    Body calcn_r: mass=1.25 mass_center=(0.1 0.03 0) inertia=(0.0014 0.0039 0.0041 0 0 0) meshes=foot.vtp
    Body toes_r: mass=0.2166 mass_center=(0.0346 0.006 -0.0175) inertia=(0.0001 0.0002 0.001 0 0 0) meshes=bofoot.vtp
    Body femur_l: mass=9.3014 mass_center=(0 -0.17 0) inertia=(0.1339 0.0351 0.1412 0 0 0) meshes=femur_l.vtp
    Body tibia_l: mass=3.7075 mass_center=(0 -0.1867 0) inertia=(0.0504 0.0051 0.0511 0 0 0)
        meshes=(tibia_l.vtp fibula_l.vtp)
    Body talus_l: mass=0.1 mass_center=(0 0 0) inertia=(0.001 0.001 0.001 0 0 0) meshes=talus_lv.vtp
    Body calcn_l: mass=1.25 mass_center=(0.1 0.03 0) inertia=(0.0014 0.0039 0.0041 0 0 0) meshes=l_foot.vtp
    Body toes_l: mass=0.2166 mass_center=(0.0346 0.006 0.0175) inertia=(0.0001 0.0002 0.001 0 0 0) meshes=l_bofoot.vtp
    Body torso: mass=26.8266 mass_center=(-0.03 0.32 0) inertia=(1.4745 0.7555 1.4314 0 0 0)
        meshes=(hat_spine.vtp hat_jaw.vtp hat_skull.vtp hat_ribs_scap.vtp)
    Body humerus_r: mass=2.0325 mass_center=(0 -0.164502 0) inertia=(0.011946 0.004121 0.013409 0 0 0)
        meshes=humerus_rv.vtp
    Body ulna_r: mass=0.6075 mass_center=(0 -0.120525 0) inertia=(0.002962 0.000618 0.003213 0 0 0) meshes=ulna_rv.vtp
    Body radius_r: mass=0.6075 mass_center=(0 -0.120525 0) inertia=(0.002962 0.000618 0.003213 0 0 0)
        meshes=radius_rv.vtp
    Body hand_r: mass=0.4575 mass_center=(0 -0.068095 0) inertia=(0.000892 0.000547 0.00134 0 0 0)
        meshes=(pisiform_rvs.vtp lunate_rvs.vtp scaphoid_rvs.vtp triquetrum_rvs.vtp hamate_rvs.vtp capitate_rvs.vtp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)
    Body humerus_l: mass=2.0325 mass_center=(0 -0.164502 0) inertia=(0.011946 0.004121 0.013409 0 0 0)
        meshes=humerus_lv.vtp
    Body ulna_l: mass=0.6075 mass_center=(0 -0.120525 0) inertia=(0.002962 0.000618 0.003213 0 0 0) meshes=ulna_lv.vtp
    Body radius_l: mass=0.6075 mass_center=(0 -0.120525 0) inertia=(0.002962 0.000618 0.003213 0 0 0)
        meshes=radius_lv.vtp
    Body hand_l: mass=0.4575 mass_center=(0 -0.068095 0) inertia=(0.000892 0.000547 0.00134 0 0 0)
        meshes=(pisiform_lvs.vtp lunate_lvs.vtp scaphoid_lvs.vtp triquetrum_lvs.vtp hamate_lvs.vtp capitate_lvs.vtp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)
  JointSet:
    CustomJoint ground_pelvis: socket_parent_frame=ground_offset socket_child_frame=pelvis_offset
      Coordinate pelvis_tilt: default_value=0 range=(-1.570796 1.570796) clamped=true
      Coordinate pelvis_list: default_value=0 range=(-1.570796 1.570796) clamped=true
      Coordinate pelvis_rotation: default_value=0 range=(-1.570796 1.570796) clamped=true
      Coordinate pelvis_tx: default_value=0 range=(-5 5) clamped=true
      Coordinate pelvis_ty: default_value=0 range=(-1 2) clamped=true
      Coordinate pelvis_tz: default_value=0 range=(-3 3) clamped=true
      PhysicalOffsetFrame ground_offset: socket_parent=/ground translation=(0 0 0) [meters]
      PhysicalOffsetFrame pelvis_offset: socket_parent=/bodyset/pelvis translation=(0 0 0)
      SpatialTransform:
        TransformAxis rotation1: coordinates=pelvis_tilt axis=(0 0 1) LinearFunction(coefficients=1 0)
        TransformAxis rotation2: coordinates=pelvis_list axis=(1 0 0) LinearFunction(coefficients=1 0)
        TransformAxis rotation3: coordinates=pelvis_rotation axis=(0 1 0) LinearFunction(coefficients=1 0)
        TransformAxis translation1: coordinates=pelvis_tx axis=(1 0 0) LinearFunction(coefficients=1 0)
        TransformAxis translation2: coordinates=pelvis_ty axis=(0 1 0) LinearFunction(coefficients=1 0)
        TransformAxis translation3: coordinates=pelvis_tz axis=(0 0 1) LinearFunction(coefficients=1 0)
    CustomJoint hip_r: socket_parent_frame=pelvis_offset socket_child_frame=femur_r_offset
      Coordinate hip_flexion_r: default_value=0 range=(-2.094395 2.094395) clamped=true
      Coordinate hip_adduction_r: default_value=0 range=(-2.094395 2.094395) clamped=true
      Coordinate hip_rotation_r: default_value=0 range=(-2.094395 2.094395) clamped=true
      PhysicalOffsetFrame pelvis_offset: socket_parent=/bodyset/pelvis translation=(-0.0707 -0.0661 0.0835)
      PhysicalOffsetFrame femur_r_offset: socket_parent=/bodyset/femur_r translation=(0 0 0)
      SpatialTransform: axes_held_at_zero=(translation1 translation2 translation3)
        TransformAxis rotation1: coordinates=hip_flexion_r axis=(0 0 1) LinearFunction(coefficients=1 0)
        TransformAxis rotation2: coordinates=hip_adduction_r axis=(1 0 0) LinearFunction(coefficients=1 0)
        TransformAxis rotation3: coordinates=hip_rotation_r axis=(0 1 0) LinearFunction(coefficients=1 0)
    CustomJoint knee_r: socket_parent_frame=femur_r_offset socket_child_frame=tibia_r_offset
      Coordinate knee_angle_r: default_value=0 range=(-2.094395 0.1745329) clamped=true
      PhysicalOffsetFrame femur_r_offset: socket_parent=/bodyset/femur_r translation=(0 0 0)
      PhysicalOffsetFrame tibia_r_offset: socket_parent=/bodyset/tibia_r translation=(0 0 0)
      SpatialTransform: axes_held_at_zero=(rotation2 rotation3 translation3)
        TransformAxis rotation1: coordinates=knee_angle_r axis=(0 0 1) LinearFunction(coefficients=1 0)
        TransformAxis translation1: coordinates=knee_angle_r axis=(1 0 0)
          SimmSpline: x=(-2.0944 -1.74533 -1.39626 -1.0472 -0.698132 -0.349066 -0.174533 0.197344 0.337395 0.490178 1.52146 2.0944)
              y=(-0.0032 0.00179 0.00411 0.0041 0.00212 -0.001 -0.0031 -0.005227 -0.005435 -0.005574 -0.005435 -0.00525)
        TransformAxis translation2: coordinates=knee_angle_r axis=(0 1 0)
          SimmSpline: x=(-2.0944 -1.22173 -0.523599 -0.349066 -0.174533 0.159149 2.0944)
              y=(-0.4226 -0.4082 -0.399 -0.3976 -0.3966 -0.395264 -0.396)
    CustomJoint ankle_r: socket_parent_frame=tibia_r_offset socket_child_frame=talus_r_offset
      Coordinate ankle_angle_r: default_value=0 range=(-1.570796 1.570796) clamped=true
      PhysicalOffsetFrame tibia_r_offset: socket_parent=/bodyset/tibia_r translation=(0 -0.43 0)
      PhysicalOffsetFrame talus_r_offset: socket_parent=/bodyset/talus_r translation=(0 0 0)
      SpatialTransform: axes_held_at_zero=(rotation2 rotation3 translation1 translation2 translation3)
        TransformAxis rotation1: coordinates=ankle_angle_r axis=(-0.1050135 -0.1740224 0.9791263)
            LinearFunction(coefficients=1 0)
    CustomJoint subtalar_r: socket_parent_frame=talus_r_offset socket_child_frame=calcn_r_offset
      Coordinate subtalar_angle_r: default_value=0 range=(-1.570796 1.570796) clamped=true locked=true
      PhysicalOffsetFrame talus_r_offset: socket_parent=/bodyset/talus_r translation=(-0.04877 -0.04195 0.00792)
      PhysicalOffsetFrame calcn_r_offset: socket_parent=/bodyset/calcn_r translation=(0 0 0)
      SpatialTransform: axes_held_at_zero=(rotation2 rotation3 translation1 translation2 translation3)
        TransformAxis rotation1: coordinates=subtalar_angle_r axis=(0.7871796 0.6047475 -0.1209495)
            LinearFunction(coefficients=1 0)
    CustomJoint mtp_r: socket_parent_frame=calcn_r_offset socket_child_frame=toes_r_offset
      Coordinate mtp_angle_r: default_value=0 range=(-1.570796 1.570796) clamped=true locked=true
      PhysicalOffsetFrame calcn_r_offset: socket_parent=/bodyset/calcn_r translation=(0.1788 -0.002 0.00108)
      PhysicalOffsetFrame toes_r_offset: socket_parent=/bodyset/toes_r translation=(0 0 0)
      SpatialTransform: axes_held_at_zero=(rotation2 rotation3 translation1 translation2 translation3)
        TransformAxis rotation1: coordinates=mtp_angle_r axis=(-0.5809544 0 0.8139361) LinearFunction(coefficients=1 0)
    CustomJoint hip_l: socket_parent_frame=pelvis_offset socket_child_frame=femur_l_offset
      Coordinate hip_flexion_l: default_value=0 range=(-2.094395 2.094395) clamped=true
      Coordinate hip_adduction_l: default_value=0 range=(-2.094395 2.094395) clamped=true
      Coordinate hip_rotation_l: default_value=0 range=(-2.094395 2.094395) clamped=true
      PhysicalOffsetFrame pelvis_offset: socket_parent=/bodyset/pelvis translation=(-0.0707 -0.0661 -0.0835)
      PhysicalOffsetFrame femur_l_offset: socket_parent=/bodyset/femur_l translation=(0 0 0)
      SpatialTransform: axes_held_at_zero=(translation1 translation2 translation3)
        TransformAxis rotation1: coordinates=hip_flexion_l axis=(0 0 1) LinearFunction(coefficients=1 0)
        TransformAxis rotation2: coordinates=hip_adduction_l axis=(-1 0 0) LinearFunction(coefficients=1 0)
        TransformAxis rotation3: coordinates=hip_rotation_l axis=(0 -1 0) LinearFunction(coefficients=1 0)
    CustomJoint knee_l: socket_parent_frame=femur_l_offset socket_child_frame=tibia_l_offset
      Coordinate knee_angle_l: default_value=0 range=(-2.094395 0.1745329) clamped=true
      PhysicalOffsetFrame femur_l_offset: socket_parent=/bodyset/femur_l translation=(0 0 0)
      PhysicalOffsetFrame tibia_l_offset: socket_parent=/bodyset/tibia_l translation=(0 0 0)
      SpatialTransform: axes_held_at_zero=(rotation2 rotation3 translation3)
        TransformAxis rotation1: coordinates=knee_angle_l axis=(0 0 1) LinearFunction(coefficients=1 0)
        TransformAxis translation1: coordinates=knee_angle_l axis=(1 0 0)
          SimmSpline: x=(-2.0944 -1.74533 -1.39626 -1.0472 -0.698132 -0.349066 -0.174533 0.197344 0.337395 0.490178 1.52146 2.0944)
              y=(-0.0032 0.00179 0.00411 0.0041 0.00212 -0.001 -0.0031 -0.005227 -0.005435 -0.005574 -0.005435 -0.00525)
        TransformAxis translation2: coordinates=knee_angle_l axis=(0 1 0)
          SimmSpline: x=(-2.0944 -1.22173 -0.523599 -0.349066 -0.174533 0.159149 2.0944)
              y=(-0.4226 -0.4082 -0.399 -0.3976 -0.3966 -0.395264 -0.396)
    CustomJoint ankle_l: socket_parent_frame=tibia_l_offset socket_child_frame=talus_l_offset
      Coordinate ankle_angle_l: default_value=0 range=(-1.047198 1.047198) clamped=true
      PhysicalOffsetFrame tibia_l_offset: socket_parent=/bodyset/tibia_l translation=(0 -0.43 0)
      PhysicalOffsetFrame talus_l_offset: socket_parent=/bodyset/talus_l translation=(0 0 0)
      SpatialTransform: axes_held_at_zero=(rotation2 rotation3 translation1 translation2 translation3)
        TransformAxis rotation1: coordinates=ankle_angle_l axis=(0.1050135 0.1740224 0.9791263)
            LinearFunction(coefficients=1 0)
    CustomJoint subtalar_l: socket_parent_frame=talus_l_offset socket_child_frame=calcn_l_offset
      Coordinate subtalar_angle_l: default_value=0 range=(-1.570796 1.570796) clamped=true locked=true
      PhysicalOffsetFrame talus_l_offset: socket_parent=/bodyset/talus_l translation=(-0.04877 -0.04195 -0.00792)
      PhysicalOffsetFrame calcn_l_offset: socket_parent=/bodyset/calcn_l translation=(0 0 0)
      SpatialTransform: axes_held_at_zero=(rotation2 rotation3 translation1 translation2 translation3)
        TransformAxis rotation1: coordinates=subtalar_angle_l axis=(-0.7871796 -0.6047475 -0.1209495)
            LinearFunction(coefficients=1 0)
    CustomJoint mtp_l: socket_parent_frame=calcn_l_offset socket_child_frame=toes_l_offset
      Coordinate mtp_angle_l: default_value=0 range=(-1.047198 1.047198) clamped=true locked=true
      PhysicalOffsetFrame calcn_l_offset: socket_parent=/bodyset/calcn_l translation=(0.1788 -0.002 -0.00108)
      PhysicalOffsetFrame toes_l_offset: socket_parent=/bodyset/toes_l translation=(0 0 0)
      SpatialTransform: axes_held_at_zero=(rotation2 rotation3 translation1 translation2 translation3)
        TransformAxis rotation1: coordinates=mtp_angle_l axis=(0.5809544 0 0.8139361) LinearFunction(coefficients=1 0)
    CustomJoint back: socket_parent_frame=pelvis_offset socket_child_frame=torso_offset
      Coordinate lumbar_extension: default_value=0 range=(-1.570796 1.570796) clamped=true
      Coordinate lumbar_bending: default_value=0 range=(-1.570796 1.570796) clamped=true
      Coordinate lumbar_rotation: default_value=0 range=(-1.570796 1.570796) clamped=true
      PhysicalOffsetFrame pelvis_offset: socket_parent=/bodyset/pelvis translation=(-0.1007 0.0815 0)
      PhysicalOffsetFrame torso_offset: socket_parent=/bodyset/torso translation=(0 0 0)
      SpatialTransform: axes_held_at_zero=(translation1 translation2 translation3)
        TransformAxis rotation1: coordinates=lumbar_extension axis=(0 0 1) LinearFunction(coefficients=1 0)
        TransformAxis rotation2: coordinates=lumbar_bending axis=(1 0 0) LinearFunction(coefficients=1 0)
        TransformAxis rotation3: coordinates=lumbar_rotation axis=(0 1 0) LinearFunction(coefficients=1 0)
    CustomJoint acromial_r: socket_parent_frame=torso_offset socket_child_frame=humerus_r_offset
      Coordinate arm_flex_r: default_value=0 range=(-1.570796 1.570796) clamped=true
      Coordinate arm_add_r: default_value=0 range=(-2.094395 1.570796) clamped=true
      Coordinate arm_rot_r: default_value=0 range=(-1.570796 1.570796) clamped=true
      PhysicalOffsetFrame torso_offset: socket_parent=/bodyset/torso translation=(0.003155 0.3715 0.17)
      PhysicalOffsetFrame humerus_r_offset: socket_parent=/bodyset/humerus_r translation=(0 0 0)
      SpatialTransform: axes_held_at_zero=(translation1 translation2 translation3)
        TransformAxis rotation1: coordinates=arm_flex_r axis=(0 0 1) LinearFunction(coefficients=1 0)
        TransformAxis rotation2: coordinates=arm_add_r axis=(1 0 0) LinearFunction(coefficients=1 0)
        TransformAxis rotation3: coordinates=arm_rot_r axis=(0 1 0) LinearFunction(coefficients=1 0)
    CustomJoint elbow_r: socket_parent_frame=humerus_r_offset socket_child_frame=ulna_r_offset
      Coordinate elbow_flex_r: default_value=0 range=(0 2.618) clamped=true
      PhysicalOffsetFrame humerus_r_offset: socket_parent=/bodyset/humerus_r translation=(0.013144 -0.286273 -0.009595)
      PhysicalOffsetFrame ulna_r_offset: socket_parent=/bodyset/ulna_r translation=(0 0 0)
      SpatialTransform: axes_held_at_zero=(rotation2 rotation3 translation1 translation2 translation3)
        TransformAxis rotation1: coordinates=elbow_flex_r axis=(0.226047 0.022269 0.9738618)
            LinearFunction(coefficients=1 0)
    CustomJoint radioulnar_r: socket_parent_frame=ulna_r_offset socket_child_frame=radius_r_offset
      Coordinate pro_sup_r: default_value=0 range=(0 1.570796) clamped=true
      PhysicalOffsetFrame ulna_r_offset: socket_parent=/bodyset/ulna_r translation=(-0.006727 -0.013007 0.026083)
      PhysicalOffsetFrame radius_r_offset: socket_parent=/bodyset/radius_r translation=(0 0 0)
      SpatialTransform: axes_held_at_zero=(rotation2 rotation3 translation1 translation2 translation3)
        TransformAxis rotation1: coordinates=pro_sup_r axis=(0.05639803 0.9984065 0.001952)
            LinearFunction(coefficients=1 0)
    CustomJoint radius_hand_r: socket_parent_frame=radius_r_offset socket_child_frame=hand_r_offset
      Coordinate wrist_flex_r: default_value=0 range=(-1.22173 1.22173) clamped=true locked=true
      Coordinate wrist_dev_r: default_value=0 range=(-0.4363323 0.6108652) clamped=true locked=true
      PhysicalOffsetFrame radius_r_offset: socket_parent=/bodyset/radius_r translation=(-0.008797 -0.235841 0.01361)
      PhysicalOffsetFrame hand_r_offset: socket_parent=/bodyset/hand_r translation=(0 0 0)
      SpatialTransform: axes_held_at_zero=(rotation3 translation1 translation2 translation3)
        TransformAxis rotation1: coordinates=wrist_flex_r axis=(0 0 1) LinearFunction(coefficients=1 0)
        TransformAxis rotation2: coordinates=wrist_dev_r axis=(1 0 0) LinearFunction(coefficients=1 0)
    CustomJoint acromial_l: socket_parent_frame=torso_offset socket_child_frame=humerus_l_offset
      Coordinate arm_flex_l: default_value=0 range=(-1.570796 1.570796) clamped=true
      Coordinate arm_add_l: default_value=0 range=(-2.094395 1.570796) clamped=true
      Coordinate arm_rot_l: default_value=0 range=(-1.570796 1.570796) clamped=true
      PhysicalOffsetFrame torso_offset: socket_parent=/bodyset/torso translation=(0.003155 0.3715 -0.17)
      PhysicalOffsetFrame humerus_l_offset: socket_parent=/bodyset/humerus_l translation=(0 0 0)
      SpatialTransform: axes_held_at_zero=(translation1 translation2 translation3)
        TransformAxis rotation1: coordinates=arm_flex_l axis=(0 0 1) LinearFunction(coefficients=1 0)
        TransformAxis rotation2: coordinates=arm_add_l axis=(-1 0 0) LinearFunction(coefficients=1 0)
        TransformAxis rotation3: coordinates=arm_rot_l axis=(0 -1 0) LinearFunction(coefficients=1 0)
    CustomJoint elbow_l: socket_parent_frame=humerus_l_offset socket_child_frame=ulna_l_offset
      Coordinate elbow_flex_l: default_value=0 range=(0 2.618) clamped=true
      PhysicalOffsetFrame humerus_l_offset: socket_parent=/bodyset/humerus_l translation=(0.013144 -0.286273 0.009595)
      PhysicalOffsetFrame ulna_l_offset: socket_parent=/bodyset/ulna_l translation=(0 0 0)
      SpatialTransform: axes_held_at_zero=(rotation2 rotation3 translation1 translation2 translation3)
        TransformAxis rotation1: coordinates=elbow_flex_l axis=(-0.226047 -0.022269 0.9738618)
            LinearFunction(coefficients=1 0)
    CustomJoint radioulnar_l: socket_parent_frame=ulna_l_offset socket_child_frame=radius_l_offset
      Coordinate pro_sup_l: default_value=0 range=(0 1.570796) clamped=true
      PhysicalOffsetFrame ulna_l_offset: socket_parent=/bodyset/ulna_l translation=(-0.006727 -0.013007 -0.026083)
      PhysicalOffsetFrame radius_l_offset: socket_parent=/bodyset/radius_l translation=(0 0 0)
      SpatialTransform: axes_held_at_zero=(rotation2 rotation3 translation1 translation2 translation3)
        TransformAxis rotation1: coordinates=pro_sup_l axis=(-0.05639803 -0.9984065 0.001952)
            LinearFunction(coefficients=1 0)
    CustomJoint radius_hand_l: socket_parent_frame=radius_l_offset socket_child_frame=hand_l_offset
      Coordinate wrist_flex_l: default_value=0 range=(-1.22173 1.22173) clamped=true locked=true
      Coordinate wrist_dev_l: default_value=0 range=(-0.4363323 0.6108652) clamped=true locked=true
      PhysicalOffsetFrame radius_l_offset: socket_parent=/bodyset/radius_l translation=(-0.008797 -0.235841 -0.01361)
      PhysicalOffsetFrame hand_l_offset: socket_parent=/bodyset/hand_l translation=(0 0 0)
      SpatialTransform: axes_held_at_zero=(rotation3 translation1 translation2 translation3)
        TransformAxis rotation1: coordinates=wrist_flex_l axis=(0 0 1) LinearFunction(coefficients=1 0)
        TransformAxis rotation2: coordinates=wrist_dev_l axis=(-1 0 0) LinearFunction(coefficients=1 0)
  ForceSet:
    DeGrooteFregly2016Muscle [values shared by the 92 below unless stated]: min_control=0.01 max_control=1
        max_contraction_velocity=10 activation_time_constant=0.01 deactivation_time_constant=0.04
        default_activation=0.05 fiber_damping=0 passive_fiber_strain_at_one_norm_force=0.6
        tendon_strain_at_one_norm_force=0.033
    DeGrooteFregly2016Muscle glut_med1_r: max_isometric_force=819 optimal_fiber_length=0.0535 tendon_slack_length=0.078
        pennation_angle_at_optimal=0.1396263 [radians]
      PathPoint P1: pelvis (-0.0408 0.0304 0.1209)
      PathPoint P2: femur_r (-0.0218 -0.0117 0.0555)
    DeGrooteFregly2016Muscle glut_med2_r: max_isometric_force=573 optimal_fiber_length=0.0845 tendon_slack_length=0.053
        pennation_angle_at_optimal=0
      PathPoint P1: pelvis (-0.0855 0.0445 0.0766)
      PathPoint P2: femur_r (-0.0258 -0.0058 0.0527)
    DeGrooteFregly2016Muscle glut_med3_r: max_isometric_force=653 optimal_fiber_length=0.0646 tendon_slack_length=0.053
        pennation_angle_at_optimal=0.3316126
      PathPoint P1: pelvis (-0.1223 0.0105 0.0648)
      PathPoint P2: femur_r (-0.0309 -0.0047 0.0518)
    DeGrooteFregly2016Muscle glut_min1_r: max_isometric_force=270 optimal_fiber_length=0.068 tendon_slack_length=0.016
        pennation_angle_at_optimal=0.1745329
      PathPoint P1: pelvis (-0.0467 -0.008 0.1056)
      PathPoint P2: femur_r (-0.0072 -0.0104 0.056)
    DeGrooteFregly2016Muscle glut_min2_r: max_isometric_force=285 optimal_fiber_length=0.056 tendon_slack_length=0.026
        pennation_angle_at_optimal=0
      PathPoint P1: pelvis (-0.0633 -0.0065 0.0991)
      PathPoint P2: femur_r (-0.0096 -0.0104 0.056)
    DeGrooteFregly2016Muscle glut_min3_r: max_isometric_force=323 optimal_fiber_length=0.038 tendon_slack_length=0.051
        pennation_angle_at_optimal=0.01745329
      PathPoint P1: pelvis (-0.0834 -0.0063 0.0856)
      PathPoint P2: femur_r (-0.0135 -0.0083 0.055)
    DeGrooteFregly2016Muscle semimem_r: max_isometric_force=1288 optimal_fiber_length=0.08 tendon_slack_length=0.359
        pennation_angle_at_optimal=0.2617994
      PathPoint P1: pelvis (-0.1192 -0.09747 0.07151)
      ConditionalPathPoint P2: tibia_r (-0.0348 -0.03519 -0.01891) socket_coordinate=/jointset/knee_r/knee_angle_r
          range=(-0.5585054 0.1745329) [radians]
      PathPoint P3: tibia_r (-0.027 -0.04771 -0.01957)
    DeGrooteFregly2016Muscle semiten_r: max_isometric_force=410 optimal_fiber_length=0.201 tendon_slack_length=0.2555
        pennation_angle_at_optimal=0.08726646
      PathPoint P1: pelvis (-0.12635 -0.10988 0.06039)
      ConditionalPathPoint P2: tibia_r (-0.04203 -0.02859 -0.02277) socket_coordinate=/jointset/knee_r/knee_angle_r
          range=(-0.3316126 0.1745329)
      PathPoint P3: tibia_r (-0.03322 -0.05282 -0.02288)
      PathPoint P4: tibia_r (-0.0113 -0.0746 -0.0245)
      PathPoint P5: tibia_r (0.0027 -0.0956 -0.0193)
    DeGrooteFregly2016Muscle bifemlh_r: max_isometric_force=896 optimal_fiber_length=0.109 tendon_slack_length=0.326
        pennation_angle_at_optimal=0
      PathPoint P1: pelvis (-0.12596 -0.10257 0.06944)
      PathPoint P2: tibia_r (-0.0301 -0.036 0.02943)
      PathPoint P3: tibia_r (-0.0234 -0.0563 0.0343)
    DeGrooteFregly2016Muscle bifemsh_r: max_isometric_force=804 optimal_fiber_length=0.173 tendon_slack_length=0.089
        pennation_angle_at_optimal=0.4014257
      PathPoint P1: femur_r (0.005 -0.2111 0.0234)
      PathPoint P2: tibia_r (-0.0301 -0.036 0.02943)
      PathPoint P3: tibia_r (-0.0234 -0.0563 0.0343)
    DeGrooteFregly2016Muscle sar_r: max_isometric_force=156 optimal_fiber_length=0.52 tendon_slack_length=0.1
        pennation_angle_at_optimal=0
      PathPoint P1: pelvis (-0.0153 -0.0013 0.1242)
      PathPoint P2: femur_r (-0.003 -0.3568 -0.0421)
      PathPoint P3: tibia_r (-0.0056 -0.0419 -0.0399)
      PathPoint P4: tibia_r (0.006 -0.0589 -0.0383)
      PathPoint P5: tibia_r (0.0243 -0.084 -0.0252)
    DeGrooteFregly2016Muscle add_long_r: max_isometric_force=627 optimal_fiber_length=0.138 tendon_slack_length=0.11
        pennation_angle_at_optimal=0.1047198
      PathPoint P1: pelvis (-0.0316 -0.0836 0.0169)
      PathPoint P2: femur_r (0.005 -0.2111 0.0234)
    DeGrooteFregly2016Muscle add_brev_r: max_isometric_force=429 optimal_fiber_length=0.133 tendon_slack_length=0.02
        pennation_angle_at_optimal=0
      PathPoint P1: pelvis (-0.0587 -0.0915 0.0164)
      PathPoint P2: femur_r (0.0009 -0.1196 0.0294)
    DeGrooteFregly2016Muscle add_mag1_r: max_isometric_force=381 optimal_fiber_length=0.087 tendon_slack_length=0.06
        pennation_angle_at_optimal=0.08726646
      PathPoint P1: pelvis (-0.0732 -0.1174 0.0255)
      PathPoint P2: femur_r (-0.0045 -0.1211 0.0339)
    DeGrooteFregly2016Muscle add_mag2_r: max_isometric_force=343 optimal_fiber_length=0.121 tendon_slack_length=0.12
        pennation_angle_at_optimal=0.05235988
      PathPoint P1: pelvis (-0.0831 -0.1192 0.0308)
      PathPoint P2: femur_r (0.0054 -0.2285 0.0227)
    DeGrooteFregly2016Muscle add_mag3_r: max_isometric_force=488 optimal_fiber_length=0.131 tendon_slack_length=0.249
        pennation_angle_at_optimal=0.08726646
      PathPoint P1: pelvis (-0.11108 -0.11413 0.04882)
      PathPoint P2: femur_r (0.007 -0.3837 -0.0266)
    DeGrooteFregly2016Muscle tfl_r: max_isometric_force=233 optimal_fiber_length=0.095 tendon_slack_length=0.425
        pennation_angle_at_optimal=0.05235988
      PathPoint P1: pelvis (-0.0311 0.0214 0.1241)
      PathPoint P2: femur_r (0.0294 -0.0995 0.0597)
      PathPoint P3: femur_r (0.0054 -0.4049 0.0357)
      PathPoint P4: tibia_r (0.006 -0.0487 0.0297)
    DeGrooteFregly2016Muscle pect_r: max_isometric_force=266 optimal_fiber_length=0.1 tendon_slack_length=0.033
        pennation_angle_at_optimal=0
      PathPoint P1: pelvis (-0.0431 -0.0768 0.0451)
      PathPoint P2: femur_r (-0.0122 -0.0822 0.0253)
    DeGrooteFregly2016Muscle grac_r: max_isometric_force=162 optimal_fiber_length=0.352 tendon_slack_length=0.126
        pennation_angle_at_optimal=0.05235988
      PathPoint P1: pelvis (-0.07401 -0.1187 0.02794)
      ConditionalPathPoint P2: tibia_r (-0.02657 -0.0319 -0.03774) socket_coordinate=/jointset/knee_r/knee_angle_r
          range=(-0.4363323 0.1745329)
      PathPoint P3: tibia_r (-0.01943 -0.05153 -0.0358)
      PathPoint P4: tibia_r (0.006 -0.0836 -0.0228)
    DeGrooteFregly2016Muscle glut_max1_r: max_isometric_force=573 optimal_fiber_length=0.142 tendon_slack_length=0.125
        pennation_angle_at_optimal=0.08726646
      PathPoint P1: pelvis (-0.1195 0.0612 0.07)
      PathPoint P2: pelvis (-0.1291 0.0012 0.0886)
      PathPoint P3: femur_r (-0.0457 -0.0248 0.0392)
      PathPoint P4: femur_r (-0.0277 -0.0566 0.047)
    DeGrooteFregly2016Muscle glut_max2_r: max_isometric_force=819 optimal_fiber_length=0.147 tendon_slack_length=0.127
        pennation_angle_at_optimal=0
      PathPoint P1: pelvis (-0.1349 0.0176 0.0563)
      PathPoint P2: pelvis (-0.1376 -0.052 0.0914)
      PathPoint P3: femur_r (-0.0426 -0.053 0.0293)
      PathPoint P4: femur_r (-0.0156 -0.1016 0.0419)
    DeGrooteFregly2016Muscle glut_max3_r: max_isometric_force=552 optimal_fiber_length=0.144 tendon_slack_length=0.145
        pennation_angle_at_optimal=0.08726646
      PathPoint P1: pelvis (-0.1556 -0.0314 0.0058)
      PathPoint P2: pelvis (-0.1529 -0.1052 0.0403)
      PathPoint P3: femur_r (-0.0299 -0.1041 0.0135)
      PathPoint P4: femur_r (-0.006 -0.1419 0.0411)
    DeGrooteFregly2016Muscle iliacus_r: max_isometric_force=1073 optimal_fiber_length=0.1 tendon_slack_length=0.1
        pennation_angle_at_optimal=0.1221731
      PathPoint P1: pelvis (-0.0674 0.0365 0.0854)
      PathPoint P2: pelvis (-0.0258 -0.055 0.0811)
      ConditionalPathPoint P3: pelvis (-0.0288 -0.0805 0.0816) socket_coordinate=/jointset/hip_r/hip_flexion_r
          range=(-1.570796 0.7853982)
      PathPoint P4: femur_r (0.0017 -0.0543 0.0057)
      PathPoint P5: femur_r (-0.0193 -0.0621 0.0129)
    DeGrooteFregly2016Muscle psoas_r: max_isometric_force=1113 optimal_fiber_length=0.1 tendon_slack_length=0.16
        pennation_angle_at_optimal=0.1396263
      PathPoint P1: pelvis (-0.0647 0.0887 0.0289)
      PathPoint P2: pelvis (-0.0238 -0.057 0.0759)
      ConditionalPathPoint P3: pelvis (-0.0288 -0.0805 0.0816) socket_coordinate=/jointset/hip_r/hip_flexion_r
          range=(-1.570796 0.7853982)
      PathPoint P4: femur_r (0.0016 -0.0507 0.0038)
      PathPoint P5: femur_r (-0.0188 -0.0597 0.0104)
    DeGrooteFregly2016Muscle quad_fem_r: max_isometric_force=381 optimal_fiber_length=0.054 tendon_slack_length=0.024
        pennation_angle_at_optimal=0
      PathPoint P1: pelvis (-0.1143 -0.1151 0.052)
      PathPoint P2: femur_r (-0.0381 -0.0359 0.0366)
    DeGrooteFregly2016Muscle gem_r: max_isometric_force=164 optimal_fiber_length=0.024 tendon_slack_length=0.039
        pennation_angle_at_optimal=0
      PathPoint P1: pelvis (-0.1133 -0.082 0.0714)
      PathPoint P2: femur_r (-0.0142 -0.0033 0.0443)
    DeGrooteFregly2016Muscle peri_r: max_isometric_force=444 optimal_fiber_length=0.026 tendon_slack_length=0.115
        pennation_angle_at_optimal=0.1745329
      PathPoint P1: pelvis (-0.1396 0.0003 0.0235)
      PathPoint P2: pelvis (-0.1193 -0.0276 0.0657)
      PathPoint P3: femur_r (-0.0148 -0.0036 0.0437)
    DeGrooteFregly2016Muscle rect_fem_r: max_isometric_force=1169 optimal_fiber_length=0.114 tendon_slack_length=0.31
        pennation_angle_at_optimal=0.08726646
      PathPoint P1: pelvis (-0.0295 -0.0311 0.0968)
      ConditionalPathPoint P2: femur_r (0.0334 -0.403 0.0019) socket_coordinate=/jointset/knee_r/knee_angle_r
          range=(-2.617994 -1.459968)
      MovingPathPoint P3: tibia_r socket_x_coordinate=/jointset/knee_r/knee_angle_r
          socket_y_coordinate=/jointset/knee_r/knee_angle_r socket_z_coordinate=/jointset/knee_r/knee_angle_r
        x_location: SimmSpline: x=(-2.0944 -1.99997 -1.5708 -1.45752 -1.39626 -1.0472 -0.698132 -0.526391 -0.349066 -0.174533 0 0.00017453 0.00034907 0.0279253 0.0872665 0.174533 2.0944)
            y=(0.0155805 0.0179938 0.0275081 0.0296564 0.0307615 0.0365695 0.0422074 0.0450902 0.048391 0.0534299 0.0617576 0.0617669 0.0617762 0.0633083 0.066994 0.0733035 0.0573481)
        y_location: SimmSpline: x=(-2.0944 -1.99997 -1.5708 -1.45752 -1.39626 -1.0472 -0.698132 -0.526391 -0.349066 -0.174533 0 0.00017453 0.00034907 0.0279253 0.0872665 0.174533 2.0944)
            y=(0.0234116 0.0237613 0.0251141 0.0252795 0.0253146 0.0249184 0.0242373 0.0238447 0.0234197 0.0227644 0.020984 0.0209814 0.0209788 0.0205225 0.0191754 0.0159554 -0.0673774)
        z_location: SimmSpline: x=(-2.0944 0.1745) y=(0.0014 0.0014)
    DeGrooteFregly2016Muscle vas_med_r: max_isometric_force=1294 optimal_fiber_length=0.089 tendon_slack_length=0.126
        pennation_angle_at_optimal=0.08726646
      PathPoint P1: femur_r (0.014 -0.2099 0.0188)
      PathPoint P2: femur_r (0.0356 -0.2769 0.0009)
      ConditionalPathPoint P3: femur_r (0.037 -0.4048 -0.0125) socket_coordinate=/jointset/knee_r/knee_angle_r
          range=(-2.617994 -1.210037)
      ConditionalPathPoint P4: femur_r (0.0274 -0.4255 -0.0131) socket_coordinate=/jointset/knee_r/knee_angle_r
          range=(-2.617994 -1.780061)
      MovingPathPoint P5: tibia_r socket_x_coordinate=/jointset/knee_r/knee_angle_r
          socket_y_coordinate=/jointset/knee_r/knee_angle_r socket_z_coordinate=/jointset/knee_r/knee_angle_r
        x_location: SimmSpline: x=(-2.0944 -1.99997 -1.5708 -1.45752 -1.39626 -1.0472 -0.698132 -0.526391 -0.349066 -0.174533 0 0.00017453 0.00034907 0.0279253 0.0872665 0.174533 2.0944)
            y=(0.00981097 0.0122243 0.0217371 0.0238851 0.0249902 0.0307959 0.0364187 0.0392871 0.0425654 0.0475764 0.0559586 0.0559681 0.0559776 0.0575419 0.0613368 0.0679503 0.0629332)
        y_location: SimmSpline: x=(-2.0944 -1.99997 -1.5708 -1.45752 -1.39626 -1.0472 -0.698132 -0.526391 -0.349066 -0.174533 0 0.00017453 0.00034907 0.0279253 0.0872665 0.174533 2.0944)
            y=(0.0224154 0.0227651 0.0241265 0.0242933 0.0243287 0.0239462 0.0233593 0.0230677 0.0228342 0.0226362 0.0217917 0.0217903 0.0217889 0.0215365 0.0206842 0.0183269 -0.0656205)
        z_location: SimmSpline: x=(-2.0944 2.0944) y=(-0.0146 -0.0146)
    DeGrooteFregly2016Muscle vas_int_r: max_isometric_force=1365 optimal_fiber_length=0.087 tendon_slack_length=0.136
        pennation_angle_at_optimal=0.05235988
      PathPoint P1: femur_r (0.029 -0.1924 0.031)
      PathPoint P2: femur_r (0.0335 -0.2084 0.0285)
      ConditionalPathPoint P3: femur_r (0.0343 -0.403 0.0055) socket_coordinate=/jointset/knee_r/knee_angle_r
          range=(-2.617994 -1.42)
      MovingPathPoint P4: tibia_r socket_x_coordinate=/jointset/knee_r/knee_angle_r
          socket_y_coordinate=/jointset/knee_r/knee_angle_r socket_z_coordinate=/jointset/knee_r/knee_angle_r
        x_location: SimmSpline: x=(-2.0944 -1.99997 -1.5708 -1.45752 -1.39626 -1.0472 -0.698132 -0.526391 -0.349066 -0.174533 0 0.00017453 0.00034907 0.0279253 0.0872665 0.174533 2.0944)
            y=(0.0082733 0.0106866 0.0202042 0.022353 0.0234583 0.0292715 0.0349465 0.037871 0.0412569 0.0465287 0.0554632 0.0554735 0.0554837 0.0571717 0.061272 0.0684368 0.0648818)
        y_location: SimmSpline: x=(-2.0944 -1.99997 -1.5708 -1.45752 -1.39626 -1.0472 -0.698132 -0.526391 -0.349066 -0.174533 0 0.00017453 0.00034907 0.0279253 0.0872665 0.174533 2.0944)
            y=(0.025599 0.0259487 0.0273124 0.0274796 0.0275151 0.0271363 0.0265737 0.0263073 0.0261187 0.0260129 0.0252923 0.0252911 0.0252898 0.0250526 0.0242191 0.0218288 -0.0685706)
        z_location: SimmSpline: x=(-2.0944 2.0944) y=(0.0018 0.0018)
    DeGrooteFregly2016Muscle vas_lat_r: max_isometric_force=1871 optimal_fiber_length=0.084 tendon_slack_length=0.157
        pennation_angle_at_optimal=0.08726646
      PathPoint P1: femur_r (0.0048 -0.1854 0.0349)
      PathPoint P2: femur_r (0.0269 -0.2591 0.0409)
      ConditionalPathPoint P3: femur_r (0.0361 -0.403 0.0205) socket_coordinate=/jointset/knee_r/knee_angle_r
          range=(-2.617994 -1.210037)
      ConditionalPathPoint P4: femur_r (0.0253 -0.4243 0.0184) socket_coordinate=/jointset/knee_r/knee_angle_r
          range=(-2.617994 -1.920037)
      MovingPathPoint P5: tibia_r socket_x_coordinate=/jointset/knee_r/knee_angle_r
          socket_y_coordinate=/jointset/knee_r/knee_angle_r socket_z_coordinate=/jointset/knee_r/knee_angle_r
        x_location: SimmSpline: x=(-2.0944 -1.99997 -1.5708 -1.45752 -1.39626 -1.0472 -0.698132 -0.526391 -0.349066 -0.174533 0 0.00017453 0.00034907 0.0279253 0.0872665 0.174533 2.0944)
            y=(0.0142897 0.016703 0.0262145 0.0283623 0.0294674 0.0352709 0.0408785 0.0437291 0.0469704 0.0518742 0.0599557 0.0599647 0.0599738 0.0614577 0.0650351 0.0711867 0.0583766)
        y_location: SimmSpline: x=(-2.0944 -1.99997 -1.5708 -1.45752 -1.39626 -1.0472 -0.698132 -0.526391 -0.349066 -0.174533 0 0.00017453 0.00034907 0.0279253 0.0872665 0.174533 2.0944)
            y=(0.0215318 0.0218815 0.0232362 0.0234019 0.0234371 0.0230439 0.0223842 0.0220151 0.0216359 0.0210971 0.0195864 0.0195842 0.019582 0.01919 0.018008 0.0151073 -0.0653421)
        z_location: SimmSpline: x=(-2.0944 2.0944) y=(0.0165 0.0165)
    DeGrooteFregly2016Muscle med_gas_r: max_isometric_force=1558 optimal_fiber_length=0.06 tendon_slack_length=0.39
        pennation_angle_at_optimal=0.296706
      PathPoint P1: femur_r (-0.019 -0.3929 -0.0235)
      ConditionalPathPoint P2: femur_r (-0.03 -0.4022 -0.0258) socket_coordinate=/jointset/knee_r/knee_angle_r
          range=(-0.7853982 0.1745329)
      PathPoint P3: calcn_r (0 0.031 -0.0053)
    DeGrooteFregly2016Muscle lat_gas_r: max_isometric_force=683 optimal_fiber_length=0.064 tendon_slack_length=0.38
        pennation_angle_at_optimal=0.1396263
      PathPoint P1: femur_r (-0.022 -0.3946 0.0272)
      ConditionalPathPoint P2: femur_r (-0.03 -0.4018 0.0274) socket_coordinate=/jointset/knee_r/knee_angle_r
          range=(-0.7853982 0.1745329)
      PathPoint P3: calcn_r (0 0.031 -0.0053)
    DeGrooteFregly2016Muscle soleus_r: max_isometric_force=3549 optimal_fiber_length=0.05 tendon_slack_length=0.25
        pennation_angle_at_optimal=0.4363323
      PathPoint P1: tibia_r (-0.0024 -0.1533 0.0071)
      PathPoint P2: calcn_r (0 0.031 -0.0053)
    DeGrooteFregly2016Muscle tib_post_r: max_isometric_force=1588 optimal_fiber_length=0.031 tendon_slack_length=0.31
        pennation_angle_at_optimal=0.2094395
      PathPoint P1: tibia_r (-0.0094 -0.1348 0.0019)
      PathPoint P2: tibia_r (-0.0144 -0.4051 -0.0229)
      PathPoint P3: calcn_r (0.0417 0.0334 -0.0286)
      PathPoint P4: calcn_r (0.0772 0.0159 -0.0281)
    DeGrooteFregly2016Muscle flex_dig_r: max_isometric_force=310 optimal_fiber_length=0.034 tendon_slack_length=0.4
        pennation_angle_at_optimal=0.1221731
      PathPoint P1: tibia_r (-0.0083 -0.2046 -0.0018)
      PathPoint P2: tibia_r (-0.0154 -0.4051 -0.0196)
      PathPoint P3: calcn_r (0.0436 0.0315 -0.028)
      PathPoint P4: calcn_r (0.0708 0.0176 -0.0263)
      PathPoint P5: calcn_r (0.1658 -0.0081 0.0116)
      PathPoint P6: toes_r (-0.0019 -0.0078 0.0147)
      PathPoint P7: toes_r (0.0285 -0.0071 0.0215)
      PathPoint P8: toes_r (0.0441 -0.006 0.0242)
    DeGrooteFregly2016Muscle flex_hal_r: max_isometric_force=322 optimal_fiber_length=0.043 tendon_slack_length=0.38
        pennation_angle_at_optimal=0.1745329
      PathPoint P1: tibia_r (-0.0079 -0.2334 0.0244)
      PathPoint P2: tibia_r (-0.0186 -0.4079 -0.0174)
      PathPoint P3: calcn_r (0.0374 0.0276 -0.0241)
      PathPoint P4: calcn_r (0.1038 0.0068 -0.0256)
      PathPoint P5: calcn_r (0.1726 -0.0053 -0.0269)
      PathPoint P6: toes_r (0.0155 -0.0064 -0.0265)
      PathPoint P7: toes_r (0.0562 -0.0102 -0.0181)
    DeGrooteFregly2016Muscle tib_ant_r: max_isometric_force=905 optimal_fiber_length=0.098 tendon_slack_length=0.223
        pennation_angle_at_optimal=0.08726646
      PathPoint P1: tibia_r (0.0179 -0.1624 0.0115)
      PathPoint P2: tibia_r (0.0329 -0.3951 -0.0177)
      PathPoint P3: calcn_r (0.1166 0.0178 -0.0305)
    DeGrooteFregly2016Muscle per_brev_r: max_isometric_force=435 optimal_fiber_length=0.05 tendon_slack_length=0.161
        pennation_angle_at_optimal=0.08726646
      PathPoint P1: tibia_r (-0.007 -0.2646 0.0325)
      PathPoint P2: tibia_r (-0.0198 -0.4184 0.0283)
      PathPoint P3: tibia_r (-0.0144 -0.4295 0.0289)
      PathPoint P4: calcn_r (0.0471 0.027 0.0233)
      PathPoint P5: calcn_r (0.0677 0.0219 0.0343)
    DeGrooteFregly2016Muscle per_long_r: max_isometric_force=943 optimal_fiber_length=0.049 tendon_slack_length=0.345
        pennation_angle_at_optimal=0.1745329
      PathPoint P1: tibia_r (0.0005 -0.1568 0.0362)
      PathPoint P2: tibia_r (-0.0207 -0.4205 0.0286)
      PathPoint P3: tibia_r (-0.0162 -0.4319 0.0289)
      PathPoint P4: calcn_r (0.0438 0.023 0.0221)
      PathPoint P5: calcn_r (0.0681 0.0106 0.0284)
      PathPoint P6: calcn_r (0.0852 0.0069 0.0118)
      PathPoint P7: calcn_r (0.1203 0.0085 -0.0184)
    DeGrooteFregly2016Muscle per_tert_r: max_isometric_force=180 optimal_fiber_length=0.079 tendon_slack_length=0.1
        pennation_angle_at_optimal=0.2268928
      PathPoint P1: tibia_r (0.001 -0.2804 0.0231)
      PathPoint P2: tibia_r (0.0229 -0.4069 0.0159)
      PathPoint P3: calcn_r (0.0857 0.0228 0.0299)
    DeGrooteFregly2016Muscle ext_dig_r: max_isometric_force=512 optimal_fiber_length=0.102 tendon_slack_length=0.345
        pennation_angle_at_optimal=0.1396263
      PathPoint P1: tibia_r (0.0032 -0.1381 0.0276)
      PathPoint P2: tibia_r (0.0289 -0.4007 0.0072)
      PathPoint P3: calcn_r (0.0922 0.0388 -0.0001)
      PathPoint P4: calcn_r (0.1616 0.0055 0.013)
      PathPoint P5: toes_r (0.0003 0.0047 0.0153)
      PathPoint P6: toes_r (0.0443 -0.0004 0.025)
    DeGrooteFregly2016Muscle ext_hal_r: max_isometric_force=162 optimal_fiber_length=0.111 tendon_slack_length=0.305
        pennation_angle_at_optimal=0.1047198
      PathPoint P1: tibia_r (0.0012 -0.1767 0.0228)
      PathPoint P2: tibia_r (0.0326 -0.3985 -0.0085)
      PathPoint P3: calcn_r (0.097 0.0389 -0.0211)
      PathPoint P4: calcn_r (0.1293 0.0309 -0.0257)
      PathPoint P5: calcn_r (0.1734 0.0139 -0.028)
      PathPoint P6: toes_r (0.0298 0.0041 -0.0245)
      PathPoint P7: toes_r (0.0563 0.0034 -0.0186)
    DeGrooteFregly2016Muscle glut_med1_l: max_isometric_force=819 optimal_fiber_length=0.0535 tendon_slack_length=0.078
        pennation_angle_at_optimal=0.1396263
      PathPoint P1: pelvis (-0.0408 0.0304 -0.1209)
      PathPoint P2: femur_l (-0.0218 -0.0117 -0.0555)
    DeGrooteFregly2016Muscle glut_med2_l: max_isometric_force=573 optimal_fiber_length=0.0845 tendon_slack_length=0.053
        pennation_angle_at_optimal=0
      PathPoint P1: pelvis (-0.0855 0.0445 -0.0766)
      PathPoint P2: femur_l (-0.0258 -0.0058 -0.0527)
    DeGrooteFregly2016Muscle glut_med3_l: max_isometric_force=653 optimal_fiber_length=0.0646 tendon_slack_length=0.053
        pennation_angle_at_optimal=0.3316126
      PathPoint P1: pelvis (-0.1223 0.0105 -0.0648)
      PathPoint P2: femur_l (-0.0309 -0.0047 -0.0518)
    DeGrooteFregly2016Muscle glut_min1_l: max_isometric_force=270 optimal_fiber_length=0.068 tendon_slack_length=0.016
        pennation_angle_at_optimal=0.1745329
      PathPoint P1: pelvis (-0.0467 -0.008 -0.1056)
      PathPoint P2: femur_l (-0.0072 -0.0104 -0.056)
    DeGrooteFregly2016Muscle glut_min2_l: max_isometric_force=285 optimal_fiber_length=0.056 tendon_slack_length=0.026
        pennation_angle_at_optimal=0
      PathPoint P1: pelvis (-0.0633 -0.0065 -0.0991)
      PathPoint P2: femur_l (-0.0096 -0.0104 -0.056)
    DeGrooteFregly2016Muscle glut_min3_l: max_isometric_force=323 optimal_fiber_length=0.038 tendon_slack_length=0.051
        pennation_angle_at_optimal=0.01745329
      PathPoint P1: pelvis (-0.0834 -0.0063 -0.0856)
      PathPoint P2: femur_l (-0.0135 -0.0083 -0.055)
    DeGrooteFregly2016Muscle semimem_l: max_isometric_force=1288 optimal_fiber_length=0.08 tendon_slack_length=0.359
        pennation_angle_at_optimal=0.2617994
      PathPoint P1: pelvis (-0.1192 -0.09747 -0.07151)
      ConditionalPathPoint P2: tibia_l (-0.0348 -0.03519 0.01891) socket_coordinate=/jointset/knee_l/knee_angle_l
          range=(-0.5585054 0.1745329)
      PathPoint P3: tibia_l (-0.027 -0.04771 0.01957)
    DeGrooteFregly2016Muscle semiten_l: max_isometric_force=410 optimal_fiber_length=0.201 tendon_slack_length=0.2555
        pennation_angle_at_optimal=0.08726646
      PathPoint P1: pelvis (-0.12635 -0.10988 -0.06039)
      ConditionalPathPoint P2: tibia_l (-0.04203 -0.02859 0.02277) socket_coordinate=/jointset/knee_l/knee_angle_l
          range=(-0.3316126 0.1745329)
      PathPoint P3: tibia_l (-0.03322 -0.05282 0.02288)
      PathPoint P4: tibia_l (-0.0113 -0.0746 0.0245)
      PathPoint P5: tibia_l (0.0027 -0.0956 0.0193)
    DeGrooteFregly2016Muscle bifemlh_l: max_isometric_force=896 optimal_fiber_length=0.109 tendon_slack_length=0.326
        pennation_angle_at_optimal=0
      PathPoint P1: pelvis (-0.12596 -0.10257 -0.06944)
      PathPoint P2: tibia_l (-0.0301 -0.036 -0.02943)
      PathPoint P3: tibia_l (-0.0234 -0.0563 -0.0343)
    DeGrooteFregly2016Muscle bifemsh_l: max_isometric_force=804 optimal_fiber_length=0.173 tendon_slack_length=0.089
        pennation_angle_at_optimal=0.4014257
      PathPoint P1: femur_l (0.005 -0.2111 -0.0234)
      PathPoint P2: tibia_l (-0.0301 -0.036 -0.02943)
      PathPoint P3: tibia_l (-0.0234 -0.0563 -0.0343)
    DeGrooteFregly2016Muscle sar_l: max_isometric_force=156 optimal_fiber_length=0.52 tendon_slack_length=0.1
        pennation_angle_at_optimal=0
      PathPoint P1: pelvis (-0.0153 -0.0013 -0.1242)
      PathPoint P2: femur_l (-0.003 -0.3568 0.0421)
      PathPoint P3: tibia_l (-0.0056 -0.0419 0.0399)
      PathPoint P4: tibia_l (0.006 -0.0589 0.0383)
      PathPoint P5: tibia_l (0.0243 -0.084 0.0252)
    DeGrooteFregly2016Muscle add_long_l: max_isometric_force=627 optimal_fiber_length=0.138 tendon_slack_length=0.11
        pennation_angle_at_optimal=0.1047198
      PathPoint P1: pelvis (-0.0316 -0.0836 -0.0169)
      PathPoint P2: femur_l (0.005 -0.2111 -0.0234)
    DeGrooteFregly2016Muscle add_brev_l: max_isometric_force=429 optimal_fiber_length=0.133 tendon_slack_length=0.02
        pennation_angle_at_optimal=0
      PathPoint P1: pelvis (-0.0587 -0.0915 -0.0164)
      PathPoint P2: femur_l (0.0009 -0.1196 -0.0294)
    DeGrooteFregly2016Muscle add_mag1_l: max_isometric_force=381 optimal_fiber_length=0.087 tendon_slack_length=0.06
        pennation_angle_at_optimal=0.08726646
      PathPoint P1: pelvis (-0.0732 -0.1174 -0.0255)
      PathPoint P2: femur_l (-0.0045 -0.1211 -0.0339)
    DeGrooteFregly2016Muscle add_mag2_l: max_isometric_force=343 optimal_fiber_length=0.121 tendon_slack_length=0.12
        pennation_angle_at_optimal=0.05235988
      PathPoint P1: pelvis (-0.0831 -0.1192 -0.0308)
      PathPoint P2: femur_l (0.0054 -0.2285 -0.0227)
    DeGrooteFregly2016Muscle add_mag3_l: max_isometric_force=488 optimal_fiber_length=0.131 tendon_slack_length=0.249
        pennation_angle_at_optimal=0.08726646
      PathPoint P1: pelvis (-0.11108 -0.11413 -0.04882)
      PathPoint P2: femur_l (0.007 -0.3837 0.0266)
    DeGrooteFregly2016Muscle tfl_l: max_isometric_force=233 optimal_fiber_length=0.095 tendon_slack_length=0.425
        pennation_angle_at_optimal=0.05235988
      PathPoint P1: pelvis (-0.0311 0.0214 -0.1241)
      PathPoint P2: femur_l (0.0294 -0.0995 -0.0597)
      PathPoint P3: femur_l (0.0054 -0.4049 -0.0357)
      PathPoint P4: tibia_l (0.006 -0.0487 -0.0297)
    DeGrooteFregly2016Muscle pect_l: max_isometric_force=266 optimal_fiber_length=0.1 tendon_slack_length=0.033
        pennation_angle_at_optimal=0
      PathPoint P1: pelvis (-0.0431 -0.0768 -0.0451)
      PathPoint P2: femur_l (-0.0122 -0.0822 -0.0253)
    DeGrooteFregly2016Muscle grac_l: max_isometric_force=162 optimal_fiber_length=0.352 tendon_slack_length=0.126
        pennation_angle_at_optimal=0.05235988
      PathPoint P1: pelvis (-0.07401 -0.1187 -0.02794)
      ConditionalPathPoint P2: tibia_l (-0.02657 -0.0319 0.03774) socket_coordinate=/jointset/knee_l/knee_angle_l
          range=(-0.4363323 0.1745329)
      PathPoint P3: tibia_l (-0.01943 -0.05153 0.0358)
      PathPoint P4: tibia_l (0.006 -0.0836 0.0228)
    DeGrooteFregly2016Muscle glut_max1_l: max_isometric_force=573 optimal_fiber_length=0.142 tendon_slack_length=0.125
        pennation_angle_at_optimal=0.08726646
      PathPoint P1: pelvis (-0.1195 0.0612 -0.07)
      PathPoint P2: pelvis (-0.1291 0.0012 -0.0886)
      PathPoint P3: femur_l (-0.0457 -0.0248 -0.0392)
      PathPoint P4: femur_l (-0.0277 -0.0566 -0.047)
    DeGrooteFregly2016Muscle glut_max2_l: max_isometric_force=819 optimal_fiber_length=0.147 tendon_slack_length=0.127
        pennation_angle_at_optimal=0
      PathPoint P1: pelvis (-0.1349 0.0176 -0.0563)
      PathPoint P2: pelvis (-0.1376 -0.052 -0.0914)
      PathPoint P3: femur_l (-0.0426 -0.053 -0.0293)
      PathPoint P4: femur_l (-0.0156 -0.1016 -0.0419)
    DeGrooteFregly2016Muscle glut_max3_l: max_isometric_force=552 optimal_fiber_length=0.144 tendon_slack_length=0.145
        pennation_angle_at_optimal=0.08726646
      PathPoint P1: pelvis (-0.1556 -0.0314 -0.0058)
      PathPoint P2: pelvis (-0.1529 -0.1052 -0.0403)
      PathPoint P3: femur_l (-0.0299 -0.1041 -0.0135)
      PathPoint P4: femur_l (-0.006 -0.1419 -0.0411)
    DeGrooteFregly2016Muscle iliacus_l: max_isometric_force=1073 optimal_fiber_length=0.1 tendon_slack_length=0.1
        pennation_angle_at_optimal=0.1221731
      PathPoint P1: pelvis (-0.0674 0.0365 -0.0854)
      PathPoint P2: pelvis (-0.0258 -0.055 -0.0811)
      ConditionalPathPoint P3: pelvis (-0.0288 -0.0805 -0.0816) socket_coordinate=/jointset/hip_l/hip_flexion_l
          range=(-1.570796 0.7853982)
      PathPoint P4: femur_l (0.0017 -0.0543 -0.0057)
      PathPoint P5: femur_l (-0.0193 -0.0621 -0.0129)
    DeGrooteFregly2016Muscle psoas_l: max_isometric_force=1113 optimal_fiber_length=0.1 tendon_slack_length=0.16
        pennation_angle_at_optimal=0.1396263
      PathPoint P1: pelvis (-0.0647 0.0887 -0.0289)
      PathPoint P2: pelvis (-0.0238 -0.057 -0.0759)
      ConditionalPathPoint P3: pelvis (-0.0288 -0.0805 -0.0816) socket_coordinate=/jointset/hip_l/hip_flexion_l
          range=(-1.570796 0.7853982)
      PathPoint P4: femur_l (0.0016 -0.0507 -0.0038)
      PathPoint P5: femur_l (-0.0188 -0.0597 -0.0104)
    DeGrooteFregly2016Muscle quad_fem_l: max_isometric_force=381 optimal_fiber_length=0.054 tendon_slack_length=0.024
        pennation_angle_at_optimal=0
      PathPoint P1: pelvis (-0.1143 -0.1151 -0.052)
      PathPoint P2: femur_l (-0.0381 -0.0359 -0.0366)
    DeGrooteFregly2016Muscle gem_l: max_isometric_force=164 optimal_fiber_length=0.024 tendon_slack_length=0.039
        pennation_angle_at_optimal=0
      PathPoint P1: pelvis (-0.1133 -0.082 -0.0714)
      PathPoint P2: femur_l (-0.0142 -0.0033 -0.0443)
    DeGrooteFregly2016Muscle peri_l: max_isometric_force=444 optimal_fiber_length=0.026 tendon_slack_length=0.115
        pennation_angle_at_optimal=0.1745329
      PathPoint P1: pelvis (-0.1396 0.0003 -0.0235)
      PathPoint P2: pelvis (-0.1193 -0.0276 -0.0657)
      PathPoint P3: femur_l (-0.0148 -0.0036 -0.0437)
    DeGrooteFregly2016Muscle rect_fem_l: max_isometric_force=1169 optimal_fiber_length=0.114 tendon_slack_length=0.31
        pennation_angle_at_optimal=0.08726646
      PathPoint P1: pelvis (-0.0295 -0.0311 -0.0968)
      ConditionalPathPoint P2: femur_l (0.0334 -0.403 -0.0019) socket_coordinate=/jointset/knee_l/knee_angle_l
          range=(-2.617994 -1.459968)
      MovingPathPoint P3: tibia_l socket_x_coordinate=/jointset/knee_l/knee_angle_l
          socket_y_coordinate=/jointset/knee_l/knee_angle_l socket_z_coordinate=/jointset/knee_l/knee_angle_l
        x_location: SimmSpline: x=(-2.0944 -1.99997 -1.5708 -1.45752 -1.39626 -1.0472 -0.698132 -0.526391 -0.349066 -0.174533 0 0.00017453 0.00034907 0.0279253 0.0872665 0.174533 2.0944)
            y=(0.0155805 0.0179938 0.0275081 0.0296564 0.0307615 0.0365695 0.0422074 0.0450902 0.048391 0.0534299 0.0617576 0.0617669 0.0617762 0.0633083 0.066994 0.0733035 0.0573481)
        y_location: SimmSpline: x=(-2.0944 -1.99997 -1.5708 -1.45752 -1.39626 -1.0472 -0.698132 -0.526391 -0.349066 -0.174533 0 0.00017453 0.00034907 0.0279253 0.0872665 0.174533 2.0944)
            y=(0.0234116 0.0237613 0.0251141 0.0252795 0.0253146 0.0249184 0.0242373 0.0238447 0.0234197 0.0227644 0.020984 0.0209814 0.0209788 0.0205225 0.0191754 0.0159554 -0.0673774)
        z_location: SimmSpline: x=(-2.0944 0.1745) y=(-0.0014 -0.0014)
    DeGrooteFregly2016Muscle vas_med_l: max_isometric_force=1294 optimal_fiber_length=0.089 tendon_slack_length=0.126
        pennation_angle_at_optimal=0.08726646
      PathPoint P1: femur_l (0.014 -0.2099 -0.0188)
      PathPoint P2: femur_l (0.0356 -0.2769 -0.0009)
      ConditionalPathPoint P3: femur_l (0.037 -0.4048 0.0125) socket_coordinate=/jointset/knee_l/knee_angle_l
          range=(-2.617994 -1.210037)
      ConditionalPathPoint P4: femur_l (0.0274 -0.4255 0.0131) socket_coordinate=/jointset/knee_l/knee_angle_l
          range=(-2.617994 -1.780061)
      MovingPathPoint P5: tibia_l socket_x_coordinate=/jointset/knee_l/knee_angle_l
          socket_y_coordinate=/jointset/knee_l/knee_angle_l socket_z_coordinate=/jointset/knee_l/knee_angle_l
        x_location: SimmSpline: x=(-2.0944 -1.99997 -1.5708 -1.45752 -1.39626 -1.0472 -0.698132 -0.526391 -0.349066 -0.174533 0 0.00017453 0.00034907 0.0279253 0.0872665 0.174533 2.0944)
            y=(0.00981097 0.0122243 0.0217371 0.0238851 0.0249902 0.0307959 0.0364187 0.0392871 0.0425654 0.0475764 0.0559586 0.0559681 0.0559776 0.0575419 0.0613368 0.0679503 0.0629332)
        y_location: SimmSpline: x=(-2.0944 -1.99997 -1.5708 -1.45752 -1.39626 -1.0472 -0.698132 -0.526391 -0.349066 -0.174533 0 0.00017453 0.00034907 0.0279253 0.0872665 0.174533 2.0944)
            y=(0.0224154 0.0227651 0.0241265 0.0242933 0.0243287 0.0239462 0.0233593 0.0230677 0.0228342 0.0226362 0.0217917 0.0217903 0.0217889 0.0215365 0.0206842 0.0183269 -0.0656205)
        z_location: SimmSpline: x=(-2.0944 2.0944) y=(0.0146 0.0146)
    DeGrooteFregly2016Muscle vas_int_l: max_isometric_force=1365 optimal_fiber_length=0.087 tendon_slack_length=0.136
        pennation_angle_at_optimal=0.05235988
      PathPoint P1: femur_l (0.029 -0.1924 -0.031)
      PathPoint P2: femur_l (0.0335 -0.2084 -0.0285)
      ConditionalPathPoint P3: femur_l (0.0343 -0.403 -0.0055) socket_coordinate=/jointset/knee_l/knee_angle_l
          range=(-2.617994 -1.42)
      MovingPathPoint P4: tibia_l socket_x_coordinate=/jointset/knee_l/knee_angle_l
          socket_y_coordinate=/jointset/knee_l/knee_angle_l socket_z_coordinate=/jointset/knee_l/knee_angle_l
        x_location: SimmSpline: x=(-2.0944 -1.99997 -1.5708 -1.45752 -1.39626 -1.0472 -0.698132 -0.526391 -0.349066 -0.174533 0 0.00017453 0.00034907 0.0279253 0.0872665 0.174533 2.0944)
            y=(0.0155805 0.0179938 0.0275081 0.0296564 0.0307615 0.0365695 0.0422074 0.0450902 0.048391 0.0534299 0.0617576 0.0617669 0.0617762 0.0633083 0.066994 0.0733035 0.0573481)
        y_location: SimmSpline: x=(-2.0944 -1.99997 -1.5708 -1.45752 -1.39626 -1.0472 -0.698132 -0.526391 -0.349066 -0.174533 0 0.00017453 0.00034907 0.0279253 0.0872665 0.174533 2.0944)
            y=(0.0234116 0.0237613 0.0251141 0.0252795 0.0253146 0.0249184 0.0242373 0.0238447 0.0234197 0.0227644 0.020984 0.0209814 0.0209788 0.0205225 0.0191754 0.0159554 -0.0673774)
        z_location: SimmSpline: x=(-2.0944 0.1745) y=(-0.0014 -0.0014)
    DeGrooteFregly2016Muscle vas_lat_l: max_isometric_force=1871 optimal_fiber_length=0.084 tendon_slack_length=0.157
        pennation_angle_at_optimal=0.08726646
      PathPoint P1: femur_l (0.0048 -0.1854 -0.0349)
      PathPoint P2: femur_l (0.0269 -0.2591 -0.0409)
      ConditionalPathPoint P3: femur_l (0.0361 -0.403 -0.0205) socket_coordinate=/jointset/knee_l/knee_angle_l
          range=(-2.617994 -1.210037)
      ConditionalPathPoint P4: femur_l (0.0253 -0.4243 -0.0184) socket_coordinate=/jointset/knee_l/knee_angle_l
          range=(-2.617994 -1.920037)
      MovingPathPoint P5: tibia_l socket_x_coordinate=/jointset/knee_l/knee_angle_l
          socket_y_coordinate=/jointset/knee_l/knee_angle_l socket_z_coordinate=/jointset/knee_l/knee_angle_l
        x_location: SimmSpline: x=(-2.0944 -1.99997 -1.5708 -1.45752 -1.39626 -1.0472 -0.698132 -0.526391 -0.349066 -0.174533 0 0.00017453 0.00034907 0.0279253 0.0872665 0.174533 2.0944)
            y=(0.0142897 0.016703 0.0262145 0.0283623 0.0294674 0.0352709 0.0408785 0.0437291 0.0469704 0.0518742 0.0599557 0.0599647 0.0599738 0.0614577 0.0650351 0.0711867 0.0583766)
        y_location: SimmSpline: x=(-2.0944 -1.99997 -1.5708 -1.45752 -1.39626 -1.0472 -0.698132 -0.526391 -0.349066 -0.174533 0 0.00017453 0.00034907 0.0279253 0.0872665 0.174533 2.0944)
            y=(0.0215318 0.0218815 0.0232362 0.0234019 0.0234371 0.0230439 0.0223842 0.0220151 0.0216359 0.0210971 0.0195864 0.0195842 0.019582 0.01919 0.018008 0.0151073 -0.0653421)
        z_location: SimmSpline: x=(-2.0944 2.0944) y=(-0.0165 -0.0165)
    DeGrooteFregly2016Muscle med_gas_l: max_isometric_force=1558 optimal_fiber_length=0.06 tendon_slack_length=0.39
        pennation_angle_at_optimal=0.296706
      PathPoint P1: femur_l (-0.019 -0.3929 0.0235)
      ConditionalPathPoint P2: femur_l (-0.03 -0.4022 0.0258) socket_coordinate=/jointset/knee_l/knee_angle_l
          range=(-0.7853982 0.1745329)
      PathPoint P3: calcn_l (0 0.031 0.0053)
    DeGrooteFregly2016Muscle lat_gas_l: max_isometric_force=683 optimal_fiber_length=0.064 tendon_slack_length=0.38
        pennation_angle_at_optimal=0.1396263
      PathPoint P1: femur_l (-0.022 -0.3946 -0.0272)
      ConditionalPathPoint P2: femur_l (-0.03 -0.4018 -0.0274) socket_coordinate=/jointset/knee_l/knee_angle_l
          range=(-0.7853982 0.1745329)
      PathPoint P3: calcn_l (0 0.031 0.0053)
    DeGrooteFregly2016Muscle soleus_l: max_isometric_force=3549 optimal_fiber_length=0.05 tendon_slack_length=0.25
        pennation_angle_at_optimal=0.4363323
      PathPoint P1: tibia_l (-0.0024 -0.1533 -0.0071)
      PathPoint P2: calcn_l (0 0.031 0.0053)
    DeGrooteFregly2016Muscle tib_post_l: max_isometric_force=1588 optimal_fiber_length=0.031 tendon_slack_length=0.31
        pennation_angle_at_optimal=0.2094395
      PathPoint P1: tibia_l (-0.0094 -0.1348 -0.0019)
      PathPoint P2: tibia_l (-0.0144 -0.4051 0.0229)
      PathPoint P3: calcn_l (0.0417 0.0334 0.0286)
      PathPoint P4: calcn_l (0.0772 0.0159 0.0281)
    DeGrooteFregly2016Muscle flex_dig_l: max_isometric_force=310 optimal_fiber_length=0.034 tendon_slack_length=0.4
        pennation_angle_at_optimal=0.1221731
      PathPoint P1: tibia_l (-0.0083 -0.2046 0.0018)
      PathPoint P2: tibia_l (-0.0154 -0.4051 0.0196)
      PathPoint P3: calcn_l (0.0436 0.0315 0.028)
      PathPoint P4: calcn_l (0.0708 0.0176 0.0263)
      PathPoint P5: calcn_l (0.1658 -0.0081 -0.0116)
      PathPoint P6: toes_l (-0.0019 -0.0078 -0.0147)
      PathPoint P7: toes_l (0.0285 -0.0071 -0.0215)
      PathPoint P8: toes_l (0.0441 -0.006 -0.0242)
    DeGrooteFregly2016Muscle flex_hal_l: max_isometric_force=322 optimal_fiber_length=0.043 tendon_slack_length=0.38
        pennation_angle_at_optimal=0.1745329
      PathPoint P1: tibia_l (-0.0079 -0.2334 -0.0244)
      PathPoint P2: tibia_l (-0.0186 -0.4079 0.0174)
      PathPoint P3: calcn_l (0.0374 0.0276 0.0241)
      PathPoint P4: calcn_l (0.1038 0.0068 0.0256)
      PathPoint P5: calcn_l (0.1726 -0.0053 0.0269)
      PathPoint P6: toes_l (0.0155 -0.0064 0.0265)
      PathPoint P7: toes_l (0.0562 -0.0102 0.0181)
    DeGrooteFregly2016Muscle tib_ant_l: max_isometric_force=905 optimal_fiber_length=0.098 tendon_slack_length=0.223
        pennation_angle_at_optimal=0.08726646
      PathPoint P1: tibia_l (0.0179 -0.1624 -0.0115)
      PathPoint P2: tibia_l (0.0329 -0.3951 0.0177)
      PathPoint P3: calcn_l (0.1166 0.0178 0.0305)
    DeGrooteFregly2016Muscle per_brev_l: max_isometric_force=435 optimal_fiber_length=0.05 tendon_slack_length=0.161
        pennation_angle_at_optimal=0.08726646
      PathPoint P1: tibia_l (-0.007 -0.2646 -0.0325)
      PathPoint P2: tibia_l (-0.0198 -0.4184 -0.0283)
      PathPoint P3: tibia_l (-0.0144 -0.4295 -0.0289)
      PathPoint P4: calcn_l (0.0471 0.027 -0.0233)
      PathPoint P5: calcn_l (0.0677 0.0219 -0.0343)
    DeGrooteFregly2016Muscle per_long_l: max_isometric_force=943 optimal_fiber_length=0.049 tendon_slack_length=0.345
        pennation_angle_at_optimal=0.1745329
      PathPoint P1: tibia_l (0.0005 -0.1568 -0.0362)
      PathPoint P2: tibia_l (-0.0207 -0.4205 -0.0286)
      PathPoint P3: tibia_l (-0.0162 -0.4319 -0.0289)
      PathPoint P4: calcn_l (0.0438 0.023 -0.0221)
      PathPoint P5: calcn_l (0.0681 0.0106 -0.0284)
      PathPoint P6: calcn_l (0.0852 0.0069 -0.0118)
      PathPoint P7: calcn_l (0.1203 0.0085 0.0184)
    DeGrooteFregly2016Muscle per_tert_l: max_isometric_force=180 optimal_fiber_length=0.079 tendon_slack_length=0.1
        pennation_angle_at_optimal=0.2268928
      PathPoint P1: tibia_l (0.001 -0.2804 -0.0231)
      PathPoint P2: tibia_l (0.0229 -0.4069 -0.0159)
      PathPoint P3: calcn_l (0.0857 0.0228 -0.0299)
    DeGrooteFregly2016Muscle ext_dig_l: max_isometric_force=512 optimal_fiber_length=0.102 tendon_slack_length=0.345
        pennation_angle_at_optimal=0.1396263
      PathPoint P1: tibia_l (0.0032 -0.1381 -0.0276)
      PathPoint P2: tibia_l (0.0289 -0.4007 -0.0072)
      PathPoint P3: calcn_l (0.0922 0.0388 0.0001)
      PathPoint P4: calcn_l (0.1616 0.0055 -0.013)
      PathPoint P5: toes_l (0.0003 0.0047 -0.0153)
      PathPoint P6: toes_l (0.0443 -0.0004 -0.025)
    DeGrooteFregly2016Muscle ext_hal_l: max_isometric_force=162 optimal_fiber_length=0.111 tendon_slack_length=0.305
        pennation_angle_at_optimal=0.1047198
      PathPoint P1: tibia_l (0.0012 -0.1767 -0.0228)
      PathPoint P2: tibia_l (0.0326 -0.3985 0.0085)
      PathPoint P3: calcn_l (0.097 0.0389 0.0211)
      PathPoint P4: calcn_l (0.1293 0.0309 0.0257)
      PathPoint P5: calcn_l (0.1734 0.0139 0.028)
      PathPoint P6: toes_l (0.0298 0.0041 0.0245)
      PathPoint P7: toes_l (0.0563 0.0034 0.0186)
    DeGrooteFregly2016Muscle ercspn_r: max_isometric_force=2500 optimal_fiber_length=0.12 tendon_slack_length=0.03
        pennation_angle_at_optimal=0
      PathPoint P1: pelvis (-0.14 0.0439 0.0436)
      PathPoint P2: torso (-0.055 0.11 0.0241)
    DeGrooteFregly2016Muscle ercspn_l: max_isometric_force=2500 optimal_fiber_length=0.12 tendon_slack_length=0.03
        pennation_angle_at_optimal=0
      PathPoint P1: pelvis (-0.14 0.0439 -0.0436)
      PathPoint P2: torso (-0.055 0.11 -0.0241)
    DeGrooteFregly2016Muscle intobl_r: max_isometric_force=900 optimal_fiber_length=0.1 tendon_slack_length=0.1
        pennation_angle_at_optimal=0
      PathPoint P1: pelvis (-0.04 0.07 0.1157)
      PathPoint P2: torso (0.07 0.16 0.015)
    DeGrooteFregly2016Muscle intobl_l: max_isometric_force=900 optimal_fiber_length=0.1 tendon_slack_length=0.1
        pennation_angle_at_optimal=0
      PathPoint P1: pelvis (-0.04 0.07 -0.1157)
      PathPoint P2: torso (0.07 0.16 -0.015)
    DeGrooteFregly2016Muscle extobl_r: max_isometric_force=900 optimal_fiber_length=0.12 tendon_slack_length=0.14
        pennation_angle_at_optimal=0
      PathPoint P1: pelvis (-0.03 -0.0636 0.01)
      PathPoint P2: torso (0.065 0.11 0.11)
    DeGrooteFregly2016Muscle extobl_l: max_isometric_force=900 optimal_fiber_length=0.12 tendon_slack_length=0.14
        pennation_angle_at_optimal=0
      PathPoint P1: pelvis (-0.03 -0.0636 -0.01)
      PathPoint P2: torso (0.065 0.11 -0.11)
    ObjectGroup R_hip_abd
    ObjectGroup R_hip_flex
    ObjectGroup R_hip_inrot
    ObjectGroup R_hip_exrot
    ObjectGroup R_hip_ext
    ObjectGroup R_hip_add
    ObjectGroup R_knee_bend
    ObjectGroup R_knee_ext
    ObjectGroup R_ankle_pf
    ObjectGroup R_inverter
    ObjectGroup R_ankle_df
    ObjectGroup R_everter
    ObjectGroup L_hip_abd
    ObjectGroup L_hip_flex
    ObjectGroup L_hip_inrot
    ObjectGroup L_hip_exrot
    ObjectGroup L_hip_ext
    ObjectGroup L_hip_add
    ObjectGroup L_knee_bend
    ObjectGroup L_knee_ext
    ObjectGroup L_ankle_pf
    ObjectGroup L_inverter
    ObjectGroup L_ankle_df
    ObjectGroup L_everter
    ObjectGroup back_ext
    ObjectGroup back_rlb
    ObjectGroup back_introt
    ObjectGroup back_llb
    ObjectGroup back_extrot
    ObjectGroup back_flex
  MarkerSet:
    Marker Sternum: torso (0.1 0.24 0)
    Marker R.Acromium: torso (-0.03 0.42 0.15)
    Marker L.Acromium: torso (-0.03 0.42 -0.15)
    Marker C7: torso (-0.07 0.44 0)
    Marker T10: torso (-0.1 0.22 0)
    Marker Clavicle: torso (0.04 0.38 0)
    Marker RSJC: humerus_r (0 0 0)
    Marker R.Bicep: humerus_r (-0.04 -0.15 0)
    Marker RUA1: humerus_r (0 -0.05 0.02)
    Marker RUA2: humerus_r (0 -0.2 0.02)
    Marker RUA3: humerus_r (0.03 -0.13 0.02)
    Marker RUAmedial: humerus_r (-0.01 -0.25 -0.025)
    Marker R.Elbow: humerus_r (0.00729 -0.28128 0.06786)
    Marker RMEL: humerus_r (0.00175 -0.28389 -0.07029)
    Marker REJC: humerus_r (0.00584 -0.28069 -0.0002)
    Marker RFAsuperior: ulna_r (-0.02 -0.15 0.03)
    Marker RFAradius: radius_r (-0.02 -0.19312 0.032)
    Marker RFAulna: radius_r (-0.020531 -0.20672 -0.00839)
    Marker R.Wrist.Med: radius_r (-0.01531 -0.23272 -0.01839)
    Marker R.Wrist.Lat: radius_r (-0.00316 -0.22312 0.04988)
    Marker RWJC: radius_r (-0.01 -0.23187 0.017)
    Marker RHNknuckle: hand_r (-0.02193 -0.05913 0.00021)
    Marker RHNulna: hand_r (-0.03013 -0.02726 -0.01715)
    Marker RHNradius: hand_r (-0.01901 -0.02517 0.02667)
    Marker LSJC: humerus_l (0 0 0)
    Marker L.Bicep: humerus_l (-0.04 -0.15 0)
    Marker LUA1: humerus_l (0 -0.05 -0.02)
    Marker LUA2: humerus_l (0 -0.2 -0.02)
    Marker LUA3: humerus_l (0.03 -0.13 -0.02)
    Marker LUAmedial: humerus_l (-0.01 -0.25 0.025)
    Marker L.Elbow: humerus_l (0.00729 -0.28128 -0.06786)
    Marker LMEL: humerus_l (0.00175 -0.28389 0.07029)
    Marker LEJC: humerus_l (0.00584 -0.28069 0.0002)
    Marker LFAsuperior: ulna_l (-0.02 -0.15 -0.03)
    Marker LFAradius: radius_l (-0.02 -0.19312 -0.032)
    Marker LFAulna: radius_l (-0.020531 -0.20672 0.00839)
    Marker L.Wrist.Med: radius_l (-0.01531 -0.23272 0.01839)
    Marker L.Wrist.Lat: radius_l (-0.00316 -0.22312 -0.04988)
    Marker LWJC: radius_l (-0.01 -0.23187 -0.017)
    Marker LHNknuckle: hand_l (-0.02231 -0.05623 0.00042)
    Marker LHNulna: hand_l (-0.02793 -0.01641 0.0244)
    Marker LHNradius: hand_l (-0.00386 -0.02153 -0.0276)
    Marker R.ASIS: pelvis (0.02 0.03 0.128)
    Marker L.ASIS: pelvis (0.02 0.03 -0.128)
    Marker V.Sacral: pelvis (-0.16 0.04 0)
    Marker LHJC: pelvis (-0.0707 -0.0661 0.0835)
    Marker RHJC: pelvis (-0.0707 -0.0661 -0.0835)
    Marker R.Thigh.Upper: femur_r (0.018 -0.15 0.064)
    Marker R.Thigh.Rear: femur_r (0.08 -0.23 0.0047)
    Marker R.Thigh.Front: femur_r (0.01 -0.3 0.06)
    Marker R.Knee.Lat: femur_r (0 -0.404 0.05)
    Marker R.Knee.Med: femur_r (0 -0.404 -0.05)
    Marker RKJC: femur_r (0 -0.404 0)
    Marker R.Shank.Upper: tibia_r (0.005 -0.11 0.05)
    Marker R.Shank.Rear: tibia_r (0.05 -0.18 0)
    Marker R.Shank.Front: tibia_r (0.02 -0.35 0.05)
    Marker R.Ankle.Lat: tibia_r (-0.005 -0.41 0.053)
    Marker R.Ankle.Med: tibia_r (0.006 -0.3888 -0.038)
    Marker RAJC: tibia_r (0 -0.4 0)
    Marker R.Heel: calcn_r (-0.02 0.02 0)
    Marker R.Toe.Tip: calcn_r (0.18 0.03 0)
    Marker R.Midfoot.Lat: calcn_r (0.12 0.02 0.05)
    Marker R.Midfoot.Sup: calcn_r (0.12 0.04 0.05)
    Marker R.Toe.Lat: calcn_r (0.14 0.02 0.05)
    Marker R.Toe.Med: calcn_r (0.14 0.02 0.02)
    Marker L.Thigh.Upper: femur_l (0.018 -0.15 -0.064)
    Marker L.Thigh.Rear: femur_l (0.08 -0.23 -0.0047)
    Marker L.Thigh.Front: femur_l (0.01 -0.3 -0.06)
    Marker L.Knee.Lat: femur_l (0 -0.404 -0.05)
    Marker L.Knee.Med: femur_l (0 -0.404 0.05)
    Marker LKJC: femur_l (0 -0.404 0)
    Marker L.Shank.Upper: tibia_l (0.005 -0.11 -0.05)
    Marker L.Shank.Rear: tibia_l (0.05 -0.18 0)
    Marker L.Shank.Front: tibia_l (-0.02 -0.35 -0.05)
    Marker L.Ankle.Lat: tibia_l (-0.005 -0.41 -0.053)
    Marker L.Ankle.Med: tibia_l (0.006 -0.3888 0.038)
    Marker LAJC: tibia_l (0 -0.4 0)
    Marker L.Heel: calcn_l (-0.02 0.02 0)
    Marker L.Toe.Tip: calcn_l (0.18 0.03 0)
    Marker L.Midfoot.Lat: calcn_l (0.12 0.02 -0.05)
    Marker L.Midfoot.Sup: calcn_l (0.12 0.04 -0.05)
    Marker L.Toe.Lat: calcn_l (0.14 0.02 -0.05)
    Marker L.Toe.Med: calcn_l (0.14 0.02 -0.02)
