# OpenSim document version 30000
CMC_TaskSet gait2392_RRA:
  defaults: CMC_Joint default: on=false weight=(1 1 1) wrt_body=-1 express_body=-1 active=(false false false)
      kp=(1 1 1) kv=(1 1 1) ka=(1 1 1) r0=(0 0 0) r1=(0 0 0) r2=(0 0 0) limit=0
  # Pelvis
  CMC_Joint [values shared by the 29 below unless stated]: wrt_body=-1 express_body=-1 active=(true false false) kp=100
      kv=20
  CMC_Joint pelvis_tz: weight=1 coordinate=pelvis_tz
  CMC_Joint pelvis_tx: weight=1 coordinate=pelvis_tx
  CMC_Joint pelvis_ty: weight=1 coordinate=pelvis_ty
  CMC_Joint pelvis_tilt: weight=10 coordinate=pelvis_tilt
  CMC_Joint pelvis_list: weight=10 coordinate=pelvis_list
  CMC_Joint pelvis_rotation: weight=10 coordinate=pelvis_rotation
  # Right Leg
  CMC_Joint hip_flexion_r: weight=5 coordinate=hip_flexion_r
  CMC_Joint hip_adduction_r: weight=1 coordinate=hip_adduction_r
  CMC_Joint hip_rotation_r: weight=1 coordinate=hip_rotation_r
  CMC_Joint knee_angle_r: weight=50 coordinate=knee_angle_r
  CMC_Joint ankle_angle_r: weight=150 coordinate=ankle_angle_r
  CMC_Joint subtalar_angle_r: weight=100 coordinate=subtalar_angle_r
  # Left Leg
  CMC_Joint hip_flexion_l: weight=5 coordinate=hip_flexion_l
  CMC_Joint hip_adduction_l: weight=1 coordinate=hip_adduction_l
  CMC_Joint hip_rotation_l: weight=1 coordinate=hip_rotation_l
  CMC_Joint knee_angle_l: weight=50 coordinate=knee_angle_l
  CMC_Joint ankle_angle_l: weight=150 coordinate=ankle_angle_l
  CMC_Joint subtalar_angle_l: weight=100 coordinate=subtalar_angle_l
  # Back Joint
  CMC_Joint lumbar_extension: weight=5 coordinate=lumbar_extension
  CMC_Joint lumbar_bending: weight=5 coordinate=lumbar_bending
  CMC_Joint lumbar_rotation: weight=5 coordinate=lumbar_rotation
  # Upper Extremity
  CMC_Joint arm_flex_r: weight=1 coordinate=arm_flex_r
  CMC_Joint arm_add_r: weight=1 coordinate=arm_add_r
  CMC_Joint arm_rot_r: weight=1 coordinate=arm_rot_r
  CMC_Joint elbow_flex_r: weight=1 coordinate=elbow_flex_r
  CMC_Joint arm_flex_l: weight=1 coordinate=arm_flex_l
  CMC_Joint arm_add_l: weight=1 coordinate=arm_add_l
  CMC_Joint arm_rot_l: weight=1 coordinate=arm_rot_l
  CMC_Joint elbow_flex_l: weight=1 coordinate=elbow_flex_l
