# OpenSim document version 30000
Model AS_SCALED_ModelZ7c_1xFom:
  length_units: meters
  force_units: N
  gravity: 0 -9.80665 0
  credits:
    Rajagopal Model w/ torso, arms, updated knee, modified for movements involving high hip and knee flexion
  publications:
    Lai,A.K.M., Arnold, A.S., Wakeling, J.M. (2017) Why are antagonist muscles co-activated in my simulation? A musculoskeletal model for analysing human locomotor tasks. Annals of Biomedical Engineering
  defaults:
    CoordinateActuator default: optimal_force=300
    Millard2012EquilibriumMuscle default: min_control=0.01 max_control=1 optimal_force=1 max_isometric_force=546
        optimal_fiber_length=0.0535 tendon_slack_length=0.078 pennation_angle_at_optimal=0 [radians]
        max_contraction_velocity=15
  BodySet:
    Body ground: mass=0 mass_center=(0 0 0) inertia_xx=0 inertia_yy=0 inertia_zz=0
    Body pelvis: mass=11.72432 mass_center=(-0.0752929 0 0) inertia_xx=0.1160689 inertia_yy=0.09834238
        inertia_zz=0.06537341 meshes=(r_pelvis_Adrian.vtp l_pelvis_Adrian.vtp sacrum_Adrian.vtp)
      CustomJoint ground_pelvis: parent_body=ground location_in_parent=(0 0 0) location=(0 0 0)
        Coordinate pelvis_tilt: motion_type=rotational default_value=0 range=(-0.8727 0.8727) clamped=true
        Coordinate pelvis_list: motion_type=rotational default_value=0 range=(-0.8727 0.8727) clamped=true
        Coordinate pelvis_rotation: motion_type=rotational default_value=0 range=(-0.8727 0.8727) clamped=true
        Coordinate pelvis_tx: motion_type=translational default_value=0 range=(-5 10) clamped=true
        Coordinate pelvis_ty: motion_type=translational default_value=0.93 range=(0 2) clamped=true
        Coordinate pelvis_tz: motion_type=translational default_value=0 range=(-1 1) clamped=true
        SpatialTransform:
          TransformAxis rotation1: coordinates=pelvis_tilt axis=(0 0 1) LinearFunction(coefficients=1 0)
          TransformAxis rotation2: coordinates=pelvis_list axis=(1 0 0) LinearFunction(coefficients=1 0)
          TransformAxis rotation3: coordinates=pelvis_rotation axis=(0 1 0) LinearFunction(coefficients=1 0)
          TransformAxis translation1: coordinates=pelvis_tx axis=(1 0 0) LinearFunction(coefficients=1 0)
          TransformAxis translation2: coordinates=pelvis_ty axis=(0 1 0) LinearFunction(coefficients=1 0)
          TransformAxis translation3: coordinates=pelvis_tz axis=(0 0 1) LinearFunction(coefficients=1 0)
      WrapCylinder Gmax1_at_pelvis_r: xyz_body_rotation=(-0.6 0.45 0) translation=(-0.0820022 -0.105431 0.0649628)
          quadrant=-x radius=0.04259855 length=0.1597446
      WrapCylinder Gmax2_at_pelvis_r: xyz_body_rotation=(-0.75 0.39 0) translation=(-0.0851971 -0.088392 0.0724175)
          quadrant=all radius=0.04259855 length=0.1064964
      WrapCylinder Gmax3_at_pelvis_r: xyz_body_rotation=(-0.1 0 0) translation=(-0.088392 -0.0937168 0.0724175)
          quadrant=all radius=0.04259855 length=0.1064964
      WrapCylinder Gmax1_at_pelvis_l: xyz_body_rotation=(0.6 -0.45 0) translation=(-0.0820022 -0.105431 -0.0649628)
          quadrant=-x radius=0.04259855 length=0.1597446
      WrapCylinder Gmax2_at_pelvis_l: xyz_body_rotation=(0.75 -0.39 0) translation=(-0.0851971 -0.088392 -0.0724175)
          quadrant=all radius=0.04259855 length=0.1064964
      WrapCylinder Gmax3_at_pelvis_l: xyz_body_rotation=(0.1 0 0) translation=(-0.088392 -0.0937168 -0.0724175)
          quadrant=all radius=0.04259855 length=0.1064964
      WrapCylinder PS_at_brim_r: xyz_body_rotation=(-0.25 -0.27 0.1) translation=(-0.08 -0.0638978 0.0698616)
          quadrant=-y radius=0.056 length=0.1064964
      WrapCylinder PS_at_brim_l: xyz_body_rotation=(0.25 0.27 0.1) translation=(-0.08 -0.0638978 -0.0698616)
          quadrant=-y radius=0.056 length=0.1064964
      WrapCylinder IL_at_brim_r: xyz_body_rotation=(-0.32 -0.24 0.9) translation=(-0.0756124 -0.0692226 0.0805113)
          quadrant=-y radius=0.05846651 length=0.1064964
      WrapCylinder IL_at_brim_l: xyz_body_rotation=(0.32 0.24 0.9) translation=(-0.0756124 -0.0692226 -0.0805113)
          quadrant=-y radius=0.05846651 length=0.1064964
    Body femur_r: mass=9.259793 mass_center=(0 -0.166548 0) inertia_xx=0.1314955 inertia_yy=0.04064508
        inertia_zz=0.1314955 meshes=r_femur_Adrian.vtp
      CustomJoint hip_r: parent_body=pelvis location_in_parent=(-0.0599319 -0.083589 0.0822791) location=(0 0 0)
        Coordinate hip_flexion_r: motion_type=rotational default_value=2.332052e-9 range=(-0.5235988 2.094395)
            clamped=true
        Coordinate hip_adduction_r: motion_type=rotational default_value=-1.199293e-9 range=(-0.8726646 0.5235988)
            clamped=true
        Coordinate hip_rotation_r: motion_type=rotational default_value=0 range=(-0.6981317 0.6981317) clamped=true
        SpatialTransform: axes_held_at_zero=(translation1 translation2 translation3)
          TransformAxis rotation1: coordinates=hip_flexion_r axis=(0 0 1) LinearFunction(coefficients=1 0)
          TransformAxis rotation2: coordinates=hip_adduction_r axis=(1 0 0) LinearFunction(coefficients=1 0)
          TransformAxis rotation3: coordinates=hip_rotation_r axis=(0 1 0) LinearFunction(coefficients=1 0)
      WrapCylinder GasLat_at_condyles_r: translation=(0.00489846 -0.401674 0) quadrant=all radius=0.02547201
          length=0.1187293
      WrapCylinder GasMed_at_condyles_r: translation=(0.00489846 -0.401674 0) quadrant=all radius=0.02449232
          length=0.1187293
      WrapCylinder KnExt_at_fem_r: xyz_body_rotation=(-0.0623366 0.0507601 0)
          translation=(0.00351541 -0.394554 0.00248276) quadrant=all radius=0.02451081 length=0.1186072
      WrapCylinder KnExtVL_at_fem_r: xyz_body_rotation=(-0.0623366 0.0507601 0)
          translation=(0.00184993 -0.394554 0.00248276) quadrant=all radius=0.02451081 length=0.1186072
      WrapCylinder AB_at_femshaft_r: xyz_body_rotation=(1.66157 0.186644 0) translation=(0.014346 -0.110309 0.0277411)
          quadrant=all radius=0.01786532 length=0.06870589
      WrapCylinder AL_at_femshaft_r: xyz_body_rotation=(1.77711 0.136489 0) translation=(0.0301086 -0.2272 0.0179444)
          quadrant=all radius=0.02169983 length=0.09891041
      WrapCylinder AMprox_at_femshaft_r: xyz_body_rotation=(1.61126 0.18656 0)
          translation=(0.00507774 -0.0714145 0.0301608) quadrant=all radius=0.02285857 length=0.06860388
      WrapCylinder AMmid_at_femshaft_r: xyz_body_rotation=(1.61139 0.13656 0)
          translation=(0.0225452 -0.157447 0.0244395) quadrant=all radius=0.02318349 length=0.1176077
      WrapCylinder AMdist_at_femshaft_r: xyz_body_rotation=(1.71188 0.186636 0)
          translation=(0.0309647 -0.255441 0.0111185) quadrant=all radius=0.02358096 length=0.1968133
      WrapCylinder AMisch_at_condyles_r: xyz_body_rotation=(1.71115 -0.463363 0)
          translation=(-0.0221911 -0.369179 -0.00374516) quadrant=all radius=0.0432834 length=0.2359876
      WrapCylinder PECT_at_femshaft_r: xyz_body_rotation=(1.81295 0.276344 0)
          translation=(0.00596215 -0.0827869 0.0361418) quadrant=all radius=0.01617768 length=0.04959184
    Body tibia_r: mass=3.690915 mass_center=(0 -0.208071 0) inertia_xx=0.06188899 inertia_yy=0.005447066
        inertia_zz=0.06188899 meshes=(r_tibia_Adrian.vtp r_fibula_Adrian.vtp)
      CustomJoint walker_knee_r: parent_body=femur_r location_in_parent=(-0.004408617 -0.4012821 -0.002077763)
          orientation_in_parent=(-1.641568 1.446181 1.570796) location=(-0.009015514 -0.003939413 -0.0014293)
          orientation=(-1.641568 1.446181 1.570796)
        Coordinate knee_angle_r: motion_type=rotational default_value=4.877666e-5 range=(-0.0873 2.618) clamped=true
        SpatialTransform:
          TransformAxis rotation1: coordinates=knee_angle_r axis=(1 0 0) LinearFunction(coefficients=1 0)
          TransformAxis rotation2: coordinates=knee_angle_r axis=(0 0 1)
            SimmSpline: x=(0 0.174533 0.349066 0.523599 0.698132 0.872665 1.0472 1.22173 1.39626 1.5708 1.74533 1.91986 2.0944)
                y=(0 0.0126809 0.0226969 0.0296054 0.0332049 0.0335354 0.0308779 0.0257548 0.0189295 0.011407 0.00443314 -0.00050475 -0.0016782)
          TransformAxis rotation3: coordinates=knee_angle_r axis=(0 1 0)
            SimmSpline: x=(0 0.174533 0.349066 0.523599 0.698132 0.872665 1.0472 1.22173 1.39626 1.5708 1.74533 1.91986 2.0944)
                y=(0 0.059461 0.109399 0.150618 0.18392 0.210107 0.229983 0.24435 0.254012 0.25977 0.262428 0.262788 0.261654)
          TransformAxis translation1: coordinates=knee_angle_r axis=(1 0 0)
            MultiplierFunction: scale=0.9796927
              SimmSpline: x=(0 0.174533 0.349066 0.523599 0.698132 0.872665 1.0472 1.22173 1.39626 1.5708 1.74533 1.91986 2.0944)
                  y=(0 5.3e-5 0.000188 0.000378 0.000597 0.000825 0.001045 0.001247 0.00142 0.001558 0.001661 0.001728 0.00176)
          TransformAxis translation2: coordinates=knee_angle_r axis=(0 1 0)
            MultiplierFunction: scale=0.9796927
              SimmSpline: x=(0 0.174533 0.349066 0.523599 0.698132 0.872665 1.0472 1.22173 1.39626 1.5708 1.74533 1.91986 2.0944)
                  y=(0 0.000301 0.000143 -0.000401 -0.001233 -0.002243 -0.003316 -0.004346 -0.005239 -0.005924 -0.006361 -0.006539 -0.00648)
          TransformAxis translation3: coordinates=knee_angle_r axis=(0 0 1)
            MultiplierFunction: scale=1.187293
              SimmSpline: x=(0 0.174533 0.349066 0.523599 0.698132 0.872665 1.0472 1.22173 1.39626 1.5708 1.74533 1.91986 2.0944)
                  y=(0 0.001055 0.002061 0.00289 0.003447 0.003676 0.003559 0.00311 0.002373 0.001418 0.000329 -0.000805 -0.001898)
      WrapCylinder GasLat_at_shank_r: xyz_body_rotation=(2.96723 -0.279725 -1.47812)
          translation=(-0.00824705 -0.0824705 -0.00317678) quadrant=-y radius=0.06088948 length=0.09795489
      WrapCylinder GasMed_at_shank_r: xyz_body_rotation=(2.96723 0.0279725 -1.47812)
          translation=(-0.00824705 -0.0824705 -0.00317678) quadrant=-y radius=0.064 length=0.09676998
      WrapCylinder GR_at_condyles_r: xyz_body_rotation=(0 -0.4 0) translation=(-0.0033434 -0.0222893 0) quadrant=all
          radius=0.03973082 length=0.09871834
      WrapCylinder SM_at_condyles_r: xyz_body_rotation=(0 -0.1 0) translation=(-0.00111447 -0.0222893 0) quadrant=all
          radius=0.03842473 length=0.09642908
      WrapCylinder ST_at_condyles_r: xyz_body_rotation=(0 -0.2 0) translation=(-0.00222893 -0.0228465 0) quadrant=all
          radius=0.04724584 length=0.09691024
      WrapCylinder BF140_at_gastroc_r: translation=(-0.0434642 -0.0668679 0) quadrant=y radius=0.0323195
          length=0.144399
    Body patella_r: mass=0.08581441 mass_center=(0.0018 0.0264 0) inertia_xx=2.857162e-6 inertia_yy=1.305136e-5
        inertia_zz=1.305136e-5 meshes=r_patella_Adrian.vtp
      CustomJoint patellofemoral_r: parent_body=femur_r location_in_parent=(-0.007925714 -0.3996754 -0.003265057)
          location=(0 0 0)
        Coordinate knee_angle_r_beta: motion_type=rotational default_value=4.877666e-5 range=(-99999.9 99999.9)
            clamped=false
        SpatialTransform: axes_held_at_zero=(rotation2 rotation3)
          TransformAxis rotation1: coordinates=knee_angle_r_beta axis=(0 0 1)
            SimmSpline f11: x=(0 0.174533 0.349066 0.523599 0.698132 0.872665 1.0472 1.22173 1.39626 1.5708 1.74533 1.91986 2.0944)
                y=(0.00113686 -0.00629212 -0.105582 -0.253683 -0.414245 -0.579047 -0.747244 -0.91799 -1.09044 -1.26379 -1.43763 -1.61186 -1.78634)
          TransformAxis translation1: coordinates=knee_angle_r_beta axis=(1 0 0)
            MultiplierFunction: scale=0.9796927
              SimmSpline f9: x=(0 0.174533 0.349066 0.523599 0.698132 0.872665 1.0472 1.22173 1.39626 1.5708 1.74533 1.91986 2.0944)
                  y=(0.0524 0.0488 0.0437 0.0371 0.0296 0.0216 0.0136 0.0057 -0.0019 -0.0088 -0.0148 -0.0196 -0.0227)
          TransformAxis translation2: coordinates=knee_angle_r_beta axis=(0 1 0)
            MultiplierFunction: scale=0.9796927
              SimmSpline f10: x=(0 0.174533 0.349066 0.523599 0.698132 0.872665 1.0472 1.22173 1.39626 1.5708 1.74533 1.91986 2.0944)
                  y=(-0.0108 -0.019 -0.0263 -0.0322 -0.0367 -0.0395 -0.0408 -0.0404 -0.0384 -0.0349 -0.0301 -0.0245 -0.0187)
          TransformAxis translation3: axis=(0 0 1) MultiplierFunction(scale=1.187293, Constant(value=0.00275))
    Body talus_r: mass=0.09955268 mass_center=(0 0 0) inertia_xx=0.001068052 inertia_yy=0.001152265
        inertia_zz=0.001152265 meshes=r_talus_Adrian.vtp
      PinJoint ankle_r: parent_body=tibia_r location_in_parent=(-0.01114466 -0.4457862 0)
          orientation_in_parent=(0.1758952 -0.105208 0.01866219) location=(0 0 0)
          orientation=(0.1758952 -0.105208 0.01866219)
        Coordinate ankle_angle_r: motion_type=rotational default_value=-1.182866e-9 range=(-0.8727 0.6981) clamped=true
    Body calcn_r: mass=1.244408 mass_center=(0.088447 0.0265341 0) inertia_xx=0.00143856 inertia_yy=0.003211403
        inertia_zz=0.003211403 meshes=r_foot_Adrian.vtp
      PinJoint subtalar_r: parent_body=talus_r location_in_parent=(-0.05435249 -0.04675183 0.007624266)
          orientation_in_parent=(-1.768191 0.906223 1.819602) location=(0 0 0)
          orientation=(-1.768191 0.906223 1.819602)
        Coordinate subtalar_angle_r: motion_type=rotational default_value=0 range=(-0.6108652 0.6108652) clamped=true
    Body toes_r: mass=0.2156311 mass_center=(0.0306027 0.00530682 -0.0204222) inertia_xx=0.0001027543
        inertia_yy=0.0001681954 inertia_zz=0.0001681954 meshes=r_bofoot_Adrian.vtp
      PinJoint mtp_r: parent_body=calcn_r location_in_parent=(0.1581433 -0.001768941 0.001260339)
          orientation_in_parent=(-3.141593 0.6199005 0) location=(0 0 0) orientation=(-3.141593 0.6199005 0)
        Coordinate mtp_angle_r: motion_type=rotational default_value=0 range=(-0.8727 1.0472) clamped=true
            prescribed=true
          prescribed_function: SimmSpline: x=(0 0.0083 0.0167 0.025 0.0333 0.0417 0.05 0.0583 0.0667 0.075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)
              y=(-0.3846 -0.3967 -0.409 -0.4212 -0.4317 -0.4379 -0.4366 -0.425 -0.4017 -0.3672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)
      WrapCylinder rPF: xyz_body_rotation=(0 -0.62 0) translation=(0 0 0) quadrant=all radius=0.01 length=0.1
    Body femur_l: mass=9.259793 mass_center=(0 -0.166548 0) inertia_xx=0.1314955 inertia_yy=0.04064508
        inertia_zz=0.1314955 meshes=l_femur_Adrian.vtp
      CustomJoint hip_l: parent_body=pelvis location_in_parent=(-0.0599319 -0.083589 -0.0822791) location=(0 0 0)
        Coordinate hip_flexion_l: motion_type=rotational default_value=2.332052e-9 range=(-0.5235988 2.094395)
            clamped=true
        Coordinate hip_adduction_l: motion_type=rotational default_value=-1.199293e-9 range=(-0.8726646 0.5235988)
            clamped=true
        Coordinate hip_rotation_l: motion_type=rotational default_value=0 range=(-0.6981317 0.6981317) clamped=true
        SpatialTransform: axes_held_at_zero=(translation1 translation2 translation3)
          TransformAxis rotation1: coordinates=hip_flexion_l axis=(0 0 1) LinearFunction(coefficients=1 0)
          TransformAxis rotation2: coordinates=hip_adduction_l axis=(1 0 0) LinearFunction(coefficients=-1 0)
          TransformAxis rotation3: coordinates=hip_rotation_l axis=(0 1 0) LinearFunction(coefficients=-1 0)
      WrapCylinder GasLat_at_condyles_l: translation=(0.00489846 -0.401674 0) quadrant=all radius=0.02547201
          length=0.1187293
      WrapCylinder GasMed_at_condyles_l: translation=(0.00489846 -0.401674 0) quadrant=all radius=0.02449232
          length=0.1187293
      WrapCylinder KnExt_at_fem_l: xyz_body_rotation=(0.0623366 -0.0507601 0)
          translation=(0.00351541 -0.394554 -0.00248276) quadrant=all radius=0.02451081 length=0.1186072
      WrapCylinder KnExtVL_at_fem_l: xyz_body_rotation=(0.0623366 -0.0507601 0)
          translation=(0.00184993 -0.394554 -0.00248276) quadrant=all radius=0.02451081 length=0.1186072
      WrapCylinder AB_at_femshaft_l: xyz_body_rotation=(-1.66157 -0.186644 0)
          translation=(0.014346 -0.110309 -0.0277411) quadrant=all radius=0.01786532 length=0.06870589
      WrapCylinder AL_at_femshaft_l: xyz_body_rotation=(-1.77711 -0.136489 0)
          translation=(0.0301086 -0.2272 -0.0179444) quadrant=all radius=0.02169983 length=0.09891041
      WrapCylinder AMprox_at_femshaft_l: xyz_body_rotation=(-1.61126 -0.18656 0)
          translation=(0.00507774 -0.0714145 -0.0301608) quadrant=all radius=0.02285857 length=0.06860388
      WrapCylinder AMmid_at_femshaft_l: xyz_body_rotation=(-1.61139 -0.13656 0)
          translation=(0.0225452 -0.157447 -0.0244395) quadrant=all radius=0.02318349 length=0.1176077
      WrapCylinder AMdist_at_femshaft_l: xyz_body_rotation=(-1.71188 -0.186636 0)
          translation=(0.0309647 -0.255441 -0.0111185) quadrant=all radius=0.02358096 length=0.1968133
      WrapCylinder AMisch_at_condyles_l: xyz_body_rotation=(-1.71115 0.463363 0)
          translation=(-0.0221911 -0.369179 0.00374516) quadrant=all radius=0.0432834 length=0.2359876
      WrapCylinder PECT_at_femshaft_l: xyz_body_rotation=(-1.81295 -0.276344 0)
          translation=(0.00596215 -0.0827869 -0.0361418) quadrant=all radius=0.01617768 length=0.04959184
    Body tibia_l: mass=3.690915 mass_center=(0 -0.208071 0) inertia_xx=0.06188899 inertia_yy=0.005447066
        inertia_zz=0.06188899 meshes=(l_tibia_Adrian.vtp l_fibula_Adrian.vtp)
      CustomJoint walker_knee_l: parent_body=femur_l location_in_parent=(-0.004408617 -0.4012821 0.002077763)
          orientation_in_parent=(1.641568 -1.446181 1.570796) location=(-0.009015514 -0.003939413 0.0014293)
          orientation=(1.641568 -1.446181 1.570796)
        Coordinate knee_angle_l: motion_type=rotational default_value=4.877992e-5 range=(-0.0873 2.618) clamped=true
        SpatialTransform:
          TransformAxis rotation1: coordinates=knee_angle_l axis=(-1 0 0) LinearFunction(coefficients=1 0)
          TransformAxis rotation2: coordinates=knee_angle_l axis=(0 0 1)
            SimmSpline: x=(0 0.174533 0.349066 0.523599 0.698132 0.872665 1.0472 1.22173 1.39626 1.5708 1.74533 1.91986 2.0944)
                y=(0 0.0126809 0.0226969 0.0296054 0.0332049 0.0335354 0.0308779 0.0257548 0.0189295 0.011407 0.00443314 -0.00050475 -0.0016782)
          TransformAxis rotation3: coordinates=knee_angle_l axis=(0 1 0)
            SimmSpline: x=(0 0.174533 0.349066 0.523599 0.698132 0.872665 1.0472 1.22173 1.39626 1.5708 1.74533 1.91986 2.0944)
                y=(0 -0.059461 -0.109399 -0.150618 -0.18392 -0.210107 -0.229983 -0.24435 -0.254012 -0.25977 -0.262428 -0.262788 -0.261654)
          TransformAxis translation1: coordinates=knee_angle_l axis=(1 0 0)
            MultiplierFunction: scale=0.9796927
              SimmSpline: x=(0 0.174533 0.349066 0.523599 0.698132 0.872665 1.0472 1.22173 1.39626 1.5708 1.74533 1.91986 2.0944)
                  y=(0 5.3e-5 0.000188 0.000378 0.000597 0.000825 0.001045 0.001247 0.00142 0.001558 0.001661 0.001728 0.00176)
          TransformAxis translation2: coordinates=knee_angle_l axis=(0 1 0)
            MultiplierFunction: scale=0.9796927
              SimmSpline: x=(0 0.174533 0.349066 0.523599 0.698132 0.872665 1.0472 1.22173 1.39626 1.5708 1.74533 1.91986 2.0944)
                  y=(0 0.000301 0.000143 -0.000401 -0.001233 -0.002243 -0.003316 -0.004346 -0.005239 -0.005924 -0.006361 -0.006539 -0.00648)
          TransformAxis translation3: coordinates=knee_angle_l axis=(0 0 1)
            MultiplierFunction: scale=1.187293
              SimmSpline: x=(0 0.174533 0.349066 0.523599 0.698132 0.872665 1.0472 1.22173 1.39626 1.5708 1.74533 1.91986 2.0944)
                  y=(0 -0.001055 -0.002061 -0.00289 -0.003447 -0.003676 -0.003559 -0.00311 -0.002373 -0.001418 -0.000329 0.000805 0.001898)
      WrapCylinder GasLat_at_shank_l: xyz_body_rotation=(-2.96723 0.279725 -1.47812)
          translation=(-0.00824705 -0.0824705 0.00317678) quadrant=-y radius=0.06088948 length=0.09795489
      WrapCylinder GasMed_at_shank_l: xyz_body_rotation=(-2.96723 -0.0279725 -1.47812)
          translation=(-0.00824705 -0.0824705 0.00317678) quadrant=-y radius=0.064 length=0.09676998
      WrapCylinder GR_at_condyles_l: xyz_body_rotation=(0 0.4 0) translation=(-0.0033434 -0.0222893 0) quadrant=all
          radius=0.03973082 length=0.09871834
      WrapCylinder SM_at_condyles_l: xyz_body_rotation=(0 0.1 0) translation=(-0.00111447 -0.0222893 0) quadrant=all
          radius=0.03842473 length=0.09642908
      WrapCylinder ST_at_condyles_l: xyz_body_rotation=(0 0.2 0) translation=(-0.00222893 -0.0228465 0) quadrant=all
          radius=0.04724584 length=0.09691024
      WrapCylinder BF140_at_gastroc_l: translation=(-0.0434642 -0.0668679 0) quadrant=all radius=0.0323195
          length=0.144399
    Body patella_l: mass=0.08581441 mass_center=(0.0018 0.0264 0) inertia_xx=2.857162e-6 inertia_yy=1.305136e-5
        inertia_zz=1.305136e-5 meshes=l_patella_Adrian.vtp
      CustomJoint patellofemoral_l: parent_body=femur_l location_in_parent=(-0.007925714 -0.3996754 0.003265057)
          location=(0 0 0)
        Coordinate knee_angle_l_beta: motion_type=rotational default_value=4.877992e-5 range=(-99999.9 99999.9)
            clamped=false
        SpatialTransform: axes_held_at_zero=(rotation2 rotation3)
          TransformAxis rotation1: coordinates=knee_angle_l_beta axis=(0 0 1)
            SimmSpline f25: x=(0 0.174533 0.349066 0.523599 0.698132 0.872665 1.0472 1.22173 1.39626 1.5708 1.74533 1.91986 2.0944)
                y=(0.00113686 -0.00629212 -0.105582 -0.253683 -0.414245 -0.579047 -0.747244 -0.91799 -1.09044 -1.26379 -1.43763 -1.61186 -1.78634)
          TransformAxis translation1: coordinates=knee_angle_l_beta axis=(1 0 0)
            MultiplierFunction: scale=0.9796927
              SimmSpline f23: x=(0 0.174533 0.349066 0.523599 0.698132 0.872665 1.0472 1.22173 1.39626 1.5708 1.74533 1.91986 2.0944)
                  y=(0.0524 0.0488 0.0437 0.0371 0.0296 0.0216 0.0136 0.0057 -0.0019 -0.0088 -0.0148 -0.0196 -0.0227)
          TransformAxis translation2: coordinates=knee_angle_l_beta axis=(0 1 0)
            MultiplierFunction: scale=0.9796927
              SimmSpline f24: x=(0 0.174533 0.349066 0.523599 0.698132 0.872665 1.0472 1.22173 1.39626 1.5708 1.74533 1.91986 2.0944)
                  y=(-0.0108 -0.019 -0.0263 -0.0322 -0.0367 -0.0395 -0.0408 -0.0404 -0.0384 -0.0349 -0.0301 -0.0245 -0.0187)
          TransformAxis translation3: axis=(0 0 1) MultiplierFunction(scale=1.187293, Constant(value=-0.00275))
    Body talus_l: mass=0.09955268 mass_center=(0 0 0) inertia_xx=0.001068052 inertia_yy=0.001152265
        inertia_zz=0.001152265 meshes=l_talus_Adrian.vtp
      PinJoint ankle_l: parent_body=tibia_l location_in_parent=(-0.01114466 -0.4457862 0)
          orientation_in_parent=(-0.1758952 0.105208 0.01866219) location=(0 0 0)
          orientation=(-0.1758952 0.105208 0.01866219)
        Coordinate ankle_angle_l: motion_type=rotational default_value=8.352658e-11 range=(-0.8727 0.6981) clamped=true
    Body calcn_l: mass=1.244408 mass_center=(0.088447 0.0265341 0) inertia_xx=0.00143856 inertia_yy=0.003211403
        inertia_zz=0.003211403 meshes=l_foot_Adrian.vtp
      PinJoint subtalar_l: parent_body=talus_l location_in_parent=(-0.05435249 -0.04675183 -0.007624266)
          orientation_in_parent=(1.768191 -0.906223 1.819602) location=(0 0 0)
          orientation=(1.768191 -0.906223 1.819602)
        Coordinate subtalar_angle_l: motion_type=rotational default_value=0 range=(-0.6108652 0.6108652) clamped=true
    Body toes_l: mass=0.2156311 mass_center=(0.0306027 0.00530682 0.0204222) inertia_xx=0.0001027543
        inertia_yy=0.0001681954 inertia_zz=0.0001681954 meshes=l_bofoot_Adrian.vtp
      PinJoint mtp_l: parent_body=calcn_l location_in_parent=(0.1581433 -0.001768941 -0.001260339)
          orientation_in_parent=(-3.141593 -0.6199005 0) location=(0 0 0) orientation=(-3.141593 -0.6199005 0)
        Coordinate mtp_angle_l: motion_type=rotational default_value=0 range=(-0.8727 1.0472) clamped=true
            prescribed=true
          prescribed_function: SimmSpline: x=(0 0.0083 0.0167 0.025 0.0333 0.0417 0.05 0.0583 0.0667 0.075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)
              y=(-0.1309 -0.1303 -0.1308 -0.1333 -0.1377 -0.1437 -0.1503 -0.1561 -0.1603 -0.1623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)
      WrapCylinder lPF: xyz_body_rotation=(0 0.62 0) translation=(0 0 0) quadrant=all radius=0.01 length=0.1
    Body torso: mass=26.7066 mass_center=(-0.0322461 0.343958 0) inertia_xx=1.665673 inertia_yy=0.8084317
        inertia_zz=1.665673
        meshes=(hat_spine_Adrian.vtp hat_jaw_Adrian.vtp hat_skull_Adrian.vtp hat_ribs_scap_Adrian.vtp)
      CustomJoint back: parent_body=pelvis location_in_parent=(-0.1072418 0.08679454 0) location=(0 0 0)
        Coordinate lumbar_extension: motion_type=rotational default_value=0 range=(-0.8727 0.8727) clamped=true
        Coordinate lumbar_bending: motion_type=rotational default_value=0 range=(-0.8727 0.8727) clamped=true
        Coordinate lumbar_rotation: motion_type=rotational default_value=0 range=(-0.8727 0.8727) clamped=true
        SpatialTransform: axes_held_at_zero=(translation1 translation2 translation3)
          TransformAxis rotation1: coordinates=lumbar_extension axis=(0 0 1) LinearFunction(coefficients=1 0)
          TransformAxis rotation2: coordinates=lumbar_bending axis=(1 0 0) LinearFunction(coefficients=1 0)
          TransformAxis rotation3: coordinates=lumbar_rotation axis=(0 1 0) LinearFunction(coefficients=1 0)
    Body humerus_r: mass=2.023408 mass_center=(0 -0.172817 0) inertia_xx=0.01312521 inertia_yy=0.004527791
        inertia_zz=0.01473262 meshes=humerus_rv_Adrian.vtp
      CustomJoint acromial_r: parent_body=torso location_in_parent=(0.003391215 0.3993142 0.17) location=(0 0 0)
        Coordinate arm_flex_r: motion_type=rotational default_value=0 range=(-1.570796 1.570796) clamped=true
        Coordinate arm_add_r: motion_type=rotational default_value=-0.35 range=(-1.5708 -0.1745) clamped=true
          prescribed_function: SimmSpline: x=(0 0.0083 0.0167 0.025 0.0333 0.0417 0.05 0.0583 0.0667 0.075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)
              y=(-0.2024 -0.203 -0.2042 -0.2063 -0.2098 -0.2149 -0.2215 -0.2297 -0.2394 -0.2504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)
        Coordinate arm_rot_r: motion_type=rotational default_value=0 range=(-0.8727 0.8727) clamped=true
          prescribed_function: SimmSpline: x=(0 0.0083 0.0167 0.025 0.0333 0.0417 0.05 0.0583 0.0667 0.075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)
              y=(-0.1619 -0.1606 -0.1589 -0.1567 -0.1538 -0.1502 -0.1458 -0.1405 -0.1341 -0.1264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)
        SpatialTransform: axes_held_at_zero=(translation1 translation2 translation3)
          TransformAxis rotation1: coordinates=arm_flex_r axis=(0 0 1) LinearFunction(coefficients=1 0)
          TransformAxis rotation2: coordinates=arm_add_r axis=(1 0 0) LinearFunction(coefficients=1 0)
          TransformAxis rotation3: coordinates=arm_rot_r axis=(0 1 0) LinearFunction(coefficients=1 0)
    Body ulna_r: mass=0.6047825 mass_center=(0 -0.11856 0) inertia_xx=0.002853367 inertia_yy=0.0005953346
        inertia_zz=0.003095162 meshes=ulna_rv_Adrian.vtp
      PinJoint elbow_r: parent_body=humerus_r location_in_parent=(0.01380839 -0.3007432 -0.01008)
          orientation_in_parent=(-0.02286271 0.2280177 0.005168901) location=(0 0 0)
          orientation=(-0.02286271 0.2280177 0.005168901)
        Coordinate elbow_flex_r: motion_type=rotational default_value=0 range=(0 2.618) clamped=true
    Body radius_r: mass=0.6047825 mass_center=(0 -0.11856 0) inertia_xx=0.002853367 inertia_yy=0.0005953346
        inertia_zz=0.003095162 meshes=radius_rv_Adrian.vtp
      PinJoint radioulnar_r: parent_body=ulna_r location_in_parent=(-0.006617307 -0.0127949 0.02565768)
          orientation_in_parent=(-1.568841 0.05642797 1.536144) location=(0 0 0)
          orientation=(-1.568841 0.05642797 1.536144)
        Coordinate pro_sup_r: motion_type=rotational default_value=1.2767 range=(0 1.570796) clamped=true locked=true
          prescribed_function: SimmSpline: x=(0 0.0083 0.0167 0.025 0.0333 0.0417 0.05 0.0583 0.0667 0.075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)
              y=(1.2833 1.2838 1.2842 1.2845 1.2846 1.2843 1.2837 1.2826 1.281 1.2789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)
    Body hand_r: mass=0.4554535 mass_center=(0 -0.0669846 0) inertia_xx=0.0008592855 inertia_yy=0.0005269385
        inertia_zz=0.001290855
        meshes=(pisiform_rvs_Adrian.vtp lunate_rvs_Adrian.vtp scaphoid_rvs_Adrian.vtp triquetrum_rvs_Adrian.vtp hamate_rvs_Adrian.vtp capitate_rvs_Adrian.vtp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)
      UniversalJoint radius_hand_r: parent_body=radius_r location_in_parent=(-0.008653552 -0.2319953 0.01338807)
          orientation_in_parent=(-1.570796 0 -1.570796) location=(0 0 0) orientation=(-1.570796 0 -1.570796)
        Coordinate wrist_flex_r: motion_type=rotational default_value=0 range=(-1.22173 1.22173) clamped=true
            locked=true
        Coordinate wrist_dev_r: motion_type=rotational default_value=0 range=(-0.4363323 0.6108652) clamped=true
            locked=true
    Body humerus_l: mass=2.023408 mass_center=(0 -0.172817 0) inertia_xx=0.01312521 inertia_yy=0.004527791
        inertia_zz=0.01473262 meshes=humerus_lv_Adrian.vtp
      CustomJoint acromial_l: parent_body=torso location_in_parent=(0.003391215 0.3993142 -0.17) location=(0 0 0)
        Coordinate arm_flex_l: motion_type=rotational default_value=0 range=(-1.570796 1.570796) clamped=true
        Coordinate arm_add_l: motion_type=rotational default_value=-0.44 range=(-1.5708 -0.1745) clamped=true
          prescribed_function: SimmSpline: x=(0 0.0083 0.0167 0.025 0.0333 0.0417 0.05 0.0583 0.0667 0.075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)
              y=(-0.4856 -0.4871 -0.4886 -0.4897 -0.4902 -0.4901 -0.489 -0.4868 -0.4832 -0.4781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)
        Coordinate arm_rot_l: motion_type=rotational default_value=0 range=(-0.8727 0.8727) clamped=true
          prescribed_function: SimmSpline: x=(0 0.0083 0.0167 0.025 0.0333 0.0417 0.05 0.0583 0.0667 0.075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)
              y=(0.4339 0.4334 0.433 0.4329 0.4333 0.4341 0.4357 0.4379 0.4411 0.4453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)
        SpatialTransform: axes_held_at_zero=(translation1 translation2 translation3)
          TransformAxis rotation1: coordinates=arm_flex_l axis=(0 0 1) LinearFunction(coefficients=1 0)
          TransformAxis rotation2: coordinates=arm_add_l axis=(-1 0 0) LinearFunction(coefficients=1 0)
          TransformAxis rotation3: coordinates=arm_rot_l axis=(0 -1 0) LinearFunction(coefficients=1 0)
    Body ulna_l: mass=0.6047825 mass_center=(0 -0.11856 0) inertia_xx=0.002853367 inertia_yy=0.0005953346
        inertia_zz=0.003095162 meshes=ulna_lv_Adrian.vtp
      PinJoint elbow_l: parent_body=humerus_l location_in_parent=(0.01380839 -0.3007432 0.01008)
          orientation_in_parent=(0.02286271 -0.2280177 0.005168901) location=(0 0 0)
          orientation=(0.02286271 -0.2280177 0.005168901)
        Coordinate elbow_flex_l: motion_type=rotational default_value=0 range=(0 2.618) clamped=true
    Body radius_l: mass=0.6047825 mass_center=(0 -0.11856 0) inertia_xx=0.002853367 inertia_yy=0.0005953346
        inertia_zz=0.003095162 meshes=radius_lv_Adrian.vtp
      PinJoint radioulnar_l: parent_body=ulna_l location_in_parent=(-0.006617307 -0.0127949 -0.02565768)
          orientation_in_parent=(1.568841 -0.05642797 1.536144) location=(0 0 0)
          orientation=(1.568841 -0.05642797 1.536144)
        Coordinate pro_sup_l: motion_type=rotational default_value=1.2356 range=(0 1.570796) clamped=true locked=true
          prescribed_function: SimmSpline: x=(0 0.0083 0.0167 0.025 0.0333 0.0417 0.05 0.0583 0.0667 0.075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)
              y=(1.2812 1.2763 1.2713 1.2662 1.2608 1.2552 1.2492 1.2428 1.2359 1.2284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)
    Body hand_l: mass=0.4554535 mass_center=(0 -0.0669846 0) inertia_xx=0.0008592855 inertia_yy=0.0005269385
        inertia_zz=0.001290855
        meshes=(pisiform_lvs_Adrian.vtp lunate_lvs_Adrian.vtp scaphoid_lvs_Adrian.vtp triquetrum_lvs_Adrian.vtp hamate_lvs_Adrian.vtp capitate_lvs_Adrian.vtp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)
      UniversalJoint radius_hand_l: parent_body=radius_l location_in_parent=(-0.008653552 -0.2319953 -0.01338807)
          orientation_in_parent=(1.570796 0 1.570796) location=(0 0 0) orientation=(1.570796 0 1.570796)
        Coordinate wrist_flex_l: motion_type=rotational default_value=0 range=(-1.22173 1.22173) clamped=true
            locked=true
        Coordinate wrist_dev_l: motion_type=rotational default_value=0 range=(-0.4363323 0.6108652) clamped=true
            locked=true
  ConstraintSet:
    CoordinateCouplerConstraint patellofemoral_knee_angle_r_con: independent_coordinate_names=knee_angle_r
        dependent_coordinate_name=knee_angle_r_beta scale_factor=1
        coupled_coordinates_function=LinearFunction(coefficients=1 0)
    CoordinateCouplerConstraint patellofemoral_knee_angle_l_con: independent_coordinate_names=knee_angle_l
        dependent_coordinate_name=knee_angle_l_beta scale_factor=1
        coupled_coordinates_function=LinearFunction(coefficients=1 0)
  ForceSet:
    Millard2012EquilibriumMuscle [values shared by the 86 below unless stated]: max_contraction_velocity=15
        default_activation=0.01 deactivation_time_constant=0.04 [seconds] minimum_activation=0.001
      ActiveForceLengthCurve: min_norm_active_fiber_length=0.25 transition_norm_fiber_length=0.77
          max_norm_active_fiber_length=1.9 shallow_ascending_slope=0.75 minimum_value=0
      ForceVelocityCurve: concentric_slope_at_vmax=0 concentric_slope_near_vmax=0.25 isometric_slope=5
          eccentric_slope_at_vmax=0 eccentric_slope_near_vmax=0.15 max_eccentric_velocity_force_multiplier=1.4
      FiberForceLengthCurve: strain_at_zero_force=0 strain_at_one_norm_force=0.7
      TendonForceLengthCurve: strain_at_one_norm_force=0.049
    Millard2012EquilibriumMuscle addbrev_r: max_isometric_force=625.8197 optimal_fiber_length=0.105689
        tendon_slack_length=0.0363405 pennation_angle_at_optimal=0.1147809 fiber_damping=0.11
      PathPoint P1: pelvis (-0.0203408 -0.100107 0.0164004)
      PathPoint P2: femur_r (-0.00195939 -0.115604 0.0295636)
      PathWrap: wrap_object=AB_at_femshaft_r method=hybrid
    Millard2012EquilibriumMuscle addbrev_l: max_isometric_force=625.8197 optimal_fiber_length=0.105689
        tendon_slack_length=0.0363405 pennation_angle_at_optimal=0.1147809 fiber_damping=0.11
      PathPoint P1: pelvis (-0.0203408 -0.100107 -0.0164004)
      PathPoint P2: femur_l (-0.00195939 -0.115604 -0.0295636)
      PathWrap: wrap_object=AB_at_femshaft_l method=hybrid
    Millard2012EquilibriumMuscle addlong_r: max_isometric_force=916.8 optimal_fiber_length=0.1069453
        tendon_slack_length=0.130271 pennation_angle_at_optimal=0.1377704 fiber_damping=0.1
      PathPoint P1: pelvis (-0.00807243 -0.0946753 0.0201065)
      PathPoint P2: femur_r (0.0110313 -0.234509 0.0187949)
      PathWrap: wrap_object=AL_at_femshaft_r method=hybrid
    Millard2012EquilibriumMuscle addlong_l: max_isometric_force=916.8 optimal_fiber_length=0.1069453
        tendon_slack_length=0.130271 pennation_angle_at_optimal=0.1377704 fiber_damping=0.1
      PathPoint P1: pelvis (-0.00807243 -0.0946753 -0.0201065)
      PathPoint P2: femur_l (0.0110313 -0.234509 -0.0187949)
      PathWrap: wrap_object=AL_at_femshaft_l method=hybrid
    Millard2012EquilibriumMuscle addmagDist_r: max_isometric_force=597.2951 optimal_fiber_length=0.1720021
        tendon_slack_length=0.08481749 pennation_angle_at_optimal=0.194705 fiber_damping=0.1
      PathPoint P1: pelvis (-0.0788499 -0.135964 0.0424069)
      PathPoint P2: femur_r (0.0110215 -0.257169 0.0229148)
      PathWrap: wrap_object=AMdist_at_femshaft_r method=hybrid
    Millard2012EquilibriumMuscle addmagDist_l: max_isometric_force=597.2951 optimal_fiber_length=0.1720021
        tendon_slack_length=0.08481749 pennation_angle_at_optimal=0.194705 fiber_damping=0.1
      PathPoint P1: pelvis (-0.0788499 -0.135964 -0.0424069)
      PathPoint P2: femur_l (0.0110215 -0.257169 -0.0229148)
      PathWrap: wrap_object=AMdist_at_femshaft_l method=hybrid
    Millard2012EquilibriumMuscle addmagIsch_r: max_isometric_force=597.2951 optimal_fiber_length=0.1510925
        tendon_slack_length=0.2092689 pennation_angle_at_optimal=0.1680443 fiber_damping=0.1
      PathPoint P1: pelvis (-0.0954421 -0.13819 0.0444196)
      PathPoint P2: femur_r (0.00471232 -0.380091 -0.0388601)
      PathWrap: wrap_object=AMisch_at_condyles_r method=hybrid
    Millard2012EquilibriumMuscle addmagIsch_l: max_isometric_force=597.2951 optimal_fiber_length=0.1510925
        tendon_slack_length=0.2092689 pennation_angle_at_optimal=0.1680443 fiber_damping=0.1
      PathPoint P1: pelvis (-0.0954421 -0.13819 -0.0444196)
      PathPoint P2: femur_l (0.00471232 -0.380091 0.0388601)
      PathWrap: wrap_object=AMisch_at_condyles_l method=hybrid
    Millard2012EquilibriumMuscle addmagMid_r: max_isometric_force=597.2951 optimal_fiber_length=0.1374485
        tendon_slack_length=0.04654255 pennation_angle_at_optimal=0.2073076 fiber_damping=0.1
      PathPoint P1: pelvis (-0.056081 -0.128594 0.0303941)
      PathPoint P2: femur_r (0.00237086 -0.159102 0.0346927)
      PathWrap: wrap_object=AMmid_at_femshaft_r method=hybrid
    Millard2012EquilibriumMuscle addmagMid_l: max_isometric_force=597.2951 optimal_fiber_length=0.1374485
        tendon_slack_length=0.04654255 pennation_angle_at_optimal=0.2073076 fiber_damping=0.1
      PathPoint P1: pelvis (-0.056081 -0.128594 -0.0303941)
      PathPoint P2: femur_l (0.00237086 -0.159102 -0.0346927)
      PathWrap: wrap_object=AMmid_at_femshaft_l method=hybrid
    Millard2012EquilibriumMuscle addmagProx_r: max_isometric_force=597.2951 optimal_fiber_length=0.1115137
        tendon_slack_length=0.04258228 pennation_angle_at_optimal=0.3114833 fiber_damping=0.11
      PathPoint P1: pelvis (-0.0329926 -0.114537 0.0145368)
      PathPoint P2: femur_r (-0.0149599 -0.0772586 0.0380171)
      PathWrap: wrap_object=AMprox_at_femshaft_r method=hybrid
    Millard2012EquilibriumMuscle addmagProx_l: max_isometric_force=597.2951 optimal_fiber_length=0.1115137
        tendon_slack_length=0.04258228 pennation_angle_at_optimal=0.3114833 fiber_damping=0.11
      PathPoint P1: pelvis (-0.0329926 -0.114537 -0.0145368)
      PathPoint P2: femur_l (-0.0149599 -0.0772586 -0.0380171)
      PathWrap: wrap_object=AMprox_at_femshaft_l method=hybrid
    Millard2012EquilibriumMuscle bflh140_r: max_isometric_force=1313.184 optimal_fiber_length=0.09634528
        tendon_slack_length=0.3282255 pennation_angle_at_optimal=0.1759182 fiber_damping=0.01
      PathPoint bflh_r-P1: pelvis (-0.110756 -0.126837 0.0624069)
      PathPoint bflh_r-P2: tibia_r (-0.038293 -0.0406557 0.034829)
      PathPoint bflh_r-P3: tibia_r (-0.0301351 -0.0558124 0.0334621)
    Millard2012EquilibriumMuscle bflh140_l: max_isometric_force=1313.184 optimal_fiber_length=0.09634528
        tendon_slack_length=0.3282255 pennation_angle_at_optimal=0.1759182 fiber_damping=0.01
      PathPoint bflh_l-P1: pelvis (-0.110756 -0.126837 -0.0624069)
      PathPoint bflh_l-P2: tibia_l (-0.038293 -0.0406557 -0.034829)
      PathPoint bflh_l-P3: tibia_l (-0.0301351 -0.0558124 -0.0334621)
    Millard2012EquilibriumMuscle bfsh140_r: max_isometric_force=557.1148 optimal_fiber_length=0.110052
        tendon_slack_length=0.1055793 pennation_angle_at_optimal=0.2642232 fiber_damping=0.1
      PathPoint bfsh_r-P1: femur_r (0.00489846 -0.206813 0.0277827)
      PathPoint bfsh_r-P2: tibia_r (-0.0319406 -0.036599 0.0308436)
      PathWrap: wrap_object=BF140_at_gastroc_r method=hybrid
    Millard2012EquilibriumMuscle bfsh140_l: max_isometric_force=557.1148 optimal_fiber_length=0.110052
        tendon_slack_length=0.1055793 pennation_angle_at_optimal=0.2642232 fiber_damping=0.1
      PathPoint bfsh_l-P1: femur_l (0.00489846 -0.206813 -0.0277827)
      PathPoint bfsh_l-P2: tibia_l (-0.0319406 -0.036599 -0.0308436)
      PathWrap: wrap_object=BF140_at_gastroc_l method=hybrid
    Millard2012EquilibriumMuscle edl_r: max_isometric_force=603.4982 optimal_fiber_length=0.07289396
        tendon_slack_length=0.3880054 pennation_angle_at_optimal=0.2182582 fiber_damping=0.1
      PathPoint P1: tibia_r (-0.0178314 -0.128944 0.0197345)
      PathPoint P2: tibia_r (0.0182772 -0.419039 0.0107818)
      PathPoint P3: calcn_r (0.0812828 0.0318409 0.000933585)
      PathPoint P4: calcn_r (0.14293 0.00486459 0.0151708)
      PathPoint P5: toes_r (0.000265341 0.00415701 0.0178548)
      PathPoint P6: toes_r (0.039182 -0.000353788 0.0291745)
    Millard2012EquilibriumMuscle edl_l: max_isometric_force=603.4982 optimal_fiber_length=0.07289396
        tendon_slack_length=0.3880054 pennation_angle_at_optimal=0.2182582 fiber_damping=0.1
      PathPoint P1: tibia_l (-0.0178314 -0.128944 -0.0197345)
      PathPoint P2: tibia_l (0.0182772 -0.419039 -0.0107818)
      PathPoint P3: calcn_l (0.0812828 0.0318409 -0.000933585)
      PathPoint P4: calcn_l (0.14293 0.00486459 -0.0151708)
      PathPoint P5: toes_l (0.000265341 0.00415701 -0.0178548)
      PathPoint P6: toes_l (0.039182 -0.000353788 -0.0291745)
    Millard2012EquilibriumMuscle ehl_r: max_isometric_force=285.8675 optimal_fiber_length=0.07803598
        tendon_slack_length=0.340933 pennation_angle_at_optimal=0.1972681 fiber_damping=0.1
      PathPoint P1: tibia_r (-0.0156025 -0.172742 0.0181943)
      PathPoint P2: tibia_r (0.00791271 -0.324198 0.0157876)
      PathPoint P3: tibia_r (0.0222893 -0.411572 -0.00269545)
      PathPoint P4: calcn_r (0.0857936 0.0344059 -0.0246233)
      PathPoint P5: calcn_r (0.114362 0.0273301 -0.0299914)
      PathPoint P6: calcn_r (0.153367 0.0122941 -0.0326755)
      PathPoint P7: toes_r (0.0263572 0.00362633 -0.028591)
      PathPoint P8: toes_r (0.0497957 0.0030072 -0.0217058)
    Millard2012EquilibriumMuscle ehl_l: max_isometric_force=285.8675 optimal_fiber_length=0.07803598
        tendon_slack_length=0.340933 pennation_angle_at_optimal=0.1972681 fiber_damping=0.1
      PathPoint P1: tibia_l (-0.0156025 -0.172742 -0.0181943)
      PathPoint P2: tibia_l (0.00791271 -0.324198 -0.0157876)
      PathPoint P3: tibia_l (0.0222893 -0.411572 0.00269545)
      PathPoint P4: calcn_l (0.0857936 0.0344059 0.0246233)
      PathPoint P5: calcn_l (0.114362 0.0273301 0.0299914)
      PathPoint P6: calcn_l (0.153367 0.0122941 0.0326755)
      PathPoint P7: toes_l (0.0263572 0.00362633 0.028591)
      PathPoint P8: toes_l (0.0497957 0.0030072 0.0217058)
    Millard2012EquilibriumMuscle fdl_r: max_isometric_force=423.177 optimal_fiber_length=0.04643374
        tendon_slack_length=0.3943462 pennation_angle_at_optimal=0.2248391 fiber_damping=0.1
      PathPoint P1: tibia_r (-0.00256327 -0.20417 -0.00173279)
      PathPoint P2: tibia_r (-0.0196146 -0.406223 -0.011937)
      PathPoint P3: calcn_r (0.0385629 0.0278608 -0.0326755)
      PathPoint P4: calcn_r (0.0626205 0.0155667 -0.0306916)
      PathPoint P5: calcn_r (0.146645 -0.00716421 0.013537)
      PathPoint P6: toes_r (-0.00168049 -0.00689887 0.0171546)
      PathPoint P7: toes_r (0.0252074 -0.00627974 0.0250901)
      PathPoint P8: toes_r (0.0390051 -0.00530682 0.0282409)
    Millard2012EquilibriumMuscle fdl_l: max_isometric_force=423.177 optimal_fiber_length=0.04643374
        tendon_slack_length=0.3943462 pennation_angle_at_optimal=0.2248391 fiber_damping=0.1
      PathPoint P1: tibia_l (-0.00256327 -0.20417 0.00173279)
      PathPoint P2: tibia_l (-0.0196146 -0.406223 0.011937)
      PathPoint P3: calcn_l (0.0385629 0.0278608 0.0326755)
      PathPoint P4: calcn_l (0.0626205 0.0155667 0.0306916)
      PathPoint P5: calcn_l (0.146645 -0.00716421 -0.013537)
      PathPoint P6: toes_l (-0.00168049 -0.00689887 -0.0171546)
      PathPoint P7: toes_l (0.0252074 -0.00627974 -0.0250901)
      PathPoint P8: toes_l (0.0390051 -0.00530682 -0.0282409)
    Millard2012EquilibriumMuscle fhl_r: max_isometric_force=907.8393 optimal_fiber_length=0.05355823
        tendon_slack_length=0.3601101 pennation_angle_at_optimal=0.2580255 fiber_damping=0.1
      PathPoint P1: tibia_r (-0.0345484 -0.241059 0.0192532)
      PathPoint P2: tibia_r (-0.0269701 -0.40912 -0.00731621)
      PathPoint P3: calcn_r (0.0330792 0.0244114 -0.0281242)
      PathPoint P4: calcn_r (0.091808 0.0060144 -0.0298747)
      PathPoint P5: calcn_r (0.15266 -0.00468769 -0.0313918)
      PathPoint P6: toes_r (0.0137093 -0.00566061 -0.030925)
      PathPoint P7: toes_r (0.0497072 -0.0090216 -0.0211224)
    Millard2012EquilibriumMuscle fhl_l: max_isometric_force=907.8393 optimal_fiber_length=0.05355823
        tendon_slack_length=0.3601101 pennation_angle_at_optimal=0.2580255 fiber_damping=0.1
      PathPoint P1: tibia_l (-0.0345484 -0.241059 -0.0192532)
      PathPoint P2: tibia_l (-0.0269701 -0.40912 0.00731621)
      PathPoint P3: calcn_l (0.0330792 0.0244114 0.0281242)
      PathPoint P4: calcn_l (0.091808 0.0060144 0.0298747)
      PathPoint P5: calcn_l (0.15266 -0.00468769 0.0313918)
      PathPoint P6: toes_l (0.0137093 -0.00566061 0.030925)
      PathPoint P7: toes_l (0.0497072 -0.0090216 0.0211224)
    Millard2012EquilibriumMuscle gaslat140_r: max_isometric_force=1411.4 optimal_fiber_length=0.07733514
        tendon_slack_length=0.4191789 pennation_angle_at_optimal=0.2102268 fiber_damping=0.1
      PathPoint gaslat_r-P1: femur_r (0.00195939 -0.373263 0.0244464)
      PathPoint gaslat_r-P2: calcn_r (0.00389167 0.0274186 -0.006185)
      PathWrap: wrap_object=GasLat_at_shank_r method=hybrid
      PathWrap: wrap_object=GasLat_at_condyles_r method=hybrid
    Millard2012EquilibriumMuscle gaslat140_l: max_isometric_force=1411.4 optimal_fiber_length=0.07733514
        tendon_slack_length=0.4191789 pennation_angle_at_optimal=0.2102268 fiber_damping=0.1
      PathPoint gaslat_l-P1: femur_l (0.00195939 -0.373263 -0.0244464)
      PathPoint gaslat_l-P2: calcn_l (0.00389167 0.0274186 0.006185)
      PathWrap: wrap_object=GasLat_at_shank_l method=hybrid
      PathWrap: wrap_object=GasLat_at_condyles_l method=hybrid
    Millard2012EquilibriumMuscle gasmed_r: max_isometric_force=2702.7 optimal_fiber_length=0.068
        tendon_slack_length=0.44 pennation_angle_at_optimal=0.1656816 fiber_damping=0.05
      PathPoint P1: femur_r (0.00587816 -0.377182 -0.0261205)
      PathPoint P2: calcn_r (0.00389167 0.0274186 -0.006185)
      PathWrap: wrap_object=GasMed_at_shank_r method=hybrid
      PathWrap: wrap_object=GasMed_at_condyles_r method=hybrid
    Millard2012EquilibriumMuscle gasmed_l: max_isometric_force=2702.7 optimal_fiber_length=0.068
        tendon_slack_length=0.44 pennation_angle_at_optimal=0.1656816 fiber_damping=0.05
      PathPoint P1: femur_l (0.00587816 -0.377182 0.0261205)
      PathPoint P2: calcn_l (0.00389167 0.0274186 0.006185)
      PathWrap: wrap_object=GasMed_at_shank_l method=hybrid
      PathWrap: wrap_object=GasMed_at_condyles_l method=hybrid
    Millard2012EquilibriumMuscle glmax1_r: max_isometric_force=983.7836 optimal_fiber_length=0.1556085
        tendon_slack_length=0.09241238 pennation_angle_at_optimal=0.3540118 fiber_damping=0.05
      PathPoint P1: pelvis (-0.131097 0.0367412 0.0599575)
      PathPoint P2: pelvis (-0.133866 -0.0257721 0.0829607)
      PathPoint P3: femur_r (-0.0434984 -0.031938 0.0358563)
      PathPoint P4: femur_r (-0.0271375 -0.0554506 0.0558028)
      PathWrap: wrap_object=Gmax1_at_pelvis_r method=hybrid
    Millard2012EquilibriumMuscle glmax1_l: max_isometric_force=983.7836 optimal_fiber_length=0.1556085
        tendon_slack_length=0.09241238 pennation_angle_at_optimal=0.3540118 fiber_damping=0.05
      PathPoint P1: pelvis (-0.131097 0.0367412 -0.0599575)
      PathPoint P2: pelvis (-0.133866 -0.0257721 -0.0829607)
      PathPoint P3: femur_l (-0.0434984 -0.031938 -0.0358563)
      PathPoint P4: femur_l (-0.0271375 -0.0554506 -0.0558028)
      PathWrap: wrap_object=Gmax1_at_pelvis_l method=hybrid
    Millard2012EquilibriumMuscle glmax2_r: max_isometric_force=1406.046 optimal_fiber_length=0.1632821
        tendon_slack_length=0.1133614 pennation_angle_at_optimal=0.3673821 fiber_damping=0.04
      PathPoint P1: pelvis (-0.140256 0.00926518 0.0492013)
      PathPoint P2: pelvis (-0.143131 -0.0648563 0.0865816)
      PathPoint P3: femur_r (-0.0440862 -0.0572141 0.0299198)
      PathPoint P4: femur_r (-0.0152832 -0.0995368 0.0497476)
      PathWrap: wrap_object=Gmax2_at_pelvis_r method=hybrid
    Millard2012EquilibriumMuscle glmax2_l: max_isometric_force=1406.046 optimal_fiber_length=0.1632821
        tendon_slack_length=0.1133614 pennation_angle_at_optimal=0.3673821 fiber_damping=0.04
      PathPoint P1: pelvis (-0.140256 0.00926518 -0.0492013)
      PathPoint P2: pelvis (-0.143131 -0.0648563 -0.0865816)
      PathPoint P3: femur_l (-0.0440862 -0.0572141 -0.0299198)
      PathPoint P4: femur_l (-0.0152832 -0.0995368 -0.0497476)
      PathWrap: wrap_object=Gmax2_at_pelvis_l method=hybrid
    Millard2012EquilibriumMuscle glmax3_r: max_isometric_force=947.7541 optimal_fiber_length=0.1744338
        tendon_slack_length=0.1075849 pennation_angle_at_optimal=0.3824161 fiber_damping=0.05
      PathPoint P1: pelvis (-0.138445 -0.0559106 0.00958467)
      PathPoint P2: pelvis (-0.13557 -0.134505 0.0463259)
      PathPoint P3: femur_r (-0.0275294 -0.110215 0.0111606)
      PathPoint P4: femur_r (-0.00587816 -0.139018 0.0487978)
      PathWrap: wrap_object=Gmax3_at_pelvis_r method=hybrid
    Millard2012EquilibriumMuscle glmax3_l: max_isometric_force=947.7541 optimal_fiber_length=0.1744338
        tendon_slack_length=0.1075849 pennation_angle_at_optimal=0.3824161 fiber_damping=0.05
      PathPoint P1: pelvis (-0.138445 -0.0559106 -0.00958467)
      PathPoint P2: pelvis (-0.13557 -0.134505 -0.0463259)
      PathPoint P3: femur_l (-0.0275294 -0.110215 -0.0111606)
      PathPoint P4: femur_l (-0.00587816 -0.139018 -0.0487978)
      PathWrap: wrap_object=Gmax3_at_pelvis_l method=hybrid
    Millard2012EquilibriumMuscle glmed1_r: max_isometric_force=1093.467 optimal_fiber_length=0.07750341
        tendon_slack_length=0.0592602 pennation_angle_at_optimal=0.3165559 fiber_damping=0.02
      PathPoint P1: pelvis (-0.0473909 0.0260916 0.124814)
      PathPoint P2: femur_r (-0.0213573 -0.0114624 0.0658948)
    Millard2012EquilibriumMuscle glmed1_l: max_isometric_force=1093.467 optimal_fiber_length=0.07750341
        tendon_slack_length=0.0592602 pennation_angle_at_optimal=0.3165559 fiber_damping=0.02
      PathPoint P1: pelvis (-0.0473909 0.0260916 -0.124814)
      PathPoint P2: femur_l (-0.0213573 -0.0114624 -0.0658948)
    Millard2012EquilibriumMuscle glmed2_r: max_isometric_force=765.0917 optimal_fiber_length=0.0792999
        tendon_slack_length=0.07087978 pennation_angle_at_optimal=0.3165559 fiber_damping=0.02
      PathPoint P1: pelvis (-0.0905219 0.0336529 0.0718851)
      PathPoint P2: femur_r (-0.0252761 -0.00568222 0.0625704)
    Millard2012EquilibriumMuscle glmed2_l: max_isometric_force=765.0917 optimal_fiber_length=0.0792999
        tendon_slack_length=0.07087978 pennation_angle_at_optimal=0.3165559 fiber_damping=0.025
      PathPoint P1: pelvis (-0.0905219 0.0336529 -0.0718851)
      PathPoint P2: femur_l (-0.0252761 -0.00568222 -0.0625704)
    Millard2012EquilibriumMuscle glmed3_r: max_isometric_force=871.1993 optimal_fiber_length=0.08091846
        tendon_slack_length=0.05013934 pennation_angle_at_optimal=0.3165559 fiber_damping=0.03
      PathPoint P1: pelvis (-0.122684 -0.00777424 0.0560171)
      PathPoint P2: femur_r (-0.0302725 -0.00460456 0.0615018)
    Millard2012EquilibriumMuscle glmed3_l: max_isometric_force=871.1993 optimal_fiber_length=0.08091846
        tendon_slack_length=0.05013934 pennation_angle_at_optimal=0.3165559 fiber_damping=0.03
      PathPoint P1: pelvis (-0.122684 -0.00777424 -0.0560171)
      PathPoint P2: femur_l (-0.0302725 -0.00460456 -0.0615018)
    Millard2012EquilibriumMuscle glmin1_r: max_isometric_force=374.0459 optimal_fiber_length=0.07389961
        tendon_slack_length=0.01753788 pennation_angle_at_optimal=0.1745329 fiber_damping=0.2
      PathPoint P1: pelvis (-0.0494143 -0.015868 0.110969)
      PathPoint P2: femur_r (-0.00705379 -0.0101888 0.0664884)
    Millard2012EquilibriumMuscle glmin1_l: max_isometric_force=374.0459 optimal_fiber_length=0.07389961
        tendon_slack_length=0.01753788 pennation_angle_at_optimal=0.1745329 fiber_damping=0.2
      PathPoint P1: pelvis (-0.0494143 -0.015868 -0.110969)
      PathPoint P2: femur_l (-0.00705379 -0.0101888 -0.0664884)
    Millard2012EquilibriumMuscle glmin2_r: max_isometric_force=394.8197 optimal_fiber_length=0.06124411
        tendon_slack_length=0.02854309 pennation_angle_at_optimal=0 fiber_damping=0.1
      PathPoint P1: pelvis (-0.0656018 -0.0151225 0.103408)
      PathPoint P2: femur_r (-0.00940505 -0.0101888 0.0664884)
    Millard2012EquilibriumMuscle glmin2_l: max_isometric_force=394.8197 optimal_fiber_length=0.06124411
        tendon_slack_length=0.02854309 pennation_angle_at_optimal=0 fiber_damping=0.1
      PathPoint P1: pelvis (-0.0656018 -0.0151225 -0.103408)
      PathPoint P2: femur_l (-0.00940505 -0.0101888 -0.0664884)
    Millard2012EquilibriumMuscle glmin3_r: max_isometric_force=446.7738 optimal_fiber_length=0.04204624
        tendon_slack_length=0.05628941 pennation_angle_at_optimal=0.01745329 fiber_damping=0.1
      PathPoint P1: pelvis (-0.0840256 -0.0165069 0.0849841)
      PathPoint P2: femur_r (-0.0132259 -0.00813145 0.0653011)
    Millard2012EquilibriumMuscle glmin3_l: max_isometric_force=446.7738 optimal_fiber_length=0.04204624
        tendon_slack_length=0.05628941 pennation_angle_at_optimal=0.01745329 fiber_damping=0.1
      PathPoint P1: pelvis (-0.0840256 -0.0165069 -0.0849841)
      PathPoint P2: femur_l (-0.0132259 -0.00813145 -0.0653011)
    Millard2012EquilibriumMuscle grac_r: max_isometric_force=281.3115 optimal_fiber_length=0.2267119
        tendon_slack_length=0.1711922 pennation_angle_at_optimal=0.1720016 fiber_damping=0.1
      PathPoint P1: pelvis (-0.0504367 -0.137721 0.0261555)
      PathPoint P2: tibia_r (-0.0205285 -0.0529928 -0.0285044)
      PathPoint P3: tibia_r (0.00198375 -0.0775891 -0.0151426)
      PathWrap: wrap_object=GR_at_condyles_r method=hybrid
    Millard2012EquilibriumMuscle grac_l: max_isometric_force=281.3115 optimal_fiber_length=0.2267119
        tendon_slack_length=0.1711922 pennation_angle_at_optimal=0.1720016 fiber_damping=0.1
      PathPoint P1: pelvis (-0.0504367 -0.137721 -0.0261555)
      PathPoint P2: tibia_l (-0.0205285 -0.0529928 0.0285044)
      PathPoint P3: tibia_l (0.00198375 -0.0775891 0.0151426)
      PathWrap: wrap_object=GR_at_condyles_l method=hybrid
    Millard2012EquilibriumMuscle iliacus_r: max_isometric_force=1021.141 optimal_fiber_length=0.1113989
        tendon_slack_length=0.1004479 pennation_angle_at_optimal=0.279914 fiber_damping=0.02
      PathPoint P1: pelvis (-0.0644303 0.0329074 0.0897764)
      PathPoint P2: pelvis (-0.014377 -0.0593185 0.0805113)
      PathPoint P3: femur_r (-0.00225329 -0.0553526 0.0165034)
      PathPoint P4: femur_r (-0.0119523 -0.0624064 0.0232709)
      PathWrap: wrap_object=IL_at_brim_r method=hybrid range=(2 3)
    Millard2012EquilibriumMuscle iliacus_l: max_isometric_force=1021.141 optimal_fiber_length=0.1113989
        tendon_slack_length=0.1004479 pennation_angle_at_optimal=0.279914 fiber_damping=0.02
      PathPoint P1: pelvis (-0.0644303 0.0329074 -0.0897764)
      PathPoint P2: pelvis (-0.014377 -0.0593185 -0.0805113)
      PathPoint P3: femur_l (-0.00225329 -0.0553526 -0.0165034)
      PathPoint P4: femur_l (-0.0119523 -0.0624064 -0.0232709)
      PathWrap: wrap_object=IL_at_brim_l method=hybrid range=(2 3)
    Millard2012EquilibriumMuscle perbrev_r: max_isometric_force=521.2016 optimal_fiber_length=0.04976176
        tendon_slack_length=0.1617011 pennation_angle_at_optimal=0.2052361 fiber_damping=0.1
      PathPoint P1: tibia_r (-0.0270815 -0.282183 0.0241628)
      PathPoint P2: tibia_r (-0.0377804 -0.433861 0.0239702)
      PathPoint P3: tibia_r (-0.0317623 -0.446232 0.0245478)
      PathPoint P4: calcn_r (0.0416585 0.0238807 0.0271907)
      PathPoint P5: calcn_r (0.0598786 0.0193699 0.0400274)
    Millard2012EquilibriumMuscle perbrev_l: max_isometric_force=521.2016 optimal_fiber_length=0.04976176
        tendon_slack_length=0.1617011 pennation_angle_at_optimal=0.2052361 fiber_damping=0.1
      PathPoint P1: tibia_l (-0.0270815 -0.282183 -0.0241628)
      PathPoint P2: tibia_l (-0.0377804 -0.433861 -0.0239702)
      PathPoint P3: tibia_l (-0.0317623 -0.446232 -0.0245478)
      PathPoint P4: calcn_l (0.0416585 0.0238807 -0.0271907)
      PathPoint P5: calcn_l (0.0598786 0.0193699 -0.0400274)
    Millard2012EquilibriumMuscle perlong_r: max_isometric_force=1115.371 optimal_fiber_length=0.05525223
        tendon_slack_length=0.3613374 pennation_angle_at_optimal=0.2479525 fiber_damping=0.01
      PathPoint P1: tibia_r (-0.0222893 -0.153016 0.027147)
      PathPoint P2: tibia_r (-0.0353286 -0.434642 0.022815)
      PathPoint P3: tibia_r (-0.0303135 -0.447346 0.0231038)
      PathPoint P4: calcn_r (0.0387398 0.0203428 0.0257903)
      PathPoint P5: calcn_r (0.0602324 0.00937538 0.0331423)
      PathPoint P6: calcn_r (0.0753569 0.00610284 0.0137704)
      PathPoint P7: calcn_r (0.106402 0.007518 -0.0214724)
    Millard2012EquilibriumMuscle perlong_l: max_isometric_force=1115.371 optimal_fiber_length=0.05525223
        tendon_slack_length=0.3613374 pennation_angle_at_optimal=0.2479525 fiber_damping=0.01
      PathPoint P1: tibia_l (-0.0222893 -0.153016 -0.027147)
      PathPoint P2: tibia_l (-0.0353286 -0.434642 -0.022815)
      PathPoint P3: tibia_l (-0.0303135 -0.447346 -0.0231038)
      PathPoint P4: calcn_l (0.0387398 0.0203428 -0.0257903)
      PathPoint P5: calcn_l (0.0602324 0.00937538 -0.0331423)
      PathPoint P6: calcn_l (0.0753569 0.00610284 -0.0137704)
      PathPoint P7: calcn_l (0.106402 0.007518 0.0214724)
    Millard2012EquilibriumMuscle piri_r: max_isometric_force=1029.787 optimal_fiber_length=0.02846623
        tendon_slack_length=0.1258057 pennation_angle_at_optimal=0.1745329 fiber_damping=0.01
      PathPoint P1: pelvis (-0.108424 -0.00695421 0.0143877)
      PathPoint P2: pelvis (-0.108648 -0.0326518 0.0648776)
      PathPoint P3: femur_r (-0.0144995 -0.00352689 0.0518847)
    Millard2012EquilibriumMuscle piri_l: max_isometric_force=1029.787 optimal_fiber_length=0.02846623
        tendon_slack_length=0.1258057 pennation_angle_at_optimal=0.1745329 fiber_damping=0.01
      PathPoint P1: pelvis (-0.108424 -0.00695421 -0.0143877)
      PathPoint P2: pelvis (-0.108648 -0.0326518 -0.0648776)
      PathPoint P3: femur_l (-0.0144995 -0.00352689 -0.0518847)
    Millard2012EquilibriumMuscle psoas_r: max_isometric_force=1426.79 optimal_fiber_length=0.1223786
        tendon_slack_length=0.1042083 pennation_angle_at_optimal=0.2155251 fiber_damping=0.1
      PathPoint P1: pelvis (-0.0645368 0.0660278 0.0415336)
      PathPoint P2: pelvis (-0.018 -0.07 0.08)
      PathPoint P3: femur_r (-0.002 -0.055 0.017)
      PathPoint P4: femur_r (-0.012 -0.062 0.023)
      PathWrap: wrap_object=PS_at_brim_r method=hybrid range=(2 3)
    Millard2012EquilibriumMuscle psoas_l: max_isometric_force=1426.79 optimal_fiber_length=0.1223786
        tendon_slack_length=0.1042083 pennation_angle_at_optimal=0.2155251 fiber_damping=0.1
      PathPoint P1: pelvis (-0.0645368 0.0660278 -0.0415336)
      PathPoint P2: pelvis (-0.018 -0.07 -0.08)
      PathPoint P3: femur_l (-0.002 -0.055 -0.017)
      PathPoint P4: femur_l (-0.012 -0.062 -0.023)
      PathWrap: wrap_object=PS_at_brim_l method=hybrid range=(2 3)
    Millard2012EquilibriumMuscle recfem_r: max_isometric_force=2191.741 optimal_fiber_length=0.077
        tendon_slack_length=0.4502681 pennation_angle_at_optimal=0.2170149 fiber_damping=0.01
      PathPoint P1: pelvis (-0.0255591 -0.0413206 0.0993611)
      PathPoint P2: patella_r (0.01 0.049 0.0007)
      PathPoint P3: patella_r (0.0121 0.0437 -0.001)
      PathPoint P4: patella_r (0.005 0.00247 3e-5)
      PathPoint P5: tibia_r (0.0363316 -0.0703451 -0.00045245)
      PathWrap: wrap_object=KnExt_at_fem_r method=hybrid
    Millard2012EquilibriumMuscle recfem_l: max_isometric_force=2191.741 optimal_fiber_length=0.077
        tendon_slack_length=0.4502681 pennation_angle_at_optimal=0.2170149 fiber_damping=0.01
      PathPoint P1: pelvis (-0.0255591 -0.0413206 -0.0993611)
      PathPoint P2: patella_l (0.01 0.049 -0.0007)
      PathPoint P3: patella_l (0.0121 0.0437 0.001)
      PathPoint P4: patella_l (0.005 0.00247 -3e-5)
      PathPoint P5: tibia_l (0.0363316 -0.0703451 0.00045245)
      PathWrap: wrap_object=KnExt_at_fem_l method=hybrid
    Millard2012EquilibriumMuscle sart_r: max_isometric_force=249.4131 optimal_fiber_length=0.4087882
        tendon_slack_length=0.1257808 pennation_angle_at_optimal=0.02613542 fiber_damping=0.1
      PathPoint P1: pelvis (-0.0207668 -0.0166134 0.11246)
      PathPoint P2: femur_r (-0.00293908 -0.349554 -0.049985)
      PathPoint P3: tibia_r (-0.0279731 -0.0446901 -0.0351371)
      PathPoint P4: tibia_r (-0.01772 -0.0667565 -0.0254142)
      PathPoint P5: tibia_r (0.0151567 -0.0902717 -0.00250292)
    Millard2012EquilibriumMuscle sart_l: max_isometric_force=249.4131 optimal_fiber_length=0.4087882
        tendon_slack_length=0.1257808 pennation_angle_at_optimal=0.02613542 fiber_damping=0.1
      PathPoint P1: pelvis (-0.0207668 -0.0166134 -0.11246)
      PathPoint P2: femur_l (-0.00293908 -0.349554 0.049985)
      PathPoint P3: tibia_l (-0.0279731 -0.0446901 0.0351371)
      PathPoint P4: tibia_l (-0.01772 -0.0667565 0.0254142)
      PathPoint P5: tibia_l (0.0151567 -0.0902717 0.00250292)
    Millard2012EquilibriumMuscle semimem_r: max_isometric_force=2200.987 optimal_fiber_length=0.08473726
        tendon_slack_length=0.3300812 pennation_angle_at_optimal=0.2545615 fiber_damping=0.01
      PathPoint P1: pelvis (-0.105112 -0.121406 0.0653888)
      PathPoint P2: tibia_r (-0.0300906 -0.0456931 -0.0188681)
      PathWrap: wrap_object=SM_at_condyles_r method=hybrid
    Millard2012EquilibriumMuscle semimem_l: max_isometric_force=2200.987 optimal_fiber_length=0.08473726
        tendon_slack_length=0.3300812 pennation_angle_at_optimal=0.2545615 fiber_damping=0.01
      PathPoint P1: pelvis (-0.105112 -0.121406 -0.0653888)
      PathPoint P2: tibia_l (-0.0300906 -0.0456931 0.0188681)
      PathWrap: wrap_object=SM_at_condyles_l method=hybrid
    Millard2012EquilibriumMuscle semiten_r: max_isometric_force=591.2951 optimal_fiber_length=0.1926087
        tendon_slack_length=0.2466978 pennation_angle_at_optimal=0.241295 fiber_damping=0.03
      PathPoint P1: pelvis (-0.110543 -0.13344 0.0548456)
      PathPoint P2: tibia_r (-0.0347713 -0.0566149 -0.0220449)
      PathPoint P3: tibia_r (0.00211748 -0.0861482 -0.0112631)
      PathWrap: wrap_object=ST_at_condyles_r method=hybrid
    Millard2012EquilibriumMuscle semiten_l: max_isometric_force=591.2951 optimal_fiber_length=0.1926087
        tendon_slack_length=0.2466978 pennation_angle_at_optimal=0.241295 fiber_damping=0.03
      PathPoint P1: pelvis (-0.110543 -0.13344 -0.0548456)
      PathPoint P2: tibia_l (-0.0347713 -0.0566149 0.0220449)
      PathPoint P3: tibia_l (0.00211748 -0.0861482 0.0112631)
      PathWrap: wrap_object=ST_at_condyles_l method=hybrid
    Millard2012EquilibriumMuscle soleus_r: max_isometric_force=4955.2 optimal_fiber_length=0.055
        tendon_slack_length=0.31 pennation_angle_at_optimal=0.3814289 fiber_damping=0.1
      PathPoint P1: tibia_r (-0.00846994 -0.11 0.00943407)
      PathPoint P2: calcn_r (0.00389167 0.0274186 -0.006185)
    Millard2012EquilibriumMuscle soleus_l: max_isometric_force=4955.2 optimal_fiber_length=0.055
        tendon_slack_length=0.31 pennation_angle_at_optimal=0.3814289 fiber_damping=0.1
      PathPoint P1: tibia_l (-0.00846994 -0.11 -0.00943407)
      PathPoint P2: calcn_l (0.00389167 0.0274186 0.006185)
    Millard2012EquilibriumMuscle tfl_r: max_isometric_force=411.2066 optimal_fiber_length=0.09572141
        tendon_slack_length=0.4529104 pennation_angle_at_optimal=0.05235988 fiber_damping=0.01
      PathPoint P1: pelvis (-0.0331204 0.0227902 0.132162)
      PathPoint P2: femur_r (0.028803 -0.0974794 0.0708814)
      PathPoint P3: femur_r (0.0104827 -0.396776 0.0384683)
      PathPoint P4: tibia_r (0.0120362 -0.0456931 0.033308)
    Millard2012EquilibriumMuscle tfl_l: max_isometric_force=411.2066 optimal_fiber_length=0.09572141
        tendon_slack_length=0.4529104 pennation_angle_at_optimal=0.05235988 fiber_damping=0.01
      PathPoint P1: pelvis (-0.0331204 0.0227902 -0.132162)
      PathPoint P2: femur_l (0.028803 -0.0974794 -0.0708814)
      PathPoint P3: femur_l (0.0104827 -0.396776 -0.0384683)
      PathPoint P4: tibia_l (0.0120362 -0.0456931 -0.033308)
    Millard2012EquilibriumMuscle tibant_r: max_isometric_force=1227.452 optimal_fiber_length=0.07497482
        tendon_slack_length=0.2639608 pennation_angle_at_optimal=0.1951828 fiber_damping=0.01
      PathPoint P1: tibia_r (0.0171628 -0.146218 0.0155951)
      PathPoint P2: tibia_r (0.0279731 -0.212417 0.012322)
      PathPoint P3: tibia_r (0.025967 -0.407783 -0.0127071)
      PathPoint P4: calcn_r (0.103129 0.0157436 -0.0355929)
    Millard2012EquilibriumMuscle tibant_l: max_isometric_force=1227.452 optimal_fiber_length=0.07497482
        tendon_slack_length=0.2639608 pennation_angle_at_optimal=0.1951828 fiber_damping=0.01
      PathPoint P1: tibia_l (0.0171628 -0.146218 -0.0155951)
      PathPoint P2: tibia_l (0.0279731 -0.212417 -0.012322)
      PathPoint P3: tibia_l (0.025967 -0.407783 0.0127071)
      PathPoint P4: calcn_l (0.103129 0.0157436 0.0355929)
    Millard2012EquilibriumMuscle tibpost_r: max_isometric_force=1730.154 optimal_fiber_length=0.04208307
        tendon_slack_length=0.3125944 pennation_angle_at_optimal=0.2264891 fiber_damping=0.1
      PathPoint P1: tibia_r (-0.00456931 -0.145326 0.0099154)
      PathPoint P2: tibia_r (-0.0182772 -0.407337 -0.0168465)
      PathPoint P3: calcn_r (0.0368824 0.0295413 -0.0333757)
      PathPoint P4: calcn_r (0.0682811 0.0140631 -0.0327922)
    Millard2012EquilibriumMuscle tibpost_l: max_isometric_force=1730.154 optimal_fiber_length=0.04208307
        tendon_slack_length=0.3125944 pennation_angle_at_optimal=0.2264891 fiber_damping=0.1
      PathPoint P1: tibia_l (-0.00456931 -0.145326 -0.0099154)
      PathPoint P2: tibia_l (-0.0182772 -0.407337 0.0168465)
      PathPoint P3: calcn_l (0.0368824 0.0295413 0.0333757)
      PathPoint P4: calcn_l (0.0682811 0.0140631 0.0327922)
    Millard2012EquilibriumMuscle vasint_r: max_isometric_force=1697.361 optimal_fiber_length=0.1180179
        tendon_slack_length=0.2067835 pennation_angle_at_optimal=0.06309973 fiber_damping=0.01
      PathPoint P1: femur_r (0.0284111 -0.188493 0.0368061)
      PathPoint P2: femur_r (0.0328197 -0.204168 0.0338379)
      PathPoint P3: patella_r (0.0058 0.048 -0.0006)
      PathPoint P4: patella_r (0.005 0.00247 -0.00039)
      PathPoint P5: tibia_r (0.0362981 -0.0704342 0.000413944)
      PathWrap: wrap_object=KnExt_at_fem_r method=hybrid
    Millard2012EquilibriumMuscle vasint_l: max_isometric_force=1697.361 optimal_fiber_length=0.1180179
        tendon_slack_length=0.2067835 pennation_angle_at_optimal=0.06309973 fiber_damping=0.01
      PathPoint P1: femur_l (0.0284111 -0.188493 -0.0368061)
      PathPoint P2: femur_l (0.0328197 -0.204168 -0.0338379)
      PathPoint P3: patella_l (0.0058 0.048 0.0006)
      PathPoint P4: patella_l (0.005 0.00247 0.00039)
      PathPoint P5: tibia_l (0.0362981 -0.0704342 -0.000413944)
      PathWrap: wrap_object=KnExt_at_fem_l method=hybrid
    Millard2012EquilibriumMuscle vaslat140_r: max_isometric_force=5148.767 optimal_fiber_length=0.1182775
        tendon_slack_length=0.223413 pennation_angle_at_optimal=0.2528673 fiber_damping=0.01
      PathPoint vaslat_r-P1: femur_r (0.00470253 -0.181635 0.0414365)
      PathPoint vaslat_r-P2: femur_r (0.0263537 -0.253838 0.0485603)
      PathPoint vaslat_r-P3: patella_r (0.0103 0.0423 0.0141)
      PathPoint vaslat_r-P4: patella_r (0.005 0.00247 0.00733)
      PathPoint vaslat_r-P5: tibia_r (0.0362647 -0.0706348 0.00491919)
      PathWrap: wrap_object=KnExtVL_at_fem_r method=hybrid
    Millard2012EquilibriumMuscle vaslat140_l: max_isometric_force=5148.767 optimal_fiber_length=0.1182775
        tendon_slack_length=0.223413 pennation_angle_at_optimal=0.2528673 fiber_damping=0.01
      PathPoint vaslat_l-P1: femur_l (0.00470253 -0.181635 -0.0414365)
      PathPoint vaslat_l-P2: femur_l (0.0263537 -0.253838 -0.0485603)
      PathPoint vaslat_l-P3: patella_l (0.0103 0.0423 -0.0141)
      PathPoint vaslat_l-P4: patella_l (0.005 0.00247 -0.00733)
      PathPoint vaslat_l-P5: tibia_l (0.0362647 -0.0706348 -0.00491919)
      PathWrap: wrap_object=KnExtVL_at_fem_l method=hybrid
    Millard2012EquilibriumMuscle vasmed_r: max_isometric_force=2747.823 optimal_fiber_length=0.1110518
        tendon_slack_length=0.2099888 pennation_angle_at_optimal=0.4222225 fiber_damping=0.01
      PathPoint P1: femur_r (0.0137157 -0.205638 0.0223211)
      PathPoint P2: femur_r (0.0348771 -0.271277 0.00106856)
      PathPoint P3: patella_r (0.0063 0.0445 -0.017)
      PathPoint P4: patella_r (0.005 0.00247 -0.0085)
      PathPoint P5: tibia_r (0.0355515 -0.0708466 -0.00652683)
      PathWrap: wrap_object=KnExt_at_fem_r method=hybrid
    Millard2012EquilibriumMuscle vasmed_l: max_isometric_force=2747.823 optimal_fiber_length=0.1110518
        tendon_slack_length=0.2099888 pennation_angle_at_optimal=0.4222225 fiber_damping=0.01
      PathPoint P1: femur_l (0.0137157 -0.205638 -0.0223211)
      PathPoint P2: femur_l (0.0348771 -0.271277 -0.00106856)
      PathPoint P3: patella_l (0.0063 0.0445 0.017)
      PathPoint P4: patella_l (0.005 0.00247 0.0085)
      PathPoint P5: tibia_l (0.0355515 -0.0708466 0.00652683)
      PathWrap: wrap_object=KnExt_at_fem_l method=hybrid
    Millard2012EquilibriumMuscle ercspn_r: max_isometric_force=5000 optimal_fiber_length=0.1288714
        tendon_slack_length=0.03221785 pennation_angle_at_optimal=0 fiber_damping=0.1
        activation_time_constant=0.01 [seconds]
      PathPoint P1: pelvis (-0.149095 0.0467519 0.0464324)
      PathPoint P2: torso (-0.0591178 0.118236 0.0241)
      ActiveForceLengthCurve: minimum_value=0
      FiberForceLengthCurve: strain_at_one_norm_force=0.7
    Millard2012EquilibriumMuscle ercspn_l: max_isometric_force=5000 optimal_fiber_length=0.1288714
        tendon_slack_length=0.03221785 pennation_angle_at_optimal=0 fiber_damping=0.1 activation_time_constant=0.01
      PathPoint P1: pelvis (-0.149095 0.0467519 -0.0464324)
      PathPoint P2: torso (-0.0591178 0.118236 -0.0241)
      ActiveForceLengthCurve: minimum_value=0
      FiberForceLengthCurve: strain_at_one_norm_force=0.7
    Millard2012EquilibriumMuscle intobl_r: max_isometric_force=1800 optimal_fiber_length=0.1074464
        tendon_slack_length=0.1074464 pennation_angle_at_optimal=0 fiber_damping=0.1 activation_time_constant=0.01
      PathPoint P1: pelvis (-0.0425985 0.0745475 0.123216)
      PathPoint P2: torso (0.0752409 0.171979 0.015)
      ActiveForceLengthCurve: minimum_value=0
      FiberForceLengthCurve: strain_at_one_norm_force=0.7
    Millard2012EquilibriumMuscle intobl_l: max_isometric_force=1800 optimal_fiber_length=0.1074464
        tendon_slack_length=0.1074464 pennation_angle_at_optimal=0 fiber_damping=0.1 activation_time_constant=0.01
      PathPoint P1: pelvis (-0.0425985 0.0745475 -0.123216)
      PathPoint P2: torso (0.0752409 0.171979 -0.015)
      ActiveForceLengthCurve: minimum_value=0
      FiberForceLengthCurve: strain_at_one_norm_force=0.7
    Millard2012EquilibriumMuscle extobl_r: max_isometric_force=1800 optimal_fiber_length=0.137
        tendon_slack_length=0.137 pennation_angle_at_optimal=0 fiber_damping=0.1 activation_time_constant=0.01
      PathPoint P1: pelvis (-0.0319489 -0.0677317 0.0106496)
      PathPoint P2: torso (0.0698665 0.118236 0.11)
      ActiveForceLengthCurve: minimum_value=0
      FiberForceLengthCurve: strain_at_one_norm_force=0.7
    Millard2012EquilibriumMuscle extobl_l: max_isometric_force=1800 optimal_fiber_length=0.137
        tendon_slack_length=0.137 pennation_angle_at_optimal=0 fiber_damping=0.1 activation_time_constant=0.01
      PathPoint P1: pelvis (-0.0319489 -0.0677317 -0.0106496)
      PathPoint P2: torso (0.0698665 0.118236 -0.11)
      ActiveForceLengthCurve: minimum_value=0
      FiberForceLengthCurve: strain_at_one_norm_force=0.7
    CoordinateActuator arm_flex_r: coordinate=arm_flex_r optimal_force=100
    CoordinateActuator arm_add_r: coordinate=arm_add_r optimal_force=100
    CoordinateActuator arm_rot_r: coordinate=arm_rot_r optimal_force=100
    CoordinateActuator elbow_flex_r: coordinate=elbow_flex_r optimal_force=100
    CoordinateActuator arm_flex_l: coordinate=arm_flex_l optimal_force=100
    CoordinateActuator arm_add_l: coordinate=arm_add_l optimal_force=100
    CoordinateActuator arm_rot_l: coordinate=arm_rot_l optimal_force=100
    CoordinateActuator elbow_flex_l: coordinate=elbow_flex_l optimal_force=100
    SpringGeneralizedForce [values shared by the 15 below unless stated]: stiffness=0 rest_length=0 viscosity=0.1
    SpringGeneralizedForce lumbar_extension_damper: coordinate=lumbar_extension
    SpringGeneralizedForce lumbar_bending_damper: coordinate=lumbar_bending
    SpringGeneralizedForce lumbar_rotation_damper: coordinate=lumbar_rotation
    SpringGeneralizedForce hip_flexion_damper_r: coordinate=hip_flexion_r
    SpringGeneralizedForce hip_flexion_damper_l: coordinate=hip_flexion_l
    SpringGeneralizedForce hip_adduction_damper_r: coordinate=hip_adduction_r
    SpringGeneralizedForce hip_adduction_damper_l: coordinate=hip_adduction_l
    SpringGeneralizedForce hip_rotation_damper_r: coordinate=hip_rotation_r
    SpringGeneralizedForce hip_rotation_damper_l: coordinate=hip_rotation_l
    SpringGeneralizedForce knee_damper_r: coordinate=knee_angle_r
    SpringGeneralizedForce knee_damper_l: coordinate=knee_angle_l
    SpringGeneralizedForce ankle_damper_r: coordinate=ankle_angle_r viscosity=0.5
    SpringGeneralizedForce ankle_damper_l: coordinate=ankle_angle_l viscosity=0.5
    SpringGeneralizedForce mtp_damper_r: isDisabled=true coordinate=mtp_angle_r viscosity=0.5
    SpringGeneralizedForce mtp_damper_l: isDisabled=true coordinate=mtp_angle_l viscosity=0.5
    ObjectGroup right_leg: members=(addbrev_r addlong_r addmagDist_r addmagIsch_r addmagMid_r addmagProx_r edl_r ehl_r fdl_r fhl_r gasmed_r glmax1_r glmax2_r glmax3_r glmed1_r glmed2_r glmed3_r glmin1_r glmin2_r glmin3_r grac_r iliacus_r perbrev_r perlong_r piri_r psoas_r recfem_r sart_r semimem_r semiten_r soleus_r tfl_r tibant_r tibpost_r vasint_r vasmed_r)
    ObjectGroup left_leg: members=(addbrev_l addlong_l addmagDist_l addmagIsch_l addmagMid_l addmagProx_l edl_l ehl_l fdl_l fhl_l gasmed_l glmax1_l glmax2_l glmax3_l glmed1_l glmed2_l glmed3_l glmin1_l glmin2_l glmin3_l grac_l iliacus_l perbrev_l perlong_l piri_l psoas_l recfem_l sart_l semimem_l semiten_l soleus_l tfl_l tibant_l tibpost_l vasint_l vasmed_l)
    ObjectGroup hip_add_r: members=(addbrev_r addlong_r addmagDist_r addmagIsch_r addmagMid_r addmagProx_r grac_r semimem_r semiten_r)
    ObjectGroup hip_abd_r: members=(glmax1_r glmed1_r glmed2_r glmed3_r glmin1_r glmin2_r glmin3_r piri_r sart_r tfl_r)
    ObjectGroup hip_flex_r: members=(addbrev_r addlong_r glmin1_r grac_r iliacus_r psoas_r recfem_r sart_r tfl_r)
    ObjectGroup hip_ext_r: members=(addlong_r addmagDist_r addmagIsch_r addmagMid_r addmagProx_r glmax1_r glmax2_r glmax3_r glmed1_r glmed2_r glmed3_r glmin3_r semimem_r semiten_r)
    ObjectGroup hip_inrot_r: members=(glmed1_r glmed2_r glmed3_r glmin1_r iliacus_r psoas_r tfl_r)
    ObjectGroup hip_exrot_r: members=(glmin3_r piri_r)
    ObjectGroup knee_flex_r: members=(gasmed_r grac_r sart_r semimem_r semiten_r)
    ObjectGroup knee_ext_r: members=(recfem_r vasint_r vasmed_r)
    ObjectGroup ankle_df_r: members=(edl_r ehl_r tibant_r)
    ObjectGroup ankle_pf_r: members=(fdl_r fhl_r gasmed_r perbrev_r perlong_r soleus_r tibpost_r)
    ObjectGroup everter_r: members=(edl_r perbrev_r perlong_r)
    ObjectGroup inverter_r: members=(ehl_r fdl_r fhl_r tibant_r tibpost_r)
    ObjectGroup hip_add_l: members=(addbrev_l addlong_l addmagDist_l addmagIsch_l addmagMid_l addmagProx_l grac_l semimem_l semiten_l)
    ObjectGroup hip_abd_l: members=(glmax1_l glmed1_l glmed2_l glmed3_l glmin1_l glmin2_l glmin3_l sart_l tfl_l)
    ObjectGroup hip_flex_l: members=(addbrev_l addlong_l glmin1_l grac_l iliacus_l psoas_l recfem_l sart_l tfl_l)
    ObjectGroup hip_ext_l: members=(addlong_l addmagDist_l addmagIsch_l addmagMid_l addmagProx_l glmax1_l glmax2_l glmax3_l glmed1_l glmed2_l glmed3_l glmin3_l semimem_l semiten_l)
    ObjectGroup hip_exrot_l: members=glmin3_l
    ObjectGroup hip_inrot_l: members=(glmed1_l glmed2_l glmed3_l glmin1_l iliacus_l psoas_l tfl_l)
    ObjectGroup knee_flex_l: members=(gasmed_l grac_l sart_l semimem_l semiten_l)
    ObjectGroup knee_ext_l: members=(recfem_l vasint_l vasmed_l)
    ObjectGroup ankle_df_l: members=(edl_l ehl_l tibant_l)
    ObjectGroup ankle_pf_l: members=(fdl_l fhl_l gasmed_l perbrev_l perlong_l soleus_l tibpost_l)
    ObjectGroup everter_l: members=(edl_l perbrev_l perlong_l)
    ObjectGroup inverter_l: members=(ehl_l fdl_l fhl_l tibant_l tibpost_l)
  MarkerSet:
    Marker RSHO: torso (0.00248893 0.397321 0.188156)
    Marker LSHO: torso (-0.00914968 0.405406 -0.181004)
    Marker C7: torso (-0.0727552 0.450559 -0.00195224)
    Marker RASI: pelvis (0.0207736 0.0185697 0.138326)
    Marker LASI: pelvis (0.0171301 0.0160583 -0.134269)
    Marker SACR: pelvis (-0.16642 0.0427206 -0.00323956)
    Marker RTHAP: femur_r (0.0985567 -0.214186 -0.0017808)
    Marker RTHAD: femur_r (0.0705729 -0.312409 0.0106065)
    Marker RTHLD: femur_r (0.00940934 -0.284502 0.0799439)
    Marker RTHLP: femur_r (0.0308208 -0.20016 0.0906746)
    Marker RLEPI: femur_r (-0.00864578 -0.394534 0.0622854)
    Marker RMEPI: femur_r (-0.00275727 -0.410741 -0.052581)
    Marker RTIAP: tibia_r (0.0119409 -0.157539 -0.00450501)
    Marker RTIAD: tibia_r (0.00690883 -0.276738 -0.00186979)
    Marker RLMAL: tibia_r (-0.03313 -0.425127 0.0495583)
    Marker RMMAL: tibia_r (-0.0043231 -0.402085 -0.0358918)
    Marker RHEEL: calcn_r (-0.0218331 0.0368821 -0.0087704)
    Marker RMFS: calcn_r (0.144239 0.044661 -0.0167443)
    Marker RMFL: calcn_r (0.116574 0.0312349 0.0485861)
    Marker RP1MT: calcn_r (0.173871 0.00217494 -0.0505739)
    Marker RP5MT: calcn_r (0.15405 0.0082776 0.0727143)
    Marker RTOE: toes_r (0.071819 0.00619129 -0.00126034) fixed=true
    Marker LTHAP: femur_l (0.0961955 -0.230169 -0.00567969)
    Marker LTHAD: femur_l (0.0709149 -0.31329 -0.00516239)
    Marker LTHLD: femur_l (0.00716089 -0.296183 -0.0786976)
    Marker LTHLP: femur_l (0.0223587 -0.228828 -0.0901543)
    Marker LLEPI: femur_l (-0.00575197 -0.393648 -0.0651288)
    Marker LMEPI: femur_l (-0.00545568 -0.410208 0.0550404)
    Marker LTIAP: tibia_l (0.00888983 -0.156579 0.00515291)
    Marker LTIAD: tibia_l (0.00673109 -0.265029 0.000159123)
    Marker LLMAL: tibia_l (-0.0340712 -0.420576 -0.0481639)
    Marker LMMAL: tibia_l (-0.0100085 -0.407366 0.0377549)
    Marker LHEEL: calcn_l (-0.0250776 0.0427218 0.0113579)
    Marker LMFS: calcn_l (0.140287 0.0463116 0.0184386)
    Marker LMFL: calcn_l (0.116449 0.0326703 -0.049613)
    Marker LP1MT: calcn_l (0.180618 0.00667536 0.0439719)
    Marker LP5MT: calcn_l (0.159936 0.00414542 -0.0745336)
    Marker LTOE: toes_l (0.0635902 0.00622888 0.014316)
    Marker RELB: humerus_r (-0.00179696 -0.358599 0.00957077)
    Marker RWR: radius_r (-0.0536946 -0.281033 0.0304347)
    Marker LELB: humerus_l (0.00253154 -0.343839 -0.0188008)
    Marker LWR: radius_l (-0.0577611 -0.279176 -0.0228384)
    Marker RKJC: tibia_r (0 0 0)
    Marker LKJC: tibia_l (0 0 0)
    Marker right_one: calcn_r (0.00190116 -0.021859 -0.0038263)
    Marker right_two: calcn_r (0.148386 -0.021859 -0.0287134)
    Marker right_three: calcn_r (0.133001 -0.021859 0.0516362)
    Marker right_four: toes_r (0.05 -0.0214476 -0.0187603)
    Marker right_five: calcn_r (0.0662347 -0.021859 0.0263642)
    Marker right_six: toes_r (0.02 -0.0214476 0.04)
    Marker left_one: calcn_l (0.00190116 -0.021859 0.0038263)
    Marker left_two: calcn_l (0.148386 -0.021859 0.0287134)
    Marker left_three: calcn_l (0.133001 -0.021859 -0.0516362)
    Marker left_four: toes_l (0.06 -0.0214476 0.0187603)
    Marker left_five: calcn_l (0.0662347 -0.021859 -0.0263642)
    Marker left_six: toes_l (0.02 -0.0214476 -0.04)
  ContactGeometrySet:
    ContactHalfSpace ground: body_name=ground location=(0 -0.008 0) orientation=(0 0 -1.5708)
    ContactSphere right_one: body_name=calcn_r location=(0.001901158 -0.021859 -0.003826304) orientation=(1 0 0)
        radius=0.032
    ContactSphere right_two: body_name=calcn_r location=(0.1483864 -0.021859 -0.02871342) orientation=(1 0 0)
        radius=0.032
    ContactSphere right_three: body_name=calcn_r location=(0.1330012 -0.021859 0.05163625) orientation=(1 0 0)
        radius=0.032
    ContactSphere right_four: body_name=toes_r location=(0.05 -0.0214476 -0.01876031) orientation=(1 0 0) radius=0.032
    ContactSphere right_five: body_name=calcn_r location=(0.06623467 -0.021859 0.02636416) orientation=(1 0 0)
        radius=0.032
    ContactSphere right_six: body_name=toes_r location=(0.02 -0.0214476 0.04) orientation=(1 0 0) radius=0.032
    ContactSphere left_one: body_name=calcn_l location=(0.001901158 -0.021859 0.003826304) orientation=(1 0 0)
        radius=0.032
    ContactSphere left_two: body_name=calcn_l location=(0.1483864 -0.021859 0.02871342) orientation=(1 0 0)
        radius=0.032
    ContactSphere left_three: body_name=calcn_l location=(0.1330012 -0.021859 -0.05163625) orientation=(1 0 0)
        radius=0.032
    ContactSphere left_four: body_name=toes_l location=(0.05 -0.0214476 0.01876031) orientation=(1 0 0) radius=0.032
    ContactSphere left_five: body_name=calcn_l location=(0.06623467 -0.021859 -0.02636416) orientation=(1 0 0)
        radius=0.032
    ContactSphere left_six: body_name=toes_l location=(0.02 -0.0214476 -0.04) orientation=(1 0 0) radius=0.032
    ContactSphere Right_Foot: body_name=calcn_r location=(0.05 0.05 0) orientation=(1 0 0) radius=0.05
    ContactSphere Left_Foot: body_name=calcn_l location=(0.05 0.05 0) orientation=(1 0 0) radius=0.05
    ContactSphere Right_Knee: body_name=tibia_r location=(0 0 0) orientation=(1 0 0) radius=0.06
    ContactSphere Left_Knee: body_name=tibia_l location=(0 0 0) orientation=(1 0 0) radius=0.06
  ProbeSet:
    Umberger2010MuscleMetabolicsProbe metabolics: probe_operation=value activation_maintenance_rate_on=true
        shortening_rate_on=true basal_rate_on=true mechanical_work_rate_on=true report_total_metabolics_only=false
      Umberger2010MuscleMetabolicsProbe_MetabolicMuscleParameterSet:
        Umberger2010MuscleMetabolicsProbe_MetabolicMuscleParameter addmagDist_r: ratio_slow_twitch_fibers=0.552
            use_provided_muscle_mass=false
        Umberger2010MuscleMetabolicsProbe_MetabolicMuscleParameter addmagDist_l: ratio_slow_twitch_fibers=0.552
            use_provided_muscle_mass=false
        Umberger2010MuscleMetabolicsProbe_MetabolicMuscleParameter addmagIsch_r: ratio_slow_twitch_fibers=0.552
            use_provided_muscle_mass=false
        Umberger2010MuscleMetabolicsProbe_MetabolicMuscleParameter addmagIsch_l: ratio_slow_twitch_fibers=0.552
            use_provided_muscle_mass=false
        Umberger2010MuscleMetabolicsProbe_MetabolicMuscleParameter addmagMid_r: ratio_slow_twitch_fibers=0.552
            use_provided_muscle_mass=false
        Umberger2010MuscleMetabolicsProbe_MetabolicMuscleParameter addmagMid_l: ratio_slow_twitch_fibers=0.552
            use_provided_muscle_mass=false
        Umberger2010MuscleMetabolicsProbe_MetabolicMuscleParameter addmagProx_r: ratio_slow_twitch_fibers=0.552
            use_provided_muscle_mass=false
        Umberger2010MuscleMetabolicsProbe_MetabolicMuscleParameter addmagProx_l: ratio_slow_twitch_fibers=0.552
            use_provided_muscle_mass=false
        Umberger2010MuscleMetabolicsProbe_MetabolicMuscleParameter bflh140_r: ratio_slow_twitch_fibers=0.5425
            use_provided_muscle_mass=false
        Umberger2010MuscleMetabolicsProbe_MetabolicMuscleParameter bflh140_l: ratio_slow_twitch_fibers=0.5425
            use_provided_muscle_mass=false
        Umberger2010MuscleMetabolicsProbe_MetabolicMuscleParameter bfsh140_r: ratio_slow_twitch_fibers=0.529
            use_provided_muscle_mass=false
        Umberger2010MuscleMetabolicsProbe_MetabolicMuscleParameter bfsh140_l: ratio_slow_twitch_fibers=0.529
            use_provided_muscle_mass=false
        Umberger2010MuscleMetabolicsProbe_MetabolicMuscleParameter edl_r: ratio_slow_twitch_fibers=0.75
            use_provided_muscle_mass=false
        Umberger2010MuscleMetabolicsProbe_MetabolicMuscleParameter edl_l: ratio_slow_twitch_fibers=0.75
            use_provided_muscle_mass=false
        Umberger2010MuscleMetabolicsProbe_MetabolicMuscleParameter ehl_r: ratio_slow_twitch_fibers=0.75
            use_provided_muscle_mass=false
        Umberger2010MuscleMetabolicsProbe_MetabolicMuscleParameter ehl_l: ratio_slow_twitch_fibers=0.75
            use_provided_muscle_mass=false
        Umberger2010MuscleMetabolicsProbe_MetabolicMuscleParameter fdl_r: ratio_slow_twitch_fibers=0.6
            use_provided_muscle_mass=false
        Umberger2010MuscleMetabolicsProbe_MetabolicMuscleParameter fdl_l: ratio_slow_twitch_fibers=0.6
            use_provided_muscle_mass=false
        Umberger2010MuscleMetabolicsProbe_MetabolicMuscleParameter fhl_r: ratio_slow_twitch_fibers=0.6
            use_provided_muscle_mass=false
        Umberger2010MuscleMetabolicsProbe_MetabolicMuscleParameter fhl_l: ratio_slow_twitch_fibers=0.6
            use_provided_muscle_mass=false
        Umberger2010MuscleMetabolicsProbe_MetabolicMuscleParameter gaslat140_r: ratio_slow_twitch_fibers=0.507
            use_provided_muscle_mass=false
        Umberger2010MuscleMetabolicsProbe_MetabolicMuscleParameter gaslat140_l: ratio_slow_twitch_fibers=0.507
            use_provided_muscle_mass=false
        Umberger2010MuscleMetabolicsProbe_MetabolicMuscleParameter gasmed_r: ratio_slow_twitch_fibers=0.566
            use_provided_muscle_mass=false
        Umberger2010MuscleMetabolicsProbe_MetabolicMuscleParameter gasmed_l: ratio_slow_twitch_fibers=0.566
            use_provided_muscle_mass=false
        Umberger2010MuscleMetabolicsProbe_MetabolicMuscleParameter glmax1_r: ratio_slow_twitch_fibers=0.55
            use_provided_muscle_mass=false
        Umberger2010MuscleMetabolicsProbe_MetabolicMuscleParameter glmax1_l: ratio_slow_twitch_fibers=0.55
            use_provided_muscle_mass=false
        Umberger2010MuscleMetabolicsProbe_MetabolicMuscleParameter glmax2_r: ratio_slow_twitch_fibers=0.55
            use_provided_muscle_mass=false
        Umberger2010MuscleMetabolicsProbe_MetabolicMuscleParameter glmax2_l: ratio_slow_twitch_fibers=0.55
            use_provided_muscle_mass=false
        Umberger2010MuscleMetabolicsProbe_MetabolicMuscleParameter glmax3_r: ratio_slow_twitch_fibers=0.55
            use_provided_muscle_mass=false
        Umberger2010MuscleMetabolicsProbe_MetabolicMuscleParameter glmax3_l: ratio_slow_twitch_fibers=0.55
            use_provided_muscle_mass=false
        Umberger2010MuscleMetabolicsProbe_MetabolicMuscleParameter glmed1_r: ratio_slow_twitch_fibers=0.55
            use_provided_muscle_mass=false
        Umberger2010MuscleMetabolicsProbe_MetabolicMuscleParameter glmed1_l: ratio_slow_twitch_fibers=0.55
            use_provided_muscle_mass=false
        Umberger2010MuscleMetabolicsProbe_MetabolicMuscleParameter glmed2_r: ratio_slow_twitch_fibers=0.55
            use_provided_muscle_mass=false
        Umberger2010MuscleMetabolicsProbe_MetabolicMuscleParameter glmed2_l: ratio_slow_twitch_fibers=0.55
            use_provided_muscle_mass=false
        Umberger2010MuscleMetabolicsProbe_MetabolicMuscleParameter glmed3_r: ratio_slow_twitch_fibers=0.55
            use_provided_muscle_mass=false
        Umberger2010MuscleMetabolicsProbe_MetabolicMuscleParameter glmed3_l: ratio_slow_twitch_fibers=0.55
            use_provided_muscle_mass=false
        Umberger2010MuscleMetabolicsProbe_MetabolicMuscleParameter glmin1_r: ratio_slow_twitch_fibers=0.55
            use_provided_muscle_mass=false
        Umberger2010MuscleMetabolicsProbe_MetabolicMuscleParameter glmin1_l: ratio_slow_twitch_fibers=0.55
            use_provided_muscle_mass=false
        Umberger2010MuscleMetabolicsProbe_MetabolicMuscleParameter glmin2_r: ratio_slow_twitch_fibers=0.55
            use_provided_muscle_mass=false
        Umberger2010MuscleMetabolicsProbe_MetabolicMuscleParameter glmin2_l: ratio_slow_twitch_fibers=0.55
            use_provided_muscle_mass=false
        Umberger2010MuscleMetabolicsProbe_MetabolicMuscleParameter glmin3_r: ratio_slow_twitch_fibers=0.55
            use_provided_muscle_mass=false
        Umberger2010MuscleMetabolicsProbe_MetabolicMuscleParameter glmin3_l: ratio_slow_twitch_fibers=0.55
            use_provided_muscle_mass=false
        Umberger2010MuscleMetabolicsProbe_MetabolicMuscleParameter iliacus_r: ratio_slow_twitch_fibers=0.5
            use_provided_muscle_mass=false
        Umberger2010MuscleMetabolicsProbe_MetabolicMuscleParameter iliacus_l: ratio_slow_twitch_fibers=0.5
            use_provided_muscle_mass=false
        Umberger2010MuscleMetabolicsProbe_MetabolicMuscleParameter perbrev_r: ratio_slow_twitch_fibers=0.6
            use_provided_muscle_mass=false
        Umberger2010MuscleMetabolicsProbe_MetabolicMuscleParameter perbrev_l: ratio_slow_twitch_fibers=0.6
            use_provided_muscle_mass=false
        Umberger2010MuscleMetabolicsProbe_MetabolicMuscleParameter perlong_r: ratio_slow_twitch_fibers=0.6
            use_provided_muscle_mass=false
        Umberger2010MuscleMetabolicsProbe_MetabolicMuscleParameter perlong_l: ratio_slow_twitch_fibers=0.6
            use_provided_muscle_mass=false
        Umberger2010MuscleMetabolicsProbe_MetabolicMuscleParameter psoas_r: ratio_slow_twitch_fibers=0.5
            use_provided_muscle_mass=false
        Umberger2010MuscleMetabolicsProbe_MetabolicMuscleParameter psoas_l: ratio_slow_twitch_fibers=0.5
            use_provided_muscle_mass=false
        Umberger2010MuscleMetabolicsProbe_MetabolicMuscleParameter recfem_r: ratio_slow_twitch_fibers=0.3865
            use_provided_muscle_mass=false
        Umberger2010MuscleMetabolicsProbe_MetabolicMuscleParameter recfem_l: ratio_slow_twitch_fibers=0.3865
            use_provided_muscle_mass=false
        Umberger2010MuscleMetabolicsProbe_MetabolicMuscleParameter semimem_r: ratio_slow_twitch_fibers=0.4925
            use_provided_muscle_mass=false
        Umberger2010MuscleMetabolicsProbe_MetabolicMuscleParameter semimem_l: ratio_slow_twitch_fibers=0.4925
            use_provided_muscle_mass=false
        Umberger2010MuscleMetabolicsProbe_MetabolicMuscleParameter semiten_r: ratio_slow_twitch_fibers=0.425
            use_provided_muscle_mass=false
        Umberger2010MuscleMetabolicsProbe_MetabolicMuscleParameter semiten_l: ratio_slow_twitch_fibers=0.425
            use_provided_muscle_mass=false
        Umberger2010MuscleMetabolicsProbe_MetabolicMuscleParameter soleus_r: ratio_slow_twitch_fibers=0.803
            use_provided_muscle_mass=false
        Umberger2010MuscleMetabolicsProbe_MetabolicMuscleParameter soleus_l: ratio_slow_twitch_fibers=0.803
            use_provided_muscle_mass=false
        Umberger2010MuscleMetabolicsProbe_MetabolicMuscleParameter tibant_r: ratio_slow_twitch_fibers=0.7
            use_provided_muscle_mass=false
        Umberger2010MuscleMetabolicsProbe_MetabolicMuscleParameter tibant_l: ratio_slow_twitch_fibers=0.7
            use_provided_muscle_mass=false
        Umberger2010MuscleMetabolicsProbe_MetabolicMuscleParameter tibpost_r: ratio_slow_twitch_fibers=0.6
            use_provided_muscle_mass=false
        Umberger2010MuscleMetabolicsProbe_MetabolicMuscleParameter tibpost_l: ratio_slow_twitch_fibers=0.6
            use_provided_muscle_mass=false
        Umberger2010MuscleMetabolicsProbe_MetabolicMuscleParameter vasint_r: ratio_slow_twitch_fibers=0.543
            use_provided_muscle_mass=false
        Umberger2010MuscleMetabolicsProbe_MetabolicMuscleParameter vasint_l: ratio_slow_twitch_fibers=0.543
            use_provided_muscle_mass=false
        Umberger2010MuscleMetabolicsProbe_MetabolicMuscleParameter vaslat140_r: ratio_slow_twitch_fibers=0.455
            use_provided_muscle_mass=false
        Umberger2010MuscleMetabolicsProbe_MetabolicMuscleParameter vaslat140_l: ratio_slow_twitch_fibers=0.455
            use_provided_muscle_mass=false
        Umberger2010MuscleMetabolicsProbe_MetabolicMuscleParameter vasmed_r: ratio_slow_twitch_fibers=0.503
            use_provided_muscle_mass=false
        Umberger2010MuscleMetabolicsProbe_MetabolicMuscleParameter vasmed_l: ratio_slow_twitch_fibers=0.503
            use_provided_muscle_mass=false
        Umberger2010MuscleMetabolicsProbe_MetabolicMuscleParameter ercspn_r: ratio_slow_twitch_fibers=0.6
            use_provided_muscle_mass=false
        Umberger2010MuscleMetabolicsProbe_MetabolicMuscleParameter ercspn_l: ratio_slow_twitch_fibers=0.6
            use_provided_muscle_mass=false
        Umberger2010MuscleMetabolicsProbe_MetabolicMuscleParameter intobl_r: ratio_slow_twitch_fibers=0.56
            use_provided_muscle_mass=false
        Umberger2010MuscleMetabolicsProbe_MetabolicMuscleParameter intobl_l: ratio_slow_twitch_fibers=0.56
            use_provided_muscle_mass=false
        Umberger2010MuscleMetabolicsProbe_MetabolicMuscleParameter extobl_r: ratio_slow_twitch_fibers=0.58
            use_provided_muscle_mass=false
        Umberger2010MuscleMetabolicsProbe_MetabolicMuscleParameter extobl_l: ratio_slow_twitch_fibers=0.58
            use_provided_muscle_mass=false
