# OpenSim document version 30000
ForceSet RRA_Actuators:
  defaults:
    CoordinateActuator default: optimal_force=300
    PointActuator default: point=(0 0 0) point_is_global=false direction=(-1 0 0) force_is_global=true
        optimal_force=1000
    TorqueActuator default: torque_is_global=true axis=(-1 0 0) optimal_force=1
  PointActuator FX: body=pelvis point=(-0.06562712 0 0) direction=(1 0 0) optimal_force=4
  PointActuator FY: body=pelvis point=(-0.06562712 0 0) direction=(0 1 0) optimal_force=8
  PointActuator FZ: body=pelvis point=(-0.06562712 0 0) direction=(0 0 1) optimal_force=4
  TorqueActuator MX: bodyA=pelvis bodyB=ground axis=(1 0 0) optimal_force=2
  TorqueActuator MY: bodyA=pelvis bodyB=ground axis=(0 1 0) optimal_force=2
  TorqueActuator MZ: bodyA=pelvis bodyB=ground axis=(0 0 1) optimal_force=2
  CoordinateActuator hip_flexion_r: coordinate=hip_flexion_r optimal_force=300
  CoordinateActuator hip_adduction_r: coordinate=hip_adduction_r optimal_force=200
  CoordinateActuator hip_rotation_r: coordinate=hip_rotation_r optimal_force=100
  CoordinateActuator knee_angle_r: coordinate=knee_angle_r optimal_force=300
  CoordinateActuator knee_rot_r: coordinate=knee_rot_r optimal_force=100
  CoordinateActuator knee_add_r: coordinate=knee_add_r optimal_force=100
  CoordinateActuator ankle_angle_r: coordinate=ankle_angle_r optimal_force=300
  CoordinateActuator subtalar_angle_r: coordinate=subtalar_angle_r optimal_force=100
  CoordinateActuator hip_flexion_l: coordinate=hip_flexion_l optimal_force=300
  CoordinateActuator hip_adduction_l: coordinate=hip_adduction_l optimal_force=200
  CoordinateActuator hip_rotation_l: coordinate=hip_rotation_l optimal_force=100
  CoordinateActuator knee_angle_l: coordinate=knee_angle_l optimal_force=300
  CoordinateActuator knee_rot_l: coordinate=knee_rot_l optimal_force=100
  CoordinateActuator knee_add_l: coordinate=knee_add_l optimal_force=100
  CoordinateActuator ankle_angle_l: coordinate=ankle_angle_l optimal_force=300
  CoordinateActuator subtalar_angle_l: coordinate=subtalar_angle_l optimal_force=100
  CoordinateActuator lumbar_extension: coordinate=lumbar_extension optimal_force=200
  CoordinateActuator lumbar_bending: coordinate=lumbar_bending optimal_force=200
  CoordinateActuator lumbar_rotation: coordinate=lumbar_rotation optimal_force=200
