# OpenSim document version 40000
InverseKinematicsTool:
  results_directory: ./
  constraint_weight: Inf
  accuracy: 1e-5
  time_range: 0 1
  report_errors: true
  report_marker_locations: false
  IKTaskSet:
    IKMarkerTask MAN: apply=true weight=1
    IKMarkerTask T2: apply=true weight=1
    IKMarkerTask RASI: apply=true weight=10
    IKMarkerTask LASI: apply=true weight=10
    IKMarkerTask SACR: apply=true weight=10
    IKMarkerTask RTHAP: apply=true weight=1
    IKMarkerTask RTHAD: apply=true weight=1
    IKMarkerTask RTHLD: apply=true weight=1
    IKMarkerTask RTHLP: apply=true weight=1
    IKMarkerTask RLEPI: apply=true weight=10
    IKMarkerTask RMEPI: apply=false weight=10
    IKMarkerTask RTIAP: apply=true weight=1
    IKMarkerTask RTIAD: apply=true weight=1
    IKMarkerTask RTILAT: apply=true weight=5
    IKMarkerTask RLMAL: apply=true weight=10
    IKMarkerTask RMMAL: apply=false weight=10
    IKMarkerTask RHEEL: apply=true weight=10
    IKMarkerTask RMFS: apply=true weight=1
    IKMarkerTask RMFL: apply=true weight=1
    IKMarkerTask RTOE: apply=false weight=10
    IKMarkerTask LTHAP: apply=true weight=1
    IKMarkerTask LTHAD: apply=true weight=1
    IKMarkerTask LTHLD: apply=true weight=1
    IKMarkerTask LTHLP: apply=true weight=1
    IKMarkerTask LLEPI: apply=true weight=10
    IKMarkerTask LMEPI: apply=false weight=10
    IKMarkerTask LTIAP: apply=true weight=1
    IKMarkerTask LTIAD: apply=true weight=1
    IKMarkerTask LTILAT: apply=true weight=5
    IKMarkerTask LLMAL: apply=true weight=10
    IKMarkerTask LMMAL: apply=false weight=10
    IKMarkerTask LHEEL: apply=true weight=10
    IKMarkerTask LMFS: apply=true weight=1
    IKMarkerTask LMFL: apply=true weight=1
    IKMarkerTask LTOE: apply=false weight=10
    IKMarkerTask T10: apply=true weight=1
    IKMarkerTask RHJC: apply=false weight=10
    IKMarkerTask LHJC: apply=false weight=10
    IKMarkerTask RKJC: apply=false weight=10
    IKMarkerTask LKJC: apply=false weight=10
    IKMarkerTask RPAT: apply=true weight=1
    IKMarkerTask LPAT: apply=true weight=1
