# OpenSim document version 40000
ScaleTool WOBLTreadmill:
  mass: 0 [kg]
  height: -1
  age: -1
  ModelScaler:
    apply: true
    scaling_order: measurements
    time_range: 0 0
    preserve_mass_distribution: true
    MeasurementSet:
      Measurement PelvisX: apply=true
        MarkerPair: markers=(RASI RPSI)
        MarkerPair: markers=(LASI LPSI)
        BodyScale pelvis: axes=X
      Measurement PelvisYZ: apply=true
        MarkerPair: markers=(RASI LASI)
        MarkerPair: markers=(RPSI LPSI)
        BodyScale pelvis: axes=(Y Z)
      Measurement ThighXY: apply=true
        MarkerPair: markers=(RASI RLEK)
        MarkerPair: markers=(LASI LLEK)
        BodyScale femur_r: axes=(X Y)
        BodyScale patella_r: axes=(X Y)
        BodyScale femur_l: axes=(X Y)
        BodyScale patella_l: axes=(X Y)
      Measurement ThighZ: apply=true
        MarkerPair: markers=(RASI RLEK)
        MarkerPair: markers=(LASI LLEK)
        MarkerPair: markers=(RMEK RLEK)
        MarkerPair: markers=(LMEK LLEK)
        BodyScale femur_r: axes=Z
        BodyScale patella_r: axes=Z
        BodyScale femur_l: axes=Z
        BodyScale patella_l: axes=Z
      Measurement ShankXY: apply=true
        MarkerPair: markers=(RLEK RLM)
        MarkerPair: markers=(LLEK LLM)
        BodyScale tibia_r: axes=(X Y)
        BodyScale talus_r: axes=(X Y)
        BodyScale tibia_l: axes=(X Y)
        BodyScale talus_l: axes=(X Y)
      Measurement ShankZ: apply=true
        MarkerPair: markers=(RMM RLM)
        MarkerPair: markers=(LMM LLM)
        MarkerPair: markers=(RLEK RLM)
        MarkerPair: markers=(LLEK LLM)
        BodyScale tibia_r: axes=Z
        BodyScale talus_r: axes=Z
        BodyScale tibia_l: axes=Z
        BodyScale talus_l: axes=Z
      Measurement FootXYZ: apply=true
        MarkerPair: markers=(RHEE RMT5)
        MarkerPair: markers=(LHEE LMT5)
        BodyScale calcn_r: axes=(X Y Z)
        BodyScale toes_r: axes=(X Y Z)
        BodyScale calcn_l: axes=(X Y Z)
        BodyScale toes_l: axes=(X Y Z)
      Measurement TorsoXYZ: apply=true
        MarkerPair: markers=(LASI RASI)
        MarkerPair: markers=(LPSI RPSI)
        MarkerPair: markers=(LPSI LASI)
        MarkerPair: markers=(RPSI RASI)
        BodyScale torso: axes=(X Y Z)
  MarkerPlacer:
    apply: true
    time_range: 0 0
    max_marker_movement: -1
    IKTaskSet:
      IKMarkerTask C7: apply=true weight=5
      IKMarkerTask T10: apply=true weight=5
      IKMarkerTask JN: apply=true weight=10
      IKMarkerTask XIPH: apply=true weight=30
      IKMarkerTask LLSH: apply=true weight=5
      IKMarkerTask RLSH: apply=true weight=5
      IKMarkerTask RASI: apply=true weight=50
      IKMarkerTask LASI: apply=true weight=50
      IKMarkerTask RPSI: apply=true weight=30
      IKMarkerTask LPSI: apply=true weight=30
      IKMarkerTask RLTH: apply=true weight=1
      IKMarkerTask RLEK: apply=true weight=50
      IKMarkerTask RMEK: apply=true weight=1
      IKMarkerTask RLM: apply=true weight=50
      IKMarkerTask RMM: apply=true weight=1
      IKMarkerTask RHEE: apply=true weight=50
      IKMarkerTask RMT5: apply=true weight=30
      IKMarkerTask RMT2: apply=true weight=30
      IKMarkerTask LLTH: apply=true weight=1
      IKMarkerTask LLEK: apply=true weight=50
      IKMarkerTask LMEK: apply=true weight=1
      IKMarkerTask LLM: apply=true weight=50
      IKMarkerTask LMM: apply=true weight=1
      IKMarkerTask LHEE: apply=true weight=50
      IKMarkerTask LMT5: apply=true weight=30
      IKMarkerTask LMT2: apply=true weight=30
