# OpenSim document version 40000
ForceSet Rajagopal_CMC_Actuators:
  defaults: CoordinateActuator default: optimal_force=100
  PointActuator FX: body=pelvis point=(-0.0775967 0 0) direction=(1 0 0) optimal_force=1000
  PointActuator FY: body=pelvis point=(-0.0775967 0 0) direction=(0 1 0) optimal_force=1000
  PointActuator FZ: body=pelvis point=(-0.0775967 0 0) direction=(0 0 1) optimal_force=1000
  TorqueActuator MX: bodyA=pelvis bodyB=ground axis=(1 0 0) optimal_force=1000
  TorqueActuator MY: bodyA=pelvis bodyB=ground axis=(0 1 0) optimal_force=1000
  TorqueActuator MZ: bodyA=pelvis bodyB=ground axis=(0 0 1) optimal_force=1000
  CoordinateActuator hip_flexion_r_reserve: coordinate=hip_flexion_r optimal_force=1000
  CoordinateActuator hip_adduction_r_reserve: coordinate=hip_adduction_r optimal_force=1000
  CoordinateActuator hip_rotation_r_reserve: coordinate=hip_rotation_r optimal_force=1000
  CoordinateActuator knee_angle_r_reserve: coordinate=knee_angle_r optimal_force=1000
  CoordinateActuator ankle_angle_r_reserve: coordinate=ankle_angle_r optimal_force=1000
  CoordinateActuator hip_flexion_l_reserve: coordinate=hip_flexion_l optimal_force=1000
  CoordinateActuator hip_adduction_l_reserve: coordinate=hip_adduction_l optimal_force=1000
  CoordinateActuator hip_rotation_l_reserve: coordinate=hip_rotation_l optimal_force=1000
  CoordinateActuator knee_angle_l_reserve: coordinate=knee_angle_l optimal_force=1000
  CoordinateActuator ankle_angle_l_reserve: coordinate=ankle_angle_l optimal_force=1000
