# OpenSim document version 30000
ControlSet Rajagopal_CMC_ControlConstraints:
  defaults: ControlLinear default: is_model_control=true extrapolate=true default_min=0.02 default_max=1
      filter_on=false use_steps=true kp=100 kv=20
  ControlLinear [values shared by the 123 below unless stated]: is_model_control=true extrapolate=true filter_on=false
      kp=100 kv=20 use_steps=true default_max=1
  ControlLinear FX.excitation: default_min=-1000 default_max=1000 use_steps=false
  ControlLinear FY.excitation: default_min=-1000 default_max=1000 use_steps=false
  ControlLinear FZ.excitation: default_min=-1000 default_max=1000 use_steps=false
  ControlLinear MX.excitation: default_min=-1000 default_max=1000 use_steps=false
  ControlLinear MY.excitation: default_min=-1000 default_max=1000 use_steps=false
  ControlLinear MZ.excitation: default_min=-1000 default_max=1000 use_steps=false
  ControlLinear hip_flexion_r.excitation: default_min=-1000 default_max=1000
  ControlLinear hip_adduction_r.excitation: default_min=-1000 default_max=1000
  ControlLinear hip_rotation_r.excitation: default_min=-1000 default_max=1000
  ControlLinear knee_angle_r.excitation: default_min=-1000 default_max=1000
  ControlLinear ankle_angle_r.excitation: default_min=-1000 default_max=1000
  ControlLinear subtalar_angle_r.excitation: default_min=-1000 default_max=1000
  ControlLinear mtp_angle_r.excitation: default_min=-1
  ControlLinear hip_flexion_l.excitation: default_min=-1000 default_max=1000
  ControlLinear hip_adduction_l.excitation: default_min=-1000 default_max=1000
  ControlLinear hip_rotation_l.excitation: default_min=-1000 default_max=1000
  ControlLinear knee_angle_l.excitation: default_min=-1000 default_max=1000
  ControlLinear ankle_angle_l.excitation: default_min=-1000 default_max=1000
  ControlLinear subtalar_angle_l.excitation: default_min=-1000 default_max=1000
  ControlLinear mtp_angle_l.excitation: default_min=-1
  ControlLinear lumbar_extension.excitation: default_min=-1000 default_max=1000
  ControlLinear lumbar_bending.excitation: default_min=-1000 default_max=1000
  ControlLinear lumbar_rotation.excitation: default_min=-1000 default_max=1000
  ControlLinear arm_flex_r.excitation: default_min=-1000 default_max=1000
  ControlLinear arm_add_r.excitation: default_min=-1000 default_max=1000
  ControlLinear arm_rot_r.excitation: default_min=-1000 default_max=1000
  ControlLinear elbow_flex_r.excitation: default_min=-1000 default_max=1000
  ControlLinear pro_sup_r.excitation: default_min=-1000 default_max=1000
  ControlLinear wrist_flex_r.excitation: default_min=-1000 default_max=1000
  ControlLinear wrist_dev_r.excitation: default_min=-1000 default_max=1000
  ControlLinear arm_flex_l.excitation: default_min=-1000 default_max=1000
  ControlLinear arm_add_l.excitation: default_min=-1000 default_max=1000
  ControlLinear arm_rot_l.excitation: default_min=-1000 default_max=1000
  ControlLinear elbow_flex_l.excitation: default_min=-1000 default_max=1000
  ControlLinear pro_sup_l.excitation: default_min=-1000 default_max=1000
  ControlLinear wrist_flex_l.excitation: default_min=-1000 default_max=1000
  ControlLinear wrist_dev_l.excitation: default_min=-1000 default_max=1000
  ControlLinear glut_med1_r.excitation: default_min=0.02
  ControlLinear glut_med2_r.excitation: default_min=0.02
  ControlLinear glut_med3_r.excitation: default_min=0.02
  ControlLinear glut_min1_r.excitation: default_min=0.02
  ControlLinear glut_min2_r.excitation: default_min=0.02
  ControlLinear glut_min3_r.excitation: default_min=0.02
  ControlLinear semimem_r.excitation: default_min=0.02
  ControlLinear semiten_r.excitation: default_min=0.02
  ControlLinear bifemlh_r.excitation: default_min=0.02
  ControlLinear bifemsh_r.excitation: default_min=0.02
  ControlLinear sar_r.excitation: default_min=0.02
  ControlLinear add_long_r.excitation: default_min=0.02
  ControlLinear add_brev_r.excitation: default_min=0.02
  ControlLinear add_mag1_r.excitation: default_min=0.02
  ControlLinear add_mag2_r.excitation: default_min=0.02
  ControlLinear add_mag3_r.excitation: default_min=0.02
  ControlLinear tfl_r.excitation: default_min=0.02
  ControlLinear pect_r.excitation: default_min=0.02
  ControlLinear grac_r.excitation: default_min=0.02
  ControlLinear glut_max1_r.excitation: default_min=0.02
  ControlLinear glut_max2_r.excitation: default_min=0.02
  ControlLinear glut_max3_r.excitation: default_min=0.02
  ControlLinear iliacus_r.excitation: default_min=0.02
  ControlLinear psoas_r.excitation: default_min=0.02
  ControlLinear quad_fem_r.excitation: default_min=0.02
  ControlLinear gem_r.excitation: default_min=0.02
  ControlLinear peri_r.excitation: default_min=0.02
  ControlLinear rect_fem_r.excitation: default_min=0.02
  ControlLinear vas_med_r.excitation: default_min=0.02
  ControlLinear vas_int_r.excitation: default_min=0.02
  ControlLinear vas_lat_r.excitation: default_min=0.02
  ControlLinear med_gas_r.excitation: default_min=0.02
  ControlLinear lat_gas_r.excitation: default_min=0.02
  ControlLinear soleus_r.excitation: default_min=0.02
  ControlLinear tib_post_r.excitation: default_min=0.02
  ControlLinear flex_dig_r.excitation: default_min=0.02
  ControlLinear flex_hal_r.excitation: default_min=0.02
  ControlLinear tib_ant_r.excitation: default_min=0.02
  ControlLinear per_brev_r.excitation: default_min=0.02
  ControlLinear per_long_r.excitation: default_min=0.02
  ControlLinear per_tert_r.excitation: default_min=0.02
  ControlLinear ext_dig_r.excitation: default_min=0.02
  ControlLinear ext_hal_r.excitation: default_min=0.02
  ControlLinear glut_med1_l.excitation: default_min=0.02
  ControlLinear glut_med2_l.excitation: default_min=0.02
  ControlLinear glut_med3_l.excitation: default_min=0.02
  ControlLinear glut_min1_l.excitation: default_min=0.02
  ControlLinear glut_min2_l.excitation: default_min=0.02
  ControlLinear glut_min3_l.excitation: default_min=0.02
  ControlLinear semimem_l.excitation: default_min=0.02
  ControlLinear semiten_l.excitation: default_min=0.02
  ControlLinear bifemlh_l.excitation: default_min=0.02
  ControlLinear bifemsh_l.excitation: default_min=0.02
  ControlLinear sar_l.excitation: default_min=0.02
  ControlLinear add_long_l.excitation: default_min=0.02
  ControlLinear add_brev_l.excitation: default_min=0.02
  ControlLinear add_mag1_l.excitation: default_min=0.02
  ControlLinear add_mag2_l.excitation: default_min=0.02
  ControlLinear add_mag3_l.excitation: default_min=0.02
  ControlLinear tfl_l.excitation: default_min=0.02
  ControlLinear pect_l.excitation: default_min=0.02
  ControlLinear grac_l.excitation: default_min=0.02
  ControlLinear glut_max1_l.excitation: default_min=0.02
  ControlLinear glut_max2_l.excitation: default_min=0.02
  ControlLinear glut_max3_l.excitation: default_min=0.02
  ControlLinear iliacus_l.excitation: default_min=0.02
  ControlLinear psoas_l.excitation: default_min=0.02
  ControlLinear quad_fem_l.excitation: default_min=0.02
  ControlLinear gem_l.excitation: default_min=0.02
  ControlLinear peri_l.excitation: default_min=0.02
  ControlLinear rect_fem_l.excitation: default_min=0.02
  ControlLinear vas_med_l.excitation: default_min=0.02
  ControlLinear vas_int_l.excitation: default_min=0.02
  ControlLinear vas_lat_l.excitation: default_min=0.02
  ControlLinear med_gas_l.excitation: default_min=0.02
  ControlLinear lat_gas_l.excitation: default_min=0.02
  ControlLinear soleus_l.excitation: default_min=0.02
  ControlLinear tib_post_l.excitation: default_min=0.02
  ControlLinear flex_dig_l.excitation: default_min=0.02
  ControlLinear flex_hal_l.excitation: default_min=0.02
  ControlLinear tib_ant_l.excitation: default_min=0.02
  ControlLinear per_brev_l.excitation: default_min=0.02
  ControlLinear per_long_l.excitation: default_min=0.02
  ControlLinear per_tert_l.excitation: default_min=0.02
  ControlLinear ext_dig_l.excitation: default_min=0.02
  ControlLinear ext_hal_l.excitation: default_min=0.02
