# OpenSim document version 40000
ControlSet Rajagopal_CMC_ControlConstraints:
  defaults: ControlLinear default: is_model_control=true extrapolate=true default_min=0.02 default_max=1 use_steps=true
  # RESIDUAL ACTUATORS
  ControlLinear FX.excitation: default_min=-1000 default_max=1000 use_steps=false
  ControlLinear FY.excitation: default_min=-1000 default_max=1000 use_steps=false
  ControlLinear FZ.excitation: default_min=-1000 default_max=1000 use_steps=false
  ControlLinear MX.excitation: default_min=-1000 default_max=1000 use_steps=false
  ControlLinear MY.excitation: default_min=-1000 default_max=1000 use_steps=false
  ControlLinear MZ.excitation: default_min=-1000 default_max=1000 use_steps=false
  # RESERVE ACTUATORS
  # No reserves required for locked coordinates
  ControlLinear hip_flexion_r_reserve.excitation: default_min=-1000 default_max=1000 use_steps=false
  ControlLinear hip_adduction_r_reserve.excitation: default_min=-1000 default_max=1000 use_steps=false
  ControlLinear hip_rotation_r_reserve.excitation: default_min=-1000 default_max=1000 use_steps=false
  ControlLinear knee_angle_r_reserve.excitation: default_min=-1000 default_max=1000 use_steps=false
  ControlLinear ankle_angle_r_reserve.excitation: default_min=-1000 default_max=1000 use_steps=false
  ControlLinear hip_flexion_l_reserve.excitation: default_min=-1000 default_max=1000 use_steps=false
  ControlLinear hip_adduction_l_reserve.excitation: default_min=-1000 default_max=1000 use_steps=false
  ControlLinear hip_rotation_l_reserve.excitation: default_min=-1000 default_max=1000 use_steps=false
  ControlLinear knee_angle_l_reserve.excitation: default_min=-1000 default_max=1000 use_steps=false
  ControlLinear ankle_angle_l_reserve.excitation: default_min=-1000 default_max=1000 use_steps=false
  # TORQUE ACTUATORS
  ControlLinear lumbar_ext.excitation: default_min=-1000 default_max=1000 use_steps=false
  ControlLinear lumbar_bend.excitation: default_min=-1000 default_max=1000 use_steps=false
  ControlLinear lumbar_rot.excitation: default_min=-1000 default_max=1000 use_steps=false
  # MUSCLES
  ControlLinear addbrev_r.excitation
  ControlLinear addlong_r.excitation
  ControlLinear addmagDist_r.excitation
  ControlLinear addmagIsch_r.excitation
  ControlLinear addmagMid_r.excitation
  ControlLinear addmagProx_r.excitation
  ControlLinear bflh140_r.excitation
  ControlLinear bfsh140_r.excitation
  ControlLinear edl_r.excitation
  ControlLinear ehl_r.excitation
  ControlLinear fdl_r.excitation
  ControlLinear fhl_r.excitation
  ControlLinear gaslat140_r.excitation
  ControlLinear gasmed_r.excitation
  ControlLinear glmax1_r.excitation
  ControlLinear glmax2_r.excitation
  ControlLinear glmax3_r.excitation
  ControlLinear glmed1_r.excitation
  ControlLinear glmed2_r.excitation
  ControlLinear glmed2_r.excitation
  ControlLinear glmin1_r.excitation
  ControlLinear glmin2_r.excitation
  ControlLinear glmin3_r.excitation
  ControlLinear grac_r.excitation
  ControlLinear iliacus_r.excitation
  ControlLinear perbrev_r.excitation
  ControlLinear perlong_r.excitation
  ControlLinear piri_r.excitation
  ControlLinear psoas_r.excitation
  ControlLinear recfem_r.excitation
  ControlLinear sart_r.excitation
  ControlLinear semimem_r.excitation
  ControlLinear semiten_r.excitation
  ControlLinear soleus_r.excitation
  ControlLinear tfl_r.excitation
  ControlLinear tib_ant_r.excitation
  ControlLinear tib_post_r.excitation
  ControlLinear vasint_r.excitation
  ControlLinear vaslat140_r.excitation
  ControlLinear vasmed_r.excitation
  ControlLinear addbrev_l.excitation
  ControlLinear addlong_l.excitation
  ControlLinear addmagDist_l.excitation
  ControlLinear addmagIsch_l.excitation
  ControlLinear addmagMid_l.excitation
  ControlLinear addmagProx_l.excitation
  ControlLinear bflh140_l.excitation
  ControlLinear bfsh140_l.excitation
  ControlLinear edl_l.excitation
  ControlLinear ehl_l.excitation
  ControlLinear fdl_l.excitation
  ControlLinear fhl_l.excitation
  ControlLinear gaslat140_l.excitation
  ControlLinear gasmed_l.excitation
  ControlLinear glmax1_l.excitation
  ControlLinear glmax2_l.excitation
  ControlLinear glmax3_l.excitation
  ControlLinear glmed1_l.excitation
  ControlLinear glmed2_l.excitation
  ControlLinear glmed2_l.excitation
  ControlLinear glmin1_l.excitation
  ControlLinear glmin2_l.excitation
  ControlLinear glmin3_l.excitation
  ControlLinear grac_l.excitation
  ControlLinear iliacus_l.excitation
  ControlLinear perbrev_l.excitation
  ControlLinear perlong_l.excitation
  ControlLinear piri_l.excitation
  ControlLinear psoas_l.excitation
  ControlLinear recfem_l.excitation
  ControlLinear sart_l.excitation
  ControlLinear semimem_l.excitation
  ControlLinear semiten_l.excitation
  ControlLinear soleus_l.excitation
  ControlLinear tfl_l.excitation
  ControlLinear tib_ant_l.excitation
  ControlLinear tib_post_l.excitation
  ControlLinear vasint_l.excitation
  ControlLinear vaslat140_l.excitation
  ControlLinear vasmed_l.excitation
