# OpenSim document version 40000
ForceSet Rajagopal_RRA_Actuators:
  PointActuator FX: body=pelvis point=(-0.0699009 0 0) direction=(1 0 0) optimal_force=10000 min_control=-1
      max_control=1
  PointActuator FY: body=pelvis point=(-0.0699009 0 0) direction=(0 1 0) optimal_force=10000 min_control=-1
      max_control=1
  PointActuator FZ: body=pelvis point=(-0.0699009 0 0) direction=(0 0 1) optimal_force=10000 min_control=-1
      max_control=1
  TorqueActuator MX: bodyA=pelvis bodyB=ground axis=(1 0 0) optimal_force=1000 min_control=-1 max_control=1
  TorqueActuator MY: bodyA=pelvis bodyB=ground axis=(0 1 0) optimal_force=1000 min_control=-1 max_control=1
  TorqueActuator MZ: bodyA=pelvis bodyB=ground axis=(0 0 1) optimal_force=1000 min_control=-1 max_control=1
  CoordinateActuator hip_flexion_r: coordinate=hip_flexion_r optimal_force=1000 min_control=-1 max_control=1
  CoordinateActuator hip_adduction_r: coordinate=hip_adduction_r optimal_force=1000 min_control=-1 max_control=1
  CoordinateActuator hip_rotation_r: coordinate=hip_rotation_r optimal_force=1000 min_control=-1 max_control=1
  CoordinateActuator knee_angle_r: coordinate=knee_angle_r optimal_force=1000 min_control=-1 max_control=1
  CoordinateActuator ankle_angle_r: coordinate=ankle_angle_r optimal_force=1000 min_control=-1 max_control=1
  CoordinateActuator hip_flexion_l: coordinate=hip_flexion_l optimal_force=1000 min_control=-1 max_control=1
  CoordinateActuator hip_adduction_l: coordinate=hip_adduction_l optimal_force=1000 min_control=-1 max_control=1
  CoordinateActuator hip_rotation_l: coordinate=hip_rotation_l optimal_force=1000 min_control=-1 max_control=1
  CoordinateActuator knee_angle_l: coordinate=knee_angle_l optimal_force=1000 min_control=-1 max_control=1
  CoordinateActuator ankle_angle_l: coordinate=ankle_angle_l optimal_force=1000 min_control=-1 max_control=1
  CoordinateActuator lumbar_extension: coordinate=lumbar_extension optimal_force=1000 min_control=-1 max_control=1
  CoordinateActuator lumbar_bending: coordinate=lumbar_bending optimal_force=1000 min_control=-1 max_control=1
  CoordinateActuator lumbar_rotation: coordinate=lumbar_rotation optimal_force=1000 min_control=-1 max_control=1
  CoordinateActuator arm_flex_r: coordinate=arm_flex_r optimal_force=500 min_control=-1 max_control=1
  CoordinateActuator arm_add_r: coordinate=arm_add_r optimal_force=500 min_control=-1 max_control=1
  CoordinateActuator arm_rot_r: coordinate=arm_rot_r optimal_force=500 min_control=-1 max_control=1
  CoordinateActuator elbow_flex_r: coordinate=elbow_flex_r optimal_force=500 min_control=-1 max_control=1
  CoordinateActuator pro_sup_r: coordinate=pro_sup_r optimal_force=500 min_control=-1 max_control=1
  CoordinateActuator arm_flex_l: coordinate=arm_flex_l optimal_force=500 min_control=-1 max_control=1
  CoordinateActuator arm_add_l: coordinate=arm_add_l optimal_force=500 min_control=-1 max_control=1
  CoordinateActuator arm_rot_l: coordinate=arm_rot_l optimal_force=500 min_control=-1 max_control=1
  CoordinateActuator elbow_flex_l: coordinate=elbow_flex_l optimal_force=500 min_control=-1 max_control=1
  CoordinateActuator pro_sup_l: coordinate=pro_sup_l optimal_force=500 min_control=-1 max_control=1
