# OpenSim document version 30000
CMC_TaskSet RRA_Tasks:
  defaults: CMC_Joint default: weight=1 wrt_body=-1 express_body=-1 active=(true false false) kp=(100 1 1) kv=(20 1 1)
      ka=(1 1 1) r0=(0 0 0) r1=(0 0 0) r2=(0 0 0) limit=0
  # Pelvis
  CMC_Joint pelvis_tilt: weight=1000 coordinate=pelvis_tilt
  CMC_Joint pelvis_list: weight=500 coordinate=pelvis_list
  CMC_Joint pelvis_rotation: weight=100 coordinate=pelvis_rotation
  CMC_Joint pelvis_tx: weight=5 coordinate=pelvis_tx
  CMC_Joint pelvis_ty: weight=5 coordinate=pelvis_ty
  CMC_Joint pelvis_tz: weight=5 coordinate=pelvis_tz
  # Lower-limb Right
  CMC_Joint hip_flexion_r: weight=20 coordinate=hip_flexion_r
  CMC_Joint hip_adduction_r: weight=20 coordinate=hip_adduction_r
  CMC_Joint hip_rotation_r: weight=20 coordinate=hip_rotation_r
  CMC_Joint knee_angle_r: weight=20 coordinate=knee_angle_r
  CMC_Joint subtalar_angle_r: weight=5 coordinate=subtalar_angle_r
  CMC_Joint ankle_angle_r: weight=20 coordinate=ankle_angle_r
  # Lower-limb Left
  CMC_Joint hip_flexion_l: weight=20 coordinate=hip_flexion_l
  CMC_Joint hip_adduction_l: weight=20 coordinate=hip_adduction_l
  CMC_Joint hip_rotation_l: weight=20 coordinate=hip_rotation_l
  CMC_Joint knee_angle_l: weight=20 coordinate=knee_angle_l
  CMC_Joint subtalar_angle_l: weight=5 coordinate=subtalar_angle_l
  CMC_Joint ankle_angle_l: weight=20 coordinate=ankle_angle_l
  # Lumbar
  CMC_Joint lumbar_ext: weight=50 coordinate=lumbar_extension
  CMC_Joint lumbar_bend: weight=50 coordinate=lumbar_bending
  CMC_Joint lumbar_rot: weight=10 coordinate=lumbar_rotation
  # Upper-limb Right
  CMC_Joint shoulder_flex_r: weight=10 coordinate=arm_flex_r
  CMC_Joint shoulder_add_r: weight=10 coordinate=arm_add_r
  CMC_Joint shoulder_rot_r: weight=10 coordinate=arm_rot_r
  CMC_Joint elbow_flex_r: weight=5 coordinate=elbow_flex_r
  CMC_Joint pro_sup_r: weight=1 coordinate=pro_sup_r
  CMC_Joint wrist_flex_r: weight=1 coordinate=wrist_flex_r
  CMC_Joint wrist_dev_r: weight=1 coordinate=wrist_dev_r
  # Upper-limb Left
  CMC_Joint shoulder_flex_l: weight=10 coordinate=arm_flex_l
  CMC_Joint shoulder_add_l: weight=10 coordinate=arm_add_l
  CMC_Joint shoulder_rot_l: weight=10 coordinate=arm_rot_l
  CMC_Joint elbow_flex_l: weight=5 coordinate=elbow_flex_l
  CMC_Joint pro_sup_l: weight=1 coordinate=pro_sup_l
  CMC_Joint wrist_flex_l: weight=1 coordinate=wrist_flex_l
  CMC_Joint wrist_dev_l: weight=1 coordinate=wrist_dev_l
