# OpenSim document version 30000
ForceSet Rajagopal_Reserve_Actuators:
  defaults:
    CoordinateActuator default: optimal_force=300
    PointActuator default: point=(0 0 0) point_is_global=false direction=(-1 0 0) force_is_global=true
        optimal_force=1000
    TorqueActuator default: torque_is_global=true axis=(-1 0 0) optimal_force=1
  PointActuator FX: body=pelvis point=(-0.06562712 0 0) direction=(1 0 0) optimal_force=10
  PointActuator FY: body=pelvis point=(-0.06562712 0 0) direction=(0 1 0) optimal_force=10
  PointActuator FZ: body=pelvis point=(-0.06562712 0 0) direction=(0 0 1) optimal_force=10
  TorqueActuator MX: bodyA=pelvis bodyB=ground axis=(1 0 0) optimal_force=15
  TorqueActuator MY: bodyA=pelvis bodyB=ground axis=(0 1 0) optimal_force=15
  TorqueActuator MZ: bodyA=pelvis bodyB=ground axis=(0 0 1) optimal_force=15
  CoordinateActuator reserve_hip_flexion_r: coordinate=hip_flexion_r optimal_force=1
  CoordinateActuator reserve_hip_adduction_r: coordinate=hip_adduction_r optimal_force=1
  CoordinateActuator reserve_hip_rotation_r: coordinate=hip_rotation_r optimal_force=1
  CoordinateActuator reserve_knee_angle_r: coordinate=knee_angle_r optimal_force=1
  CoordinateActuator reserve_ankle_angle_r: coordinate=ankle_angle_r optimal_force=1
  CoordinateActuator reserve_subtalar_angle_r: coordinate=subtalar_angle_r optimal_force=1
  CoordinateActuator reserve_mtp_angle_r: coordinate=mtp_angle_r optimal_force=1
  CoordinateActuator reserve_hip_flexion_l: coordinate=hip_flexion_l optimal_force=1
  CoordinateActuator reserve_hip_adduction_l: coordinate=hip_adduction_l optimal_force=1
  CoordinateActuator reserve_hip_rotation_l: coordinate=hip_rotation_l optimal_force=1
  CoordinateActuator reserve_knee_angle_l: coordinate=knee_angle_l optimal_force=1
  CoordinateActuator reserve_ankle_angle_l: coordinate=ankle_angle_l optimal_force=1
  CoordinateActuator reserve_subtalar_angle_l: coordinate=subtalar_angle_l optimal_force=1
  CoordinateActuator reserve_mtp_angle_l: coordinate=mtp_angle_l optimal_force=1
